Simulations: Version=54
  DataStore
  Folder Hired Labour
    Memo Cropping examples description
      Sensibility testing for Hired labour
    Simulation Simple
      Memo Single  and Mixed Cropping Example
        Simple hired labour task
      Clock: StartDate=2001-01-01; EndDate=2010-12-31
      Summary summaryfile
      ZoneCLEM CLEM: RandomSeed=1; ClimateRegion=0; EcologicalIndicatorsCalculationMonth=12; Area=0; Slope=0
        FileCrop FileCrop_Vegetables: FileName=FileVegetables_Example2.prn
        ResourcesHolder Resources
          Land: UnitsOfArea=hectares; UnitsOfAreaToHaConversion=1
            LandType Field: LandArea=2; PortionBuildings=0; ProportionOfTotalArea=1; SoilType=4; Units=ha
          Finance Finances
            FinanceType General account: OpeningBalance=10000; EnforceWithdrawalLimit=true; WithdrawalLimit=0; InterestRateCharged=0; InterestRatePaid=0
          Labour: AllowAging=true
            LabourType Male: InitialAge=42; Gender=0; Individuals=1; Hired=false
            LabourType Female: InitialAge=35; Gender=1; Individuals=1; Hired=false
            LabourAvailabilityList
              LabourAvailabilityItem Male: Value=28
              LabourAvailabilityItem Female: Value=28
          ProductStore
            ProductStoreType Maize: StartingAmount=0; Units=kg
              ResourcePricing Pricing: PacketSize=10; UseWholePackets=true; PricePerPacket=100
            ProductStoreType Tomatoes: StartingAmount=0; Units=kg
            ProductStoreType TomatoPaste: StartingAmount=0; Units=kg
              ResourcePricing Pricing: PacketSize=10; UseWholePackets=false; PricePerPacket=200
            ProductStoreType Cucumbers: StartingAmount=0
        ActivitiesHolder Activities
          CropActivityManageCrop Manage Maize: LandItemNameToUse=Land.Field; AreaRequested=1; UseAreaAvailable=false; OnPartialResourcesAvailableAction=2
            CropActivityManageProduct Grow maize crop: ModelNameFileCrop=FileCrop_Maize; CropName=Maize_sole_fertilised; StoreItemName=ProductStore.Maize; ProportionKept=1; TreesPerHa=0; UnitsToHaConverter=0; OnPartialResourcesAvailableAction=2
              CropActivityTask Harvest maize: OnPartialResourcesAvailableAction=2
                ActivityTimerCropHarvest: OffsetMonthHarvestStart=0; OffsetMonthHarvestStop=0
                LabourRequirement HarvestMaize: LabourPerUnit=5; UnitSize=1; WholeUnitBlocks=false; UnitType=1; MinimumPerPerson=1; MaximumPerPerson=100; LabourShortfallAffectsActivity=true; ApplyToAll=false
                  LabourFilterGroup Male
                    LabourFilter: Parameter=1; Operator=0; Value=Male
                    LabourFilterGroup Male
                      LabourFilter: Parameter=1; Operator=0; Value=Female
          ResourceActivitySell Sell Maize: AccountName=Finances.General account; ResourceTypeName=ProductStore.Maize; AmountReserved=0; OnPartialResourcesAvailableAction=2
          CropActivityManageCrop Manage Vegetables: LandItemNameToUse=Land.Field; AreaRequested=0.8; UseAreaAvailable=false; OnPartialResourcesAvailableAction=2
            CropActivityManageProduct Grow tomatoes: ModelNameFileCrop=FileCrop_Vegetables; CropName=Tomatoes; StoreItemName=ProductStore.Tomatoes; ProportionKept=0.8; TreesPerHa=0; UnitsToHaConverter=0; OnPartialResourcesAvailableAction=2
              LabourRequirement: LabourPerUnit=7; UnitSize=1; WholeUnitBlocks=false; UnitType=1; MinimumPerPerson=1; MaximumPerPerson=100; LabourShortfallAffectsActivity=true; ApplyToAll=false
                LabourFilterGroup Female
                  LabourFilter: Parameter=1; Operator=0; Value=Female
                  LabourFilterGroup Male
                    LabourFilter: Parameter=1; Operator=0; Value=Male
              CropActivityManageProduct Grow cucumbers: ModelNameFileCrop=FileCrop_Vegetables; CropName=Cucumber; StoreItemName=ProductStore.Cucumbers; ProportionKept=0.8; TreesPerHa=0; UnitsToHaConverter=0; OnPartialResourcesAvailableAction=2
                LabourRequirement: same as Hired Labour.Simple.CLEM.Activities.Manage Vegetables.Grow tomatoes.LabourRequirement
              Memo
                The crop yield from external data is reduced by 20% to account for the mixed cropping method
          ActivityFolder Tomato Paste: OnPartialResourcesAvailableAction=0
            ResourceActivityProcess Make tomato paste: ResourceTypeProcessedName=ProductStore.Tomatoes; ResourceTypeCreatedName=ProductStore.TomatoPaste; ConversionRate=0.1; Reserve=0; OnPartialResourcesAvailableAction=2
              ResourceActivityFee Buy jars: AccountName=Finances.General account; PaymentStyle=1; Amount=0.5
              LabourRequirement: LabourPerUnit=10; UnitSize=1; WholeUnitBlocks=true; UnitType=0; MinimumPerPerson=1; MaximumPerPerson=100; LabourShortfallAffectsActivity=false; ApplyToAll=false
                LabourFilterGroup Female
                  LabourFilter: Parameter=1; Operator=0; Value=Female
                  LabourFilterGroup Male
                    LabourFilter: Parameter=1; Operator=0; Value=Male
            ResourceActivitySell Sell tomato paste: AccountName=Finances.General account; ResourceTypeName=ProductStore.TomatoPaste; AmountReserved=0; OnPartialResourcesAvailableAction=2
        CLEMFolder Reports
          ReportActivitiesPerformed
          ReportLabourRequirements
          ReportResourceLedger ProductsLedger: VariableNames=ProductStore
          ReportResourceLedger FinancesLedger: VariableNames=Finances
          ReportResourceLedger LabourLedger: VariableNames=Labour
          ReportResourceBalances
            VariableNames:
              [Clock].Today as Date
              Labour
              ProductStore
              Finances
          ReportResourceShortfalls
            VariableNames:
              Finances
              Labour
              ProductStore
              HumanFoodStore
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