Simulations: Version=31
  Simulation Wheat
    Clock: StartDate=1940-01-01; EndDate=1940-12-31
    Summary SummaryFile
    Weather: FileName=WeatherFiles\Goond.met
    SoilArbitrator
    Zone Field: Area=1; Slope=0
      Report: EventNames=[Clock].DoReport
        VariableNames:
          [Clock].Today
          [Soil].Swim3.SW
          [Soil].Swim3.psi
          sum([Soil].Swim3.SWmm) as TotalSW
      SurfaceOrganicMatter: PoolName=wheat_stubble; type=wheat; mass=500; standing_fraction=0; cnr=100; CriticalResidueWeight=2000; OptimumDecompTemp=20; MaxCumulativeEOS=20; CNRatioDecompCoeff=0.277; CNRatioDecompThreshold=25; TotalLeachRain=25; MinRainToLeach=10; CriticalMinimumOrganicC=0.004; DefaultCPRatio=0; DefaultStandingFraction=0; StandingExtinctCoeff=0.5; FractionFaecesAdded=0.5
        Pools:
          {PoolName=wheat_stubble, ResidueType=wheat, Mass=500, CNRatio=100, StandingFraction=0}
        ResidueTypes: LoadFromResource=ResidueTypes
      SoluteManager
      Soil: SoilType=Black Vertosol; LocalName=Waco; Site=Jimbour; NearestTown=Jimbour, Q 4352; Region=South East Queensland; NaturalVegetation=Grassland, mainly Qld bluegrass; Latitude=0; Longitude=0
        InitialWater: PercentMethod=FilledFromTop; FractionFull=0.5
        Water
          Thickness  BD    AirDry    LL15      DUL       SAT       KS
          150        1.02  0.13025   0.2605    0.521     0.588655  50
          150        1.03  0.198689  0.248362  0.496723  0.565677  50
          300        1.02  0.28      0.28      0.488438  0.557193  50
          300        1.02  0.28      0.28      0.480297  0.532787  50
          300        1.06  0.28      0.28      0.471584  0.527354  50
          300        1.11  0.28      0.28      0.457071  0.53118   50
          300        1.12  0.28      0.28      0.452332  0.521888  50
        SoilOrganicMatter: RootCN=40; RootWt=200; SoilCN=12.5; EnrACoeff=7.4; EnrBCoeff=0.2; OCUnits=Total
          Thickness  OC    FBiom  FInert
          150        1.04  0.025  0.4
          150        0.89  0.02   0.6
          300        0.89  0.015  0.8
          300        0.89  0.01   0.9
          300        0.77  0.01   0.95
          300        0.45  0.01   0.95
          300        0.27  0.01   0.95
          300        0.22  0.01   0.95
          300        0.16  0.01   0.95
          300        0.13  0.01   0.95
          300        0.12  0.01   0.95
        Analysis: PHUnits=Water; BoronUnits=HotWater
          Thickness  EC    PH
          150        0.2   8.4
          150        0.25  8.8
          300        0.31  9
          300        0.4   9.2
          300        0.59  9.2
          300        0.84  9.1
          300        0.93  9
          300        1.01  9
          300        1.06  8.9
          300        1.05  8.9
          300        1.01  8.9
        Sample: NO3Units=ppm; NH4Units=ppm; SWUnits=Volumetric; OCUnits=Total; PHUnits=Water
          Thickness  NO3    NH4
          150        6.503  0.599004
          150        2.101  0.100001
          300        2.101  0.100001
          300        1.701  0.100001
          300        1.701  0.100001
          300        1.701  0.100001
          300        1.701  0.100001
          300        1.701  0.100001
          300        1.701  0.100001
          300        1.701  0.100001
          300        1.701  0.100001
        LayerStructure: Thickness=[10, 20, 30, 40, 100, 200, 300, 300, 300, 300, 200]
        Swim3: Salb=0.13; CN2Bare=75; CNRed=20; CNCov=0.8; KDul=0.1; PSIDul=-100; VC=true; DTMin=0; DTMax=1440; MaxWaterIncrement=10; SpaceWeightingFactor=0; SoluteSpaceWeightingFactor=0; Diagnostics=false
          SwimSoluteParameters: Dis=15; Disp=1; A=1; DTHP=1
            zero: DTHC, WaterTableCl, WaterTableNO3, WaterTableNH4, WaterTableUrea, WaterTableTracer, WaterTableMineralisationInhibitor, WaterTableUreaseInhibitor, WaterTableNitrificationInhibitor, WaterTableDenitrificationInhibitor
            Thickness  NO3Exco  NO3FIP  NH4Exco  NH4FIP  UreaExco  UreaFIP  ClExco  ClFIP
            100        0        1       100      1       0         1        0       1
            100        0        1       100      1       0         1        0       1
            100        0        1       100      1       0         1        0       1
        SoilNitrogen: fom_type=[default, manure, mucuna, lablab, shemp, stable]; fract_carb=[0.2, 0.3, 0.54, 0.57, 0.45, 0]; fract_cell=[0.7, 0.3, 0.37, 0.37, 0.47, 0.1]; fract_lign=[0.1, 0.4, 0.09, 0.06, 0.08, 0.9]
        CERESSoilTemperature
  DataStore
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