Simulations: Version=24
  Memo TitlePage
    # APSIM Barley Model

    _Khaembah E.N., Zyskowski, R.F. and Brown, H.E._

    The APSIM Barley Model has been developed using the Plant Modelling Framework (PMF) of Brown et al. (2014). This framework provides a library of plant organ and process submodels that can be coupled, at runtime, to construct a model in much the same way that models can be coupled to construct a simulation. This means that dynamic composition of lower level process and organ classes (e.g. photosynthesis, leaf) into larger constructions (e.g. maize, Barley, sorghum) can be achieved by the model developer without additional coding.

    The model consists of:

    * A phenology model to simulate development between growth phases
    * A structure model to simulate plant morphology
    * A collection of organs to simulate the various plant parts
    * An arbitrator to allocate resources (N, biomass) to various plant organs.
  Memo References
    •	Alzueta I, Abeledo LG, Mignonea CM, Miralles DJ 2012. Differences between Barley and barley in leaf and tillering coordination under contrasting nitrogen and sulfur conditions. Europ. J. Agron 4: 92-102.

    •	Brown HE, Huth NI, Holzworth DP et al. 2014. "Plant Modelling Framework: Software for building and running crop models on the APSIM platform. Environ Modelling & Software 62: 385-398.

    •	De Ruiter JM 1999. Yield and quality of malting barley (Hordeum vulgare L. ‘Valetta') in response to irrigation and nitrogen fertilisation. NZ J. Crop and Hort.Sci 4: 307-317
    •	Goyne PJ, Hammer GL, Meinke H, Milroy SP, Hare JM 1996. Development and use of a barley crop simulation model to evaluate production management strategies in north-eastern Australia. Aust. J. Agric. Res. 47: 997-1015.

    •	Jamieson PD, Munro CA 1999. A simple method for the phenological evaluation of new cereal cultivars. Proceeding of the 29th Agronomy Society of New Zealand 29: 63-68.

    •	Jamieson PD, Martin RJ, Francis GS 1995. Drought influences on grain yield of barley, Barley, and maize. New Zealand Journal of Crop and Horticultural Science 23: 55-66

    •	Jamieson PD, Francis GS, Wilson DR, Martin RJ 1994. Effects of water deficits on evapotranspiration from barley. Agricultural and Forest Meteorology 76 (1995) 41-58

    •	Jamieson PD, Martin RJ, Francis GS, Wilson DR 1995. Drought effects on biomass production and radiation use efficiency in barley. Field Crops Research 43: 77-86

    •	Juskiw PE, Jame YW, Kryzanowski L 2001. Phenological development of spring barley in a short-season growing area. Agronomy Journal 93: 370-379.

    •	Kirby EJM 1995. Factors affecting rate of leaf emergence in barley and Barley. Crop Science 35: 11-19.

    •	Mirschel W, Wenkel K, Schultz A, Pommerening J, Verch G 2005. Dynamic phenological model for winter rye and winter barley.  Europ. J. Agron 23: 123-135.

    •	Sonego M, Jamieson PD, Moot DJ, Martin RJ 1997. Phenological development of oat crops in response to sowing dates. Proceedings Agronomy Society of NZ. Pp. 115-118.
  Replacements
    Report DailyReport: EventNames=[Clock].DoReport
      VariableNames:
        [Clock].Today
        ([Barley].Leaf.Transpiration + [Soil].SoilWater.Es + [MicroClimate].interception) as ET
        [Barley].AboveGround.N
        [Barley].AboveGround.Wt
        [Barley].AboveGroundDead.N
        [Barley].AboveGroundDead.Wt
        [Barley].AboveGroundLive.N
        [Barley].AboveGroundLive.Wt
        [Barley].Ear.N
        [Barley].Ear.Nconc
        [Barley].Ear.Wt
        [Barley].Grain.N
        [Barley].Grain.NConc
        [Barley].Grain.Number
        [Barley].Grain.Size
        [Barley].Grain.Wt
        [Barley].Leaf.AppearedCohortNo
        [Barley].Leaf.CoverDead
        [Barley].Leaf.CoverGreen
        [Barley].Leaf.CoverTotal
        [Barley].Leaf.Dead.N
        [Barley].Leaf.Dead.NConc
        [Barley].Leaf.Dead.Wt
        [Barley].Leaf.DeadCohortNo
        [Barley].Leaf.ExpandedCohortNo
        [Barley].Leaf.Fw
        [Barley].Leaf.Height
        [Barley].Leaf.InitialisedCohortNo
        [Barley].Leaf.LAI
        [Barley].Leaf.Live.N
        [Barley].Leaf.Live.NConc
        [Barley].Leaf.Live.Wt
        [Barley].Leaf.SenescingCohortNo
        [Barley].Leaf.SpecificArea
        [Barley].Phenology.CurrentPhaseName
        [Barley].Phenology.CurrentStageName
        [Barley].Phenology.FlagLeafDAS.Value()
        [Barley].Phenology.FloweringDAS.Value()
        [Barley].Phenology.MaturityDAS.Value()
        [Barley].Phenology.Stage
        [Barley].Phenology.Zadok.Stage
        [Barley].Root.N
        [Barley].Root.Nconc
        [Barley].Root.Wt
        [Barley].SowingData.Cultivar
        [Barley].Spike.Live.StorageWt
        [Barley].Spike.N
        [Barley].Spike.NConc
        [Barley].Spike.Wt
        [Barley].Stem.Live.StorageWt
        [Barley].Stem.N
        [Barley].Stem.NConc
        [Barley].Stem.PercentWSC
        [Barley].Stem.Wt
        [Barley].StemPlusSpike.N
        [Barley].StemPlusSpike.Wt
        [Barley].Structure.FinalLeafNumber.Value()
        [Barley].Structure.FinalLeafNumber.ValueToHold.PhotoPLeaves.Value()
        [Barley].Structure.HaunStage.Value()
        [Barley].Structure.Height
        [Barley].Structure.LeafTipsAppeared
        [Barley].Structure.MainStemPopn
        [Barley].Structure.MeanTillerGrowthRate.Value()
        [Barley].Structure.TotalStemPopn
        [Barley].Total.N
        [Barley].Total.Wt
        [Soil].SoilNitrogen.mineral_n
        [Soil].SoilWater.SW
        [Soil].SoilWater.SWmm
        [SurfaceOrganicMatter].Wt
        sum([Soil].SoilNitrogen.mineral_n) as ProfileN
        sum([Soil].SoilWater.SWmm) as ProfileWater
    Report HarvestReport: EventNames=[Barley].Harvesting
      VariableNames:
        [Clock].Today
        [Barley].Phenology.CurrentPhaseName
        [Barley].Phenology.CurrentStageName
        [Barley].Phenology.FlagLeafDAS.Value()
        [Barley].Phenology.FloweringDAS.Value()
        [Barley].Phenology.MaturityDAS.Value()
        [Barley].Grain.Wt
        [Barley].Grain.N
        [Barley].Grain.Number
        [Barley].Grain.Nconc
        [Barley].AboveGround.Wt
        [Barley].AboveGround.N
        [Barley].Grain.Protein
        [Barley].Grain.Size
        [Barley].Structure.HaunStage.Value()
        [Barley].Structure.FinalLeafNumber.Value()
        [Barley].Structure.MainStemPopn
        [Barley].SowingData.Cultivar
        [Barley].SowingDate.DayOfYear
        [Barley].Leaf.CohortMaxSize
        [Clock].StartDate
    Plant Barley: CropType=Barley
      Memo TitlePage
        # The APSIM Barley Model

        _Brown, H.E., Huth, N.I. and Holzworth, D.P._

        The APSIM Barley model has been developed using the Plant Modelling Framework (PMF) of [brown_plant_2014]. This new framework provides a library of plant organ and process submodels that can be coupled, at runtime, to construct a model in much the same way that models can be coupled to construct a simulation. This means that dynamic composition of lower level process and organ classes (e.g. photosynthesis, leaf) into larger constructions (e.g. maize, Barley, sorghum) can be achieved by the model developer without additional coding.

        The model consists of:

        * a phenology model to simulate development between developmental phases
        * a structure model to simulate plant morphology
        * a collection of organs to simulate the various plant parts
        * an arbitrator to allocate resources (N, biomass) to the various plant organs
      OrganArbitrator Arbitrator
        RelativeAllocation NArbitrator
        RelativeAllocation DMArbitrator
      Phenology: DaysAfterSowing=0
        Memo
          Barley exhibits a range of developmental responses to environment and these are strongly influences by genotype characteristics.
          Temperature effects development increasing development rates and decreasing phase durations as temperatures increase.  Theset affects are captured by thermal time, .  However, Barley also exhibits vernalisation and photoperiod sensitivities in its Vegetative phase and further photoperiod sensitivity in the EarlyReproducivePhase.  Photoperiod responses are seen as a reduction in the length of a phase for a photoperiod sensitive genotype in response to a longer photoperiod.  Vernalisation responses are more complicated as they are driven by temperature but interact with photoperiod.  For vernalisation sensitive varieties (Winter types) exposure to cool temperatures or short photoperiods during the Vegetative phase will reduce the thermal time duration of the vegetative phase.

          We draw on the Kirby Framework to capture these vernalisation and photoperiod responses.  This framework assumes that the timing of anthesis is a result of the timing of flag leaf and an additional thermal time passage from there to anthesis.  It also assumes the timing of flag leaf is a result of the Final Leaf Number which sets a target, and leaf appearance rate, which sets the rate of progress toward this target.  Leaf appearance rate is a function of Thermal time and a genotype specific Phyllochron which changes with Haun stage as described by [Jamieson_LeafAppearance_1995].

          Final Leaf Number (FLN) is modeled as the sum of three numbers:

          FLN = MinLeafNumber + VernalLeaves + PhotoLeaves

          Where MinLeafNumber is the number of leaves that a Barley crop will produce when vernalisation is satisified early in the crops duration (before 2nd true leaf) and it is grown in a long photoperiod..  VernalLeaves are the number of leaves that are added due to vernalisation effects.  For insensitive varieties this will always be zero but this is potentially a larger number for sensitivie varieties and the number progresively decreases as the crop encounters more vernalisation.  PhotoLeaves are the number of leaves that are added to the minimum leaf number as a result of short day exposure.  For insensitive varieties this will be zero but is potential larger for more sensitivie varieties and decreases as day length increases.  More detailed explinations of the components of phenology are provided below.
        DivideFunction MeanTemp
          AddFunction TempSum
            VariableReference MaxT: VariableName=[Weather].MaxT
            VariableReference MinT: VariableName=[Weather].MinT
          Constant Two: FixedValue=2
        AirTemperatureFunction ThermalTime
          XYPairs: X=[0, 26, 37]; Y=[0, 26, 0]
          Memo
            Thermal time determines the rate of developmental progress through many of the crops phases and is used by organs to determing potential growth rates.
        MultiplyFunction DailyVernalisation
          Memo
            Vernalisation responses are based on those described by [Brown_Anthesis_2013].   Vernalisation is assumed to be related to the expression of the Vrn1 Gene.  Its experssion is accumulated daily and daily upregulation as a function of development (DeltaHaunStage) and a TempResponseProfile that declines exponentially from a maximum at 1<sup>o</sup>C to zero at 0<sup>o</sup>C and at 18<sup>o</sup>C.
          VariableReference DeltaHaunStage: VariableName=[Structure].DeltaHaunStage
          AirTemperatureFunction TempResponseProfile
            XYPairs
              X=[0, 1, 2, 3, 4, 5, 6, 7, 8, 9, 10, 11, 12, 13, 14, 15, 16, 17, 18, 19, 20, 30, 32]
              Y=[0, 1.205, 1.037, 0.893, 0.768, 0.661, 0.569, 0.49, 0.422, 0.363, 0.312, 0.269, 0.231, 0.199, 0.171, 0.148, 0.127, 0.109, 0.094, 0.081, 0, 0, -0.5]
        PhotoperiodFunction Photoperiod: Twilight=-6; DayLength=0
        PhaseLookup PerceivedPhotoPeriod
          PhaseLookupValue ApexBelowGround: Start=Germination; End=Emergence
            Constant Photoperiod: FixedValue=0; Units=h
          PhaseLookupValue ApexAboveGround: Start=Emergence; End=HarvestRipe
            VariableReference Photoperiod: VariableName=[Phenology].Photoperiod.Value()
        MinimumFunction Vrn1
          Memo
            Vrn1 accumulation begins when Vrn4 experssion is down regulated to zero and stops, assuming vernalisation saturation, at a value of 1
          Constant Saturation: FixedValue=1; Units=Relative Experssion
          AccumulateFunction CurrentExpression: StartStageName=Germination; EndStageName=TerminalSpikelet; FractionRemovedOnCut=0; FractionRemovedOnHarvest=0; FractionRemovedOnGraze=0; FractionRemovedOnPrune=0
            LessThanFunction Vernalisation
              VariableReference If_Vrn4: VariableName=[Phenology].Vrn4.Value()
              VariableReference IsLessThanLag: VariableName=[Phenology].VernLag.Value()
              Constant Return_Zero: FixedValue=0
              VariableReference elseReturn_Vernalisation: VariableName=[Phenology].DailyVernalisation.Value()
        MinimumFunction Vrn4
          VariableReference MaxExpression: VariableName=[Phenology].VernLag.Value()
          AccumulateFunction CurrentExpression: StartStageName=Germination; EndStageName=TerminalSpikelet; FractionRemovedOnCut=0; FractionRemovedOnHarvest=0; FractionRemovedOnGraze=0; FractionRemovedOnPrune=0
            VariableReference VernalisationConditioning: VariableName=[Phenology].DailyVernalisation.Value()
        Constant MinimumLeafNumber: FixedValue=8; Units=Leaves
          Memo
            Number of leaves the plant will produce when fully vernalised early and grown in long photoperiod
        Constant VrnSensitivity: FixedValue=0; Units=Leaves
          Memo
            The difference between Inherent earlyness leaf number and the number of leaves produced when the plant is unvernalised and grown in long photoperiod
        Constant VernLag: FixedValue=1; Units=Unitless
          Memo
            The amount of vernalising temperature required before vernalisation response will be evident.  Value of relative to the amount offl vernalisation temperature required from the end of the lag until vernalisation saturation.  A value of 0 means there is no lag, a value of 1 means the lag is the same (in vernal time) as the vernalisation requirement and a value of 2 means the lag is twice as long as the vernalisation response phase
        Constant PpSensitivity: FixedValue=4; Units=Leaves
          Memo
            The reduction in leaf number going from 8 to 16 h Pp
        Constant EarlyReproductivePpSensitivity: FixedValue=0
          Memo
            The phyllochrons duration for the plant to go from flag leaf ligual appearance at 16 h Pp compared to the phyllochron duration for the same phase at 8 h Pp.
        Constant EarlyReproductiveLongDayBase: FixedValue=1.5
          Memo
            The phyllochrons duration for the plant to go from flag leaf ligual appearance at 16 h Pp.
        GerminatingPhase Germinating: Start=Sowing; End=Germination
        EmergingPhase Emerging: Start=Germination; End=Emergence; ShootLag=40; ShootRate=1.5
          VariableReference ThermalTime: VariableName=[Phenology].ThermalTime.Value()
        GenericPhase Vegetative: Start=Emergence; End=TerminalSpikelet
          Memo
            The duration of the vegetative phase is set by a target Haun Stage for the occurence of Terminal Spikelet and the rate of leaf appearance.
          VariableReference ThermalTime: VariableName=[Phenology].ThermalTime.Value()
          MultiplyFunction Target
            VariableReference Phyllochron: VariableName=[Structure].MeanPhyllochron.Value()
            VariableReference HSTS: VariableName=[Structure].HaunStageTerminalSpikelet.Value()
          Memo Memo1
            HaunStageTerminalSpiklet decreases as vernalisation is accumulated and as photoperiod extends, capturing the effect of these responses on the duration of the Vegetative phase
        LeafAppearancePhase StemElongation: Start=TerminalSpikelet; End=FlagLeaf
          Memo
            The Final leaf number is fixed at Terminal Spikelet and leaves contune to appear at a rate set by thermal time and phyllochron until flag leaf liguale appears and this phase is completed.
          VariableReference ThermalTime: VariableName=[Phenology].ThermalTime.Value()
        GenericPhase EarlyReproductive: Start=FlagLeaf; End=Flowering
          VariableReference ThermalTime: VariableName=[Phenology].ThermalTime.Value()
          MultiplyFunction Target
            VariableReference Phyllochron: VariableName=[Structure].Phyllochron.BasePhyllochron.Value()
            AddFunction Phyllochrons
              VariableReference LongDayBase: VariableName=[Phenology].EarlyReproductiveLongDayBase.Value()
              MultiplyFunction IncreaseDueToShortPhotoPeriod
                LinearInterpolationFunction PhotoPeriodResponse: XProperty=[Phenology].Photoperiod.Value()
                  XYPairs: X=[11, 16]; Y=[1, 0]
                VariableReference PpSensitivity: VariableName=[Phenology].EarlyReproductivePpSensitivity.Value()
        GenericPhase GrainDevelopment: Start=Flowering; End=StartGrainFill
          Constant Target: FixedValue=120
          VariableReference ThermalTime: VariableName=[Phenology].ThermalTime.Value()
        GenericPhase GrainFilling: Start=StartGrainFill; End=EndGrainFill
          Constant Target: FixedValue=545
          VariableReference ThermalTime: VariableName=[Phenology].ThermalTime.Value()
        GenericPhase Maturing: Start=EndGrainFill; End=Maturity
          Constant Target: FixedValue=35
          VariableReference ThermalTime: VariableName=[Phenology].ThermalTime.Value()
        GenericPhase Ripening: Start=Maturity; End=HarvestRipe
          Constant Target: FixedValue=300
          VariableReference ThermalTime: VariableName=[Phenology].ThermalTime.Value()
        EndPhase ReadyForHarvesting: Start=HarvestRipe; End=Unused
          VariableReference ThermalTime: VariableName=[Phenology].ThermalTime.Value()
        ZadokPMF Zadok
        OnEventFunction FlagLeafDAS: SetEvent=FlagLeaf; ReSetEvent=never
          Memo
            A function is used to provide flowering date as days after sowing(DAS).
          Constant PreEventValue: FixedValue=0
          VariableReference PostEventValue: VariableName=[Phenology].DaysAfterSowing
        OnEventFunction FloweringDAS: SetEvent=Flowering; ReSetEvent=never
          Memo
            A function is used to provide flowering date as days after sowing(DAS).
          Constant PreEventValue: FixedValue=0
          VariableReference PostEventValue: VariableName=[Phenology].DaysAfterSowing
        OnEventFunction MaturityDAS: SetEvent=Maturity; ReSetEvent=never
          Memo
            A function is used to provide maturity date as days after sowing(DAS).
          Constant PreEventValue: FixedValue=0
          VariableReference PostEventValue: VariableName=[Phenology].DaysAfterSowing
      Structure: Initialised=false; Germinated=false; Emerged=false; CohortToInitialise=0; TipToAppear=0; ApexNum=0
        VariableReference ThermalTime: VariableName=[Phenology].ThermalTime.Value()
        MultiplyFunction Phyllochron
          Memo Rational
            This is the thermal time between the emergence of leaf tips.  The model used here is based on [Jamieson_SIRIUS_1998] where leaf appearace could be described by a base phyllochron determined between leaves 2 and 7 and a phyllochron that was 70% of base phyllochron for leaves < 2 and 130% of base phyllochron for leaves > 7
          LinearInterpolationFunction LeafStageFactor: XProperty=[Leaf].AppearedCohortNo
            XYPairs: X=[0, 2, 3, 7, 8, 11, 12]; Y=[0.75, 0.75, 1, 1, 1.4, 1.4, 1.4]
          Constant BasePhyllochron: FixedValue=80; Units=oC.d
          LinearInterpolationFunction PhotoPeriodEffect: XProperty=[Phenology].Photoperiod.Value()
            XYPairs: X=[8, 12, 14]; Y=[1.6, 1, 1]
        MultiplyFunction BranchingRate
          Memo
            Potential branching rate is determined by the commonly observed pattern of tillering in Barley, in which each tiller emerges with the third leaf on its parent axis (e.g. first tiller emerges at the same time as the third leaf on the main stem, the first secondary tiller appears with the third leaf on tiller 1).  This is described as a simple function of main stem leaf number.
          PhaseLookup PotentialBranchingRate
            PhaseLookupValue Vegetative: Start=Emergence; End=TerminalSpikelet
              LinearInterpolationFunction PotentialBranchingRate: XProperty=[Structure].LeafTipsAppeared
                XYPairs: X=[1, 2.99, 3, 4, 5, 6, 7, 8]; Y=[0, 0, 1, 2, 4, 7, 12, 20]
            PhaseLookupValue Reproductive: Start=TerminalSpikelet; End=HarvestRipe
              Constant Zero: FixedValue=0
                MinimumFunction StressFactors
                  LinearInterpolationFunction NitrogenEffect: XProperty=[Arbitrator].FN
                    Memo
                      Inadequate Nitrogen supply is assumed to affect tillering prior to any effect on photosynthesis or leaf size.
                    XYPairs: X=[0.5, 2, 3]; Y=[0, 1, 1]
                  LinearInterpolationFunction CoverEffect: XProperty=[Leaf].CoverTotal
                    Memo
                      Tillering is said to cease once a threshold fraction of incoming radiation has been achieved.  This captures shading effects on tillering described by [evers2006cessation].
                    XYPairs: X=[0, 0.9, 1]; Y=[1, 1, 0]
                  LinearInterpolationFunction WaterStressEffect: XProperty=[Root].WaterTensionFactor
                    XYPairs: X=[0, 1]; Y=[0, 1]
          MinimumFunction StressFactors
            LinearInterpolationFunction NitrogenEffect: XProperty=[Arbitrator].FN
              Memo
                Inadequate Nitrogen supply is assumed to affect tillering prior to any effect on photosynthesis or leaf size.
              XYPairs: X=[0.5, 2, 3]; Y=[0, 1, 1]
            LinearInterpolationFunction CoverEffect: XProperty=[Leaf].CoverTotal
              Memo
                Tillering is said to cease once a threshold fraction of incoming radiation has been achieved.  This captures shading effects on tillering described by [evers2006cessation].
              XYPairs: X=[0, 0.15, 0.25]; Y=[1, 1, 0]
            LinearInterpolationFunction WaterStressEffect: XProperty=[Root].WaterTensionFactor
              XYPairs: X=[0, 1]; Y=[0, 1]
        PhaseLookup BranchMortality
          PhaseLookupValue MortalityPhase: Start=FlagLeaf; End=Flowering
            MultiplyFunction Mortality
              LinearInterpolationFunction MortalityPerDegDay: XProperty=[Structure].MeanTillerGrowthRate.Value()
                XYPairs: X=[0, 0.005]; Y=[0.002, 0]
              VariableReference ThermalTime: VariableName=[Phenology].ThermalTime.Value()
        HeightFunction HeightModel
          LinearInterpolationFunction PotentialHeight: XProperty=[Phenology].Stage
            XYPairs: X=[3, 4, 5, 6, 7]; Y=[10, 200, 1000, 1100, 1200]
          LinearInterpolationFunction WaterStress: XProperty=[Leaf].Fw
            XYPairs: X=[0.3, 1]; Y=[0, 1]
        MovingAverageFunction MeanTillerGrowthRate: NumberOfDays=5; InitialValue=0
          Memo
            This is calculated to represent the supply of asslimilate to individual tillers over the past 5 days to use as an index to determine tiller mortality.  When tiller numbers are high or total crop assimilate supply is small there will not be enough assimilate to maintain all of the tillers so the model will senesce some.
          DivideFunction TillerGrowthRate
            VariableReference DailyGrowth: VariableName=[Arbitrator].DM.TotalFixationSupply
            VariableReference ThermalTime: VariableName=[Phenology].ThermalTime.Value()
            VariableReference StemPopulation: VariableName=[Structure].TotalStemPopn
        MovingAverageFunction MeanPhyllochron: NumberOfDays=300; InitialValue=80
          VariableReference Phyllochron: VariableName=[Structure].Phyllochron.Value()
        HoldFunction FinalLeafNumber: WhenToHold=TerminalSpikelet
          AddFunction FinalNodeNumber
            VariableReference MinLeafNumber: VariableName=[Phenology].MinimumLeafNumber.Value()
            MultiplyFunction VernalLeaves
              VariableReference UnVernalisedLeaves: VariableName=[Phenology].VrnSensitivity.Value()
              SubtractFunction VernalisationReductionFactor
                Constant One: FixedValue=1
                VariableReference RelativeVrn1Expression: VariableName=[Phenology].Vrn1.Value()
            MultiplyFunction PhotoPLeaves
              VariableReference ShortPpLeaves: VariableName=[Phenology].PpSensitivity.Value()
              LinearInterpolationFunction PhotoPeriodReductionFactor: XProperty=[Phenology].Photoperiod.Value()
                XYPairs: X=[10, 16]; Y=[1, 0]
        ExpressionFunction HaunStageTerminalSpikelet: Expression=[Structure].FinalLeafNumber.Value() * 0.6708 - 1.1
          Memo
            The Haun stage at which Terminal Spikelet occurs is determined from final leaf number using the approach described in [Brown_Anthesis_2013].  Coefficients for barley come from [Paynter_2004].
        AddFunction HaunStage
          VariableReference AppearedLeaves: VariableName=[Leaf].ExpandedCohortNo
          VariableReference ProportionOfExpandingLeaf: VariableName=[Leaf].NextExpandingLeafProportion
        Constant StemSenescenceAge: FixedValue=0
      ReproductiveOrgan Grain: GrowthRespiration=0; MaintenanceRespiration=0; RipeStage=Ripe
        HoldFunction NumberFunction: WhenToHold=Flowering
          MultiplyFunction GrainNumber
            Constant GrainsPerGramOfStem: FixedValue=35; Units=grains
            VariableReference StemMass: VariableName=[StemPlusSpike].Wt
        Constant InitialGrainProportion: FixedValue=0.05
          Constant InitialGrainProportion: FixedValue=0.05
        Constant MaximumPotentialGrainSize: FixedValue=0.043; Units=g
        PhaseLookup DMDemandFunction
          PhaseLookupValue InitialPhase: Start=Flowering; End=StartGrainFill
            FillingRateFunction
              VariableReference NumberFunction: VariableName=[Grain].NumberFunction.Value()
              VariableReference FillingDuration: VariableName=[Phenology].GrainDevelopment.Target.Value()
              VariableReference ThermalTime: VariableName=[Phenology].ThermalTime.Value()
              MultiplyFunction PotentialSizeIncrement
                VariableReference InitialProportion: VariableName=[Grain].InitialGrainProportion.Value()
                VariableReference MaximumSize: VariableName=[Grain].MaximumPotentialGrainSize.Value()
          PhaseLookupValue LinearPhase: Start=StartGrainFill; End=EndGrainFill
            FillingRateFunction
              VariableReference NumberFunction: VariableName=[Grain].NumberFunction.Value()
              VariableReference FillingDuration: VariableName=[Phenology].GrainFilling.Target.Value()
              VariableReference ThermalTime: VariableName=[Phenology].ThermalTime.Value()
              MultiplyFunction PotentialSizeIncrement
                SubtractFunction ProportionLinearPhase
                  Constant One: FixedValue=1
                  VariableReference InitialProportion: VariableName=[Grain].InitialGrainProportion.Value()
                VariableReference MaximumSize: VariableName=[Grain].MaximumPotentialGrainSize.Value()
        Constant MinimumNConc: FixedValue=0.0123
        Constant MaxNConcDailyGrowth: FixedValue=0.03
        Constant MaximumNConc: FixedValue=0.03
        PhaseLookup NFillingRate
          PhaseLookupValue GrainFilling: Start=Flowering; End=EndGrainFill
            FillingRateFunction
              VariableReference NumberFunction: VariableName=[Grain].NumberFunction.Value()
              AddFunction FillingDuration
                VariableReference FloweringToGrainFilling: VariableName=[Phenology].GrainDevelopment.Target.Value()
                VariableReference GrainFilling: VariableName=[Phenology].GrainFilling.Target.Value()
              VariableReference ThermalTime: VariableName=[Phenology].ThermalTime.Value()
              MultiplyFunction PotentialSizeIncrement
                VariableReference MaximumSize: VariableName=[Grain].MaximumPotentialGrainSize.Value()
                VariableReference MaximumNConc: VariableName=[Grain].MaximumNConc.Value()
        Constant WaterContent: FixedValue=0.12
        AccumulateFunction AccumThermalTime: StartStageName=Flowering; EndStageName=Maturity; FractionRemovedOnCut=0; FractionRemovedOnHarvest=0; FractionRemovedOnGraze=0; FractionRemovedOnPrune=0
          VariableReference DailyThermalTimeValue: VariableName=[Phenology].ThermalTime.Value()
        ExpressionFunction Protein
          Expression=([Grain].Live.N + [Grain].Dead.N)/([Grain].Live.Wt + [Grain].Dead.Wt) * 100 * 5.71
        BiomassRemoval BiomassRemovalDefaults
          OrganBiomassRemovalType Harvest: FractionLiveToRemove=1; FractionDeadToRemove=0; FractionLiveToResidue=0; FractionDeadToResidue=0
          OrganBiomassRemovalType Cut: FractionLiveToRemove=1; FractionDeadToRemove=0; FractionLiveToResidue=0; FractionDeadToResidue=0
          OrganBiomassRemovalType Prune: FractionLiveToRemove=0; FractionDeadToRemove=0; FractionLiveToResidue=0.8; FractionDeadToResidue=0
          OrganBiomassRemovalType Graze: FractionLiveToRemove=0.6; FractionDeadToRemove=0; FractionLiveToResidue=0.2; FractionDeadToResidue=0
          OrganBiomassRemovalType Thin: FractionLiveToRemove=0; FractionDeadToRemove=0; FractionLiveToResidue=0.05; FractionDeadToResidue=0
        Constant DMConversionEfficiency: FixedValue=1
        Constant RemobilisationCost: FixedValue=0
        Constant CarbonConcentration: FixedValue=0.4
      Root: GrowthRespiration=0; MaintenanceRespiration=0
        Constant KLModifier: FixedValue=1
        Constant SoilWaterEffect: FixedValue=1
        Constant MaxDailyNUptake: FixedValue=20
        Constant SenescenceRate: FixedValue=0.005
        Constant StructuralFraction: FixedValue=1
        Constant MaximumRootDepth: FixedValue=1000000
        Constant MaximumNConc: FixedValue=0.01
        Constant MinimumNConc: FixedValue=0.01
        PhaseBasedSwitch NitrogenDemandSwitch: Start=Germination; End=Maturity
        BiomassRemoval BiomassRemovalDefaults
          OrganBiomassRemovalType Harvest: FractionLiveToRemove=0; FractionDeadToRemove=0; FractionLiveToResidue=0.2; FractionDeadToResidue=0
          OrganBiomassRemovalType Cut: FractionLiveToRemove=0; FractionDeadToRemove=0; FractionLiveToResidue=0.3; FractionDeadToResidue=0
          OrganBiomassRemovalType Prune: FractionLiveToRemove=0; FractionDeadToRemove=0; FractionLiveToResidue=0.1; FractionDeadToResidue=0
          OrganBiomassRemovalType Graze: FractionLiveToRemove=0; FractionDeadToRemove=0; FractionLiveToResidue=0.15; FractionDeadToResidue=0
          OrganBiomassRemovalType Thin: FractionLiveToRemove=0; FractionDeadToRemove=0; FractionLiveToResidue=0.05; FractionDeadToResidue=0
        Constant KNO3: FixedValue=0.02
        Constant KNH4: FixedValue=0.01
        Constant InitialDM: FixedValue=0.005; Units=g/plant
        Constant SpecificRootLength: FixedValue=105; Units=m/g
        MultiplyFunction RootFrontVelocity
          PhaseLookup PotentialRootFrontVelocity
            PhaseLookupValue PreEmergence: Start=Germination; End=Emergence
              Constant Value: FixedValue=5; Units=mm/d
            PhaseLookupValue PostEmergence: Start=Emergence; End=Maturity
              Constant Value: FixedValue=20; Units=mm/d
          WeightedTemperatureFunction TemperatureFactor: MaximumTemperatureWeighting=0.5
            XYPairs: X=[0, 15, 25, 35]; Y=[0, 1, 1, 0]
          LinearInterpolationFunction WaterFactor: XProperty=[SoilWaterScale]
            SoilWaterScale
            XYPairs: X=[0, 0.25, 1]; Y=[0, 1, 1]
        LinearInterpolationFunction NUptakeSWFactor: XProperty=[SoilWaterScale]
          SoilWaterScale
          XYPairs: X=[0, 1]; Y=[0, 1]
          Memo
            This is modelled in the same way as the old Barley model where potential N uptake is decreased as the soil dries as described by NUptakeSWFactor
        PartitionFractionDemandFunction DMDemandFunction
          PhaseLookup PartitionFraction
            PhaseLookupValue PreEmergence: Start=Germination; End=Emergence
              Constant Value: FixedValue=0
            PhaseLookupValue PreFlowering: Start=Emergence; End=Flowering
              LinearInterpolationFunction AgeFactor: XProperty=[Phenology].Stage
                XYPairs: X=[3, 4]; Y=[0.5, 0.2]
            PhaseLookupValue PostFlowering: Start=Flowering; End=EndGrainFill
              Constant Value: FixedValue=0.2
        Constant DMConversionEfficiency: FixedValue=1
        Constant MaintenanceRespirationFunction: FixedValue=1
        Constant RemobilisationCost: FixedValue=0
        Constant CarbonConcentration: FixedValue=0.4
      Leaf: MaxCover=1; Albedo=0.25; Gsmax=0.011; R50=150; MicroClimatePresent=true; KDead=0.3; MaximumMainStemLeafNumber=30
        zero: GrowthRespiration, MaintenanceRespiration, CurrentExpandingLeaf, StartFractionExpanded, FractionNextleafExpanded, DeadNodesYesterday, FRGR, PotentialEP, DMConversionEfficiency, TipsAtEmergence, CohortsAtInitialisation, FractionDied
        LeafCohort InitialLeaves[1]: DeltaWaterConstrainedArea=0; DeltaCarbonConstrainedArea=0; Rank=1; Area=200; MaintenanceRespiration=0
        LeafCohort InitialLeaves[2]: DeltaWaterConstrainedArea=0; DeltaCarbonConstrainedArea=0; Rank=2; Area=0; MaintenanceRespiration=0
        ArrayBiomass CohortArrayLive: Propertys=[[Leaf].Live]; ArraySize=[Leaf].MaxNodeNo
        ArrayBiomass CohortArrayDead: Propertys=[[Leaf].Dead]; ArraySize=[Leaf].MaxNodeNo
        LeafCohortParameters CohortParameters
          Constant NReallocationFactor: FixedValue=1
          Constant MaintenanceRespirationFunction: FixedValue=0
          Constant NRetranslocationFactor: FixedValue=0.03
          Constant DMReallocationFactor: FixedValue=0
          Constant DMRetranslocationFactor: FixedValue=0
          MinimumFunction CellDivisionStress
            LinearInterpolationFunction WaterStressEffect: XProperty=[Leaf].Fw
              XYPairs: X=[0.5, 1]; Y=[0.1, 1]
            LinearInterpolationFunction NitrogenStressEffect: XProperty=[Barley].Leaf.Fn
              XYPairs: X=[0, 0.5, 1]; Y=[0.1, 0.1, 1]
          MinimumFunction ExpansionStress
            LinearInterpolationFunction WaterStressEffect: XProperty=[Root].WaterTensionFactor
              XYPairs: X=[0.1, 1, 1.3]; Y=[0, 1, 1]
            LinearInterpolationFunction TemperatureEffect: XProperty=[Phenology].MeanTemp.Value()
              XYPairs: X=[0, 12, 14]; Y=[0, 1, 1]
            LinearInterpolationFunction NitrogenStressEffect: XProperty=[Barley].Leaf.Fn
              XYPairs: X=[0, 0.5, 1]; Y=[0.1, 0.1, 1]
          MultiplyFunction MaxArea
            Constant AreaLargestLeaves: FixedValue=2500; Units=mm^2
            LinearInterpolationFunction AgeFactor: XProperty=[Phenology].Stage
              XYPairs: X=[3, 3.6, 4.2, 5]; Y=[0.1, 0.5, 1, 0.1]
          MultiplyFunction GrowthDuration
            Constant Multiplier: FixedValue=1.3
            VariableReference Phyllochron: VariableName=[Structure].Phyllochron.Value()
          MultiplyFunction LagDuration
            LinearInterpolationFunction AgeFactor: XProperty=[Phenology].Stage
              XYPairs: X=[3, 4]; Y=[0.4, 1]
            SubtractFunction LastLeafDuration
              AddFunction ThermalTimeToRipe
                VariableReference EarlyReproductive: VariableName=[Phenology].EarlyReproductive.Target.Value()
                VariableReference GrainDevelopment: VariableName=[Phenology].GrainDevelopment.Target.Value()
                VariableReference GrainFilling: VariableName=[Phenology].GrainFilling.Target.Value()
                VariableReference Maturing: VariableName=[Phenology].Maturing.Target.Value()
                VariableReference Ripening: VariableName=[Phenology].Ripening.Target.Value()
              VariableReference SenescenceDuration: VariableName=[Leaf].CohortParameters.SenescenceDuration.Value()
          MultiplyFunction SenescenceDuration
            Constant Multiplier: FixedValue=6
            VariableReference Phyllochron: VariableName=[Structure].Phyllochron.Value()
          Constant DetachmentLagDuration: FixedValue=1000000
          Constant DetachmentDuration: FixedValue=1000000
          Constant RelativeBranchLeafSize: FixedValue=1
          LinearInterpolationFunction MaximumNConc: XProperty=[Phenology].Stage
            XYPairs: X=[3, 4, 6]; Y=[0.08, 0.05, 0.02]
          MultiplyFunction CriticalNConc
            LinearInterpolationFunction CriticalNConcAt350ppm: XProperty=[Phenology].Stage
              XYPairs: X=[3, 4, 6]; Y=[0.07, 0.04, 0.015]
            LinearInterpolationFunction CO2Factor: XProperty=[Weather].CO2
              XYPairs: X=[350, 700]; Y=[1, 0.93]
          LinearInterpolationFunction MinimumNConc: XProperty=[Phenology].Stage
            XYPairs: X=[3, 4, 6]; Y=[0.01, 0.005, 0.005]
          AddFunction DroughtInducedLagAcceleration
            Constant One: FixedValue=1
            MultiplyFunction Stress
              Constant StressResponseCoefficient: FixedValue=1
              LinearInterpolationFunction StressFactor: XProperty=[Leaf].Fw
                XYPairs: X=[0, 0.5]; Y=[0.5, 0]
          AddFunction DroughtInducedSenAcceleration: same as Replacements.Barley.Leaf.CohortParameters.DroughtInducedLagAcceleration
          LinearInterpolationFunction SpecificLeafAreaMax: XProperty=[Phenology].Stage
            XYPairs: X=[3, 4]; Y=[30000, 35000]
          LinearInterpolationFunction SpecificLeafAreaMin: XProperty=[Leaf].Fn
            XYPairs: X=[0.4, 1]; Y=[15000, 18000]
          Constant InitialNConc: FixedValue=0
          Constant StructuralFraction: FixedValue=0.5
          Constant StorageFraction: FixedValue=0
          Constant LeafSizeShapeParameter: FixedValue=0.3
          Constant SenessingLeafRelativeSize: FixedValue=1; Units=0-1
          MultiplyFunction ShadeInducedSenescenceRate
            LinearInterpolationFunction CoverEffect: XProperty=[Leaf].CohortCurrentRankCoverAbove
              XYPairs: X=[0, 0.9, 0.95, 1]; Y=[0, 0, 0.01, 0.03]
            VariableReference ThermalTime: VariableName=[Phenology].ThermalTime.Value()
          Constant RemobilisationCost: FixedValue=0
          Constant CarbonConcentration: FixedValue=0.4
        RUEModel Photosynthesis
          Constant RUE: FixedValue=1.5
          WeightedTemperatureFunction FT: MaximumTemperatureWeighting=0.75
            XYPairs: X=[0, 15, 25, 35]; Y=[0, 1, 1, 0]
          LinearInterpolationFunction FN: XProperty=[Leaf].Fn
            XYPairs: X=[0, 1, 1.5]; Y=[0, 1, 1]
          LinearInterpolationFunction FW: XProperty=[Leaf].Fw
            XYPairs: X=[0, 1, 1]; Y=[0, 1, 1]
          LinearInterpolationFunction FVPD: XProperty=[Photosynthesis].VPD
            XYPairs: X=[0, 10, 40]; Y=[1, 1, 0]
          RUECO2Function FCO2: PhotosyntheticPathway=C3
          VariableReference RadnInt: VariableName=[Leaf].RadIntTot
        Constant FrostFraction: FixedValue=0
        VariableReference ThermalTime: VariableName=[Phenology].ThermalTime.Value()
        MinimumFunction FRGRFunction
          VariableReference RUE_FT: VariableName=[Leaf].Photosynthesis.FT.Value()
          MinimumFunction Others
            VariableReference RUE_FN: VariableName=[Leaf].Photosynthesis.FN.Value()
            VariableReference RUE_FVPD: VariableName=[Leaf].Photosynthesis.FVPD.Value()
        BiomassRemoval BiomassRemovalDefaults
          OrganBiomassRemovalType Harvest: FractionLiveToRemove=0; FractionDeadToRemove=0; FractionLiveToResidue=0.3; FractionDeadToResidue=0.3
          OrganBiomassRemovalType Cut: FractionLiveToRemove=0.8; FractionDeadToRemove=0.8; FractionLiveToResidue=0; FractionDeadToResidue=0
          OrganBiomassRemovalType Prune: FractionLiveToRemove=0; FractionDeadToRemove=0; FractionLiveToResidue=0.6; FractionDeadToResidue=0.6
          OrganBiomassRemovalType Graze: FractionLiveToRemove=0.6; FractionDeadToRemove=0.6; FractionLiveToResidue=0.1; FractionDeadToResidue=0.1
          OrganBiomassRemovalType Thin: FractionLiveToRemove=0; FractionDeadToRemove=0; FractionLiveToResidue=0.05; FractionDeadToResidue=0.05
        Constant ExtinctionCoeff: FixedValue=0.5
        Constant StructuralFraction: FixedValue=0.5
        Constant DMConversionEfficiency: FixedValue=1
        Constant RemobilisationCost: FixedValue=0
        Constant CarbonConcentration: FixedValue=0.4
      GenericOrgan Spike
        PopulationBasedDemandFunction DMDemandFunction
          VariableReference ThermalTime: VariableName=[Phenology].ThermalTime.Value()
          Constant ExpansionStress: FixedValue=1
          VariableReference OrganPopulation: VariableName=[Spike].HeadNumber.Value()
          Constant StartStage: FixedValue=5
          Constant MaximumOrganWt: FixedValue=0.25
          AddFunction GrowthDuration
            VariableReference EarlyReproductive: VariableName=[Phenology].EarlyReproductive.Target.Value()
            VariableReference GrainDevelopment: VariableName=[Phenology].GrainDevelopment.Target.Value()
        Constant NReallocationFactor: FixedValue=0
        Constant NRetranslocationFactor: FixedValue=0.3
        Constant MaximumNConc: FixedValue=0.025
        Constant StructuralFraction: FixedValue=0.9
        Constant SenescenceRate: FixedValue=0; Units=/d
        Constant MinimumNConc: FixedValue=0.004
        BiomassRemoval BiomassRemovalDefaults
          OrganBiomassRemovalType Harvest: FractionLiveToRemove=0.5; FractionDeadToRemove=0; FractionLiveToResidue=0.1; FractionDeadToResidue=0
          OrganBiomassRemovalType Cut: FractionLiveToRemove=0.8; FractionDeadToRemove=0; FractionLiveToResidue=0; FractionDeadToResidue=0
          OrganBiomassRemovalType Prune: FractionLiveToRemove=0; FractionDeadToRemove=0; FractionLiveToResidue=0.6; FractionDeadToResidue=0
          OrganBiomassRemovalType Graze: FractionLiveToRemove=0.6; FractionDeadToRemove=0; FractionLiveToResidue=0.2; FractionDeadToResidue=0
          OrganBiomassRemovalType Thin: FractionLiveToRemove=0; FractionDeadToRemove=0; FractionLiveToResidue=0.05; FractionDeadToResidue=0
        PhaseBasedSwitch NitrogenDemandSwitch: Start=Emergence; End=StartGrainFill
        PhaseLookup DMRetranslocationFactor
          PhaseLookupValue VegetativeGrowth: Start=Emergence; End=StartGrainFill
            Constant DMRetranslocationFactor: FixedValue=0
          PhaseLookupValue ReproductiveGrowth: Start=StartGrainFill; End=EndGrainFill
            Constant DMRetranslocationFactor: FixedValue=0.5
        Constant InitialWtFunction: FixedValue=0; Units=g/m^2
        Constant DetachmentRateFunction: FixedValue=0; Units=/d
        Constant MaintenanceRespirationFunction: FixedValue=0; Units=0-1
        Constant DMConversionEfficiency: FixedValue=1; Units=0-1
        VariableReference HeadNumber: VariableName=[Structure].TotalStemPopn
        Constant DMReallocationFactor: FixedValue=0
        VariableReference CriticalNConc: VariableName=[Spike].MinimumNConc.Value()
        Constant RemobilisationCost: FixedValue=0
        Constant CarbonConcentration: FixedValue=0.4
      GenericOrgan Stem
        PhaseLookup StructuralFraction
          PhaseLookupValue VegetativeGrowth: Start=Sowing; End=FlagLeaf
            Constant Fraction: FixedValue=0.7
          PhaseLookupValue ReproductiveGrowth: Start=FlagLeaf; End=HarvestRipe
            Constant Fraction: FixedValue=0.05
        Constant SenescenceRate: FixedValue=0; Units=/d
        LinearInterpolationFunction MaximumNConc: XProperty=[Phenology].Stage
          XYPairs: X=[3, 4, 5, 6]; Y=[0.07, 0.04, 0.015, 0.012]
        Constant MinimumNConc: FixedValue=0.0025
        PhaseBasedSwitch NitrogenDemandSwitch: Start=Emergence; End=StartGrainFill
        Constant NReallocationFactor: FixedValue=0
        PhaseLookup NRetranslocationFactor
          PhaseLookupValue VegetativeGrowth: Start=Sowing; End=Flowering
            Constant Fraction: FixedValue=0
          PhaseLookupValue ReproductiveGrowth: Start=Flowering; End=HarvestRipe
            Constant Fraction: FixedValue=0.5
        PhaseLookup DMRetranslocationFactor: same as Replacements.Barley.Spike.DMRetranslocationFactor
        PartitionFractionDemandFunction DMDemandFunction
          PhaseLookup PartitionFraction
            PhaseLookupValue PreStemElongation: Start=Emergence; End=TerminalSpikelet
              Constant StemFraction: FixedValue=0.4
            PhaseLookupValue StemElongation: Start=TerminalSpikelet; End=FlagLeaf
              Constant StemFraction: FixedValue=0.8
            PhaseLookupValue EarEmergence: Start=FlagLeaf; End=Flowering
              Constant StemFraction: FixedValue=0.6
        BiomassRemoval BiomassRemovalDefaults: same as Replacements.Barley.Spike.BiomassRemovalDefaults
        DivideFunction PercentWSC
          VariableReference WSC: VariableName=[Stem].Live.StorageWt
          VariableReference StemWt: VariableName=[Stem].Live.Wt
        Constant InitialWtFunction: FixedValue=0; Units=g/m^2
        Constant DetachmentRateFunction: FixedValue=0; Units=/d
        Constant MaintenanceRespirationFunction: FixedValue=0; Units=0-1
        Constant DMConversionEfficiency: FixedValue=1; Units=0-1
        Constant DMReallocationFactor: FixedValue=0
        VariableReference CriticalNConc: VariableName=[Stem].MinimumNConc.Value()
        Constant RemobilisationCost: FixedValue=0
        Constant CarbonConcentration: FixedValue=0.4
      CompositeBiomass AboveGround
        Propertys=[[Leaf].Live, [Leaf].Dead, [Stem].Live, [Stem].Dead, [Spike].Live, [Spike].Dead, [Grain].Live, [Grain].Dead]
      CompositeBiomass AboveGroundLive: Propertys=[[Leaf].Live, [Stem].Live, [Spike].Live, [Grain].Live]
      CompositeBiomass AboveGroundDead: Propertys=[[Leaf].Dead, [Stem].Dead, [Spike].Dead, [Grain].Dead]
      CompositeBiomass BelowGround: Propertys=[[Root].Live, [Root].Dead]
      CompositeBiomass Total
        Propertys=[[Leaf].Live, [Leaf].Dead, [Stem].Live, [Stem].Dead, [Root].Live, [Root].Dead, [Spike].Live, [Spike].Dead, [Grain].Live, [Grain].Dead]
      CompositeBiomass TotalLive
        Propertys=[[Leaf].Live, [Stem].Live, [Root].Live, [Spike].Live, [Grain].Live]
      CompositeBiomass TotalDead
        Propertys=[[Leaf].Dead, [Stem].Dead, [Root].Dead, [Spike].Dead, [Grain].Dead]
      CompositeBiomass Ear: Propertys=[[Spike].Live, [Grain].Live, [Spike].Dead, [Grain].Dead]
        Memo
          The Ear composite biomass object includes the Live and dead pools of all organs within the Ear to allow output for total dry matter and Nutrient contents, including total structural, non-structural and metabolic pools.
      CompositeBiomass StemPlusSpike: Propertys=[[Stem].Live, [Spike].Live, [Stem].Dead, [Spike].Dead]
      CultivarFolder Cultivars
        CultivarFolder NewZealand
          Cultivar Booma
          Cultivar Bumpa
          Cultivar Boss: Command=[Phenology].PpSensitivity.FixedValue = 6
          Cultivar Cellar
          Cultivar County
          Cultivar Dash
          Cultivar Doyen
          Cultivar Hooded
          Cultivar Omaka
          Cultivar Optic
          Cultivar Pyramid
          Cultivar Quench
          Cultivar Retriever: Command=[Phenology].PpSensitivity.FixedValue = 6
          Cultivar Sherwood
          Cultivar Tavern
          Cultivar Triumph
          Cultivar Valetta
          Cultivar Vortex
        CultivarFolder Australia
          Cultivar Baudin: Command=[Phenology].PpSensitivity.FixedValue = 5
          Cultivar Buloke: Command=[Phenology].PpSensitivity.FixedValue = 5
          Cultivar Capstan: Command=[Phenology].PpSensitivity.FixedValue = 5
          Cultivar Commander: Command=[Phenology].PpSensitivity.FixedValue = 6
          Cultivar Fleet: Command=[Phenology].PpSensitivity.FixedValue = 5
          Cultivar Grimmett: Command=[Phenology].PpSensitivity.FixedValue = 5
          Cultivar Hindmarsh: Command=[Phenology].PpSensitivity.FixedValue = 5
          Cultivar Keel: Command=[Phenology].PpSensitivity.FixedValue = 5
          Cultivar Oxford: Command=[Phenology].PpSensitivity.FixedValue = 5
    Manager Harvesting
```csharp
using System;
using Models.Core;
using System.Collections.Generic;
using System.Text;
using Models.Soils;
using Models.PMF;
using Models;
using System.Xml.Serialization;
using APSIM.Shared.Utilities;

namespace Models
{
    [Serializable] 
    public class Script : Model
    {
        [Link] Plant Barley;
        [EventSubscribe("DoManagement")]
        private void OnDoManagement(object sender, EventArgs e)
        {
            if (Barley.Phenology.CurrentPhaseName == "Maturing")
            {
                Barley.Harvest();
                Barley.EndCrop();
            }
        }
    }
}
```
  DataStore
    ExcelInput Observed: FileName=Observed.xlsx; SheetNames=[Observed]
    ExcelInput LeafSize: FileName=LeafSizeObserved.xlsx; SheetNames=[LeafSize]
    PredictedObserved HarvestObsPred: PredictedTableName=HarvestReport; ObservedTableName=Observed; FieldNameUsedForMatch=Barley.Phenology.CurrentStageName
    PredictedObserved DailyObsPred: PredictedTableName=DailyReport; ObservedTableName=Observed; FieldNameUsedForMatch=Clock.Today
    PredictedObserved LeafSizeObsPred: PredictedTableName=SupReport; ObservedTableName=LeafSize; FieldNameUsedForMatch=LeafSize.Script.LeafExpandedPosition
  Folder Validation
    Folder NewZealand
      Experiment MCPD09_10
        Factors
          Factor Cult: Specifications=[Sowing].Script.Cultivar = Dash,Omaka,Booma,Sherwood
          Factor Nit
            Factor 0: Specifications=[FertiliserEvents]
              Operations FertiliserEvents
                2009-11-23  [Fertiliser].Apply(0, Fertiliser.Types.NO3N,10);
            Factor 150: Specifications=[FertiliserEvents]
              Operations FertiliserEvents
                2009-11-23  [Fertiliser].Apply(150, Fertiliser.Types.NO3N,10);
          Factor Irr
            Factor Nil: Specifications=[IrrigationEvents]
              Operations IrrigationEvents
                2009-11-11  [Irrigation].Apply(0);
                2009-11-19  [Irrigation].Apply(0);
                2009-11-26  [Irrigation].Apply(0);
                2009-12-11  [Irrigation].Apply(0);
                2009-12-21  [Irrigation].Apply(0);
                2009-12-29  [Irrigation].Apply(0);
                2010-01-05  [Irrigation].Apply(0);
                2010-01-13  [Irrigation].Apply(0);
                2010-03-02  [Irrigation].Apply(0);
                2010-03-03  [Irrigation].Apply(0);
            Factor Full: Specifications=[IrrigationEvents]
              Operations Irrigtion Events
                2009-11-11  [Irrigation].Apply(20);
                2009-11-19  [Irrigation].Apply(25);
                2009-11-26  [Irrigation].Apply(25);
                2009-12-11  [Irrigation].Apply(20);
                2009-12-21  [Irrigation].Apply(35);
                2009-12-29  [Irrigation].Apply(40);
                2010-01-05  [Irrigation].Apply(35);
                2010-01-13  [Irrigation].Apply(30);
                2010-03-02  [Irrigation].Apply(40);
                2010-03-03  [Irrigation].Apply(40);
        Simulation Ablock
          Weather: FileName=lincoln.met
          Clock: StartDate=2009-09-01; EndDate=2010-04-01
          Summary summaryfile
          SoilArbitrator Soil Arbitrator
          Zone Paddock: Area=1; Slope=0
            Manager DAS
              DAS = 0
```csharp
using System;
using Models.Core;
using System.Collections.Generic;
using System.Text;
using Models.PMF;
using Models;
using System.Xml.Serialization;
using APSIM.Shared.Utilities;
using System.Data;

namespace Models
{
    [Serializable] 
    //[System.Xml.Serialization.XmlInclude(typeof(Model))]
    public class Script : Model
    {
        
    
        
        
        [Description("Days after sowing")]
        public double DAS { get; set; }
        
        [EventSubscribe("DoInitialSummary")]
        private void OnDoInitialSummary(object sender, EventArgs e)
        {
            DAS = 0;
        }
        
        [EventSubscribe("DoReportCalculations")]
        private void OnDoReportCalculations(object sender, EventArgs e)
        {
            DAS += 1;
        }
    
    }
}
```
            Soil: SoilType=NZ_sedementary; Region=Plains; State=Canterbury; Country=New Zealnd; Latitude=0; Longitude=0
              Analysis: Thickness=[150, 150, 300, 300, 300, 300]; PH=[6.6, 6.2, 5.7, 5.5, 5.5, 5.5]; PHUnits=Water; BoronUnits=HotWater
              Water
                Thickness  BD   AirDry  LL15  DUL   SAT   KS
                200        1.2  0.14    0.14  0.33  0.48  4832.039
                200        1.2  0.14    0.14  0.33  0.48  389.229
                200        1.3  0.08    0.08  0.26  0.4   16.362
                200        1.4  0.13    0.13  0.27  0.38  97.995
                200        1.5  0.2     0.2   0.28  0.37  97.995
                200        1.5  0.2     0.2   0.28  0.36  97.995
                200        1.4  0.18    0.18  0.26  0.36  98
                200        1.4  0.19    0.19  0.25  0.36  98
                SoilCrop BarleySoil: LL=[0.14, 0.14, 0.08, 0.13, 0.2, 0.2, 0.18, 0.19]; KL=[0.1, 0.1, 0.1, 0.1, 0.1, 0.1, 0.1, 0.1]; XF=[1, 1, 1, 1, 1, 1, 1, 1]
              SoilWater: SummerDate=1-Nov; SummerU=6; SummerCona=2; WinterDate=1-Apr; WinterU=9; WinterCona=4.4; DiffusConst=0; DiffusSlope=0; Salb=0.18; CN2Bare=68; CNRed=20; CNCov=0.8; slope=0; discharge_width=0; catchment_area=0; max_pond=0; residueinterception=0
                Thickness  SWCON  KLAT
                150        0.9    0
                150        0.6    0
                300        0.4    0
                300        0.4    0
                300        0.4    0
                300        0.9    0
              SoilNitrogen: fom_type=[default, manure, mucuna, lablab, shemp, stable]; fract_carb=[0.2, 0.3, 0.54, 0.57, 0.45, 0]; fract_cell=[0.7, 0.3, 0.37, 0.37, 0.47, 0.1]; fract_lign=[0.1, 0.4, 0.09, 0.06, 0.08, 0.9]; wfpsN2N2O_x=[22, 88]; wfpsN2N2O_y=[0.1, 1]
              SoilOrganicMatter: RootCN=20; RootWt=3000; SoilCN=11; EnrACoeff=7.4; EnrBCoeff=0.2; OCUnits=Total
                Thickness  OC    FBiom  FInert
                150        4     0.025  0.8
                150        3.2   0.025  0.6
                300        2.5   0.015  0.75
                300        1.2   0.01   0.9
                300        0.24  0.01   0.96
                300        0.24  0.01   0.96
              Sample InitialN: NO3Units=ppm; NH4Units=ppm; SWUnits=Volumetric; OCUnits=Total; PHUnits=Water
                Thickness  NO3   NH4
                150        14.6  1.8
                150        17.8  1.9
                300        6.8   1.5
                300        7.6   1.3
                300        10.2  1.3
                300        11.2  0.9
              CERESSoilTemperature
              Sample Initial water: Thickness=[200, 200, 200, 200, 200, 200, 200, 200]; SW=[0.31, 0.31, 0.26, 0.27, 0.28, 0.28, 0.26, 0.25]; NO3Units=kgha; NH4Units=kgha; SWUnits=Volumetric; OCUnits=Total; PHUnits=Water
            Plant Barley: CropType=Barley
            SurfaceOrganicMatter Surface Organic Matter: PoolName=Barley_stubble; type=Barley; mass=1500; standing_fraction=0; cnr=80; CriticalResidueWeight=2000; OptimumDecompTemp=20; MaxCumulativeEOS=20; CNRatioDecompCoeff=0.277; CNRatioDecompThreshold=25; TotalLeachRain=25; MinRainToLeach=10; CriticalMinimumOrganicC=0.004; DefaultCPRatio=0; DefaultStandingFraction=0; StandingExtinctCoeff=0.5; FractionFaecesAdded=0.5
              Pools:
                {PoolName=Barley_stubble, ResidueType=Barley, Mass=1500, CNRatio=80, StandingFraction=0}
              ResidueTypes: LoadFromResource=ResidueTypes
            MicroClimate: a_interception=0; b_interception=1; c_interception=0; d_interception=0; soil_albedo=0.3; sun_angle=15; soil_heat_flux_fraction=0.4; night_interception_fraction=0.5; refheight=2; albedo=0.293662; emissivity=0.96; RadIntTotal=0
            Irrigation
            Fertiliser
            Folder Manager folder
              Manager Sowing
                InitialRootDepth = 40
                Cultivar = Booma
                SowingDate = 2009-10-01
```csharp
using System;
using Models.Core;
using System.Collections.Generic;
using System.Text;
using Models.PMF;
using Models;
using System.Xml.Serialization;
using APSIM.Shared.Utilities;
using System.Data;
using Models.PMF.Interfaces;
using Models.SurfaceOM;

namespace Models
{
    [Serializable] 
    //[System.Xml.Serialization.XmlInclude(typeof(Model))]
    public class Script : Model
    {
        [Link] Plant Barley;
        [Link] Clock Clock;
        [Link] Zone zone;
        [Link] Simulation Simulation;
        [Link] SurfaceOrganicMatter SurfOM;
        
                
        [Description("Initial Root Depth")]
        public double InitialRootDepth { get; set; }
        [Description("Cultivar name")]
        public string Cultivar { get; set; }
        [Description("Sowing Date")]
        public DateTime SowingDate { get; set; }
        
        
        [EventSubscribe("DoManagement")]
        private void OnDoManagement(object sender, EventArgs e)
        {
            if (Clock.Today.Date == SowingDate)
            {
                Barley.Sow(cultivar: Cultivar, population: 280, depth: InitialRootDepth, rowSpacing: 150);
                
            }
        }
    }
}
```
              Manager Harvesting
```csharp
using System;
using Models.Core;
using System.Collections.Generic;
using System.Text;
using Models.Soils;
using Models.PMF;
using Models;
using System.Xml.Serialization;
using APSIM.Shared.Utilities;

namespace Models
{
    [Serializable] 
    public class Script : Model
    {
        [Link] Plant Barley;
        [EventSubscribe("DoManagement")]
        private void OnDoManagement(object sender, EventArgs e)
        {
            if (Barley.Phenology.CurrentPhaseName == "ReadyForHarvesting")
            {
                Barley.Harvest();
                Barley.EndCrop();
            }
        }
    }
}
```
              Operations IrrigationEvents: same as Validation.NewZealand.MCPD09_10.Factors.Irr.Full.Irrigtion Events
              Operations FertiliserEvents
                2009-11-23  [Fertiliser].Apply(150, Fertiliser.Types.NO3N,10);
            Report DailyReport: EventNames=[Clock].DoReport
              VariableNames:
                [Clock].Today
                [Weather].MeanT
                [Soil].SoilWater.SW
                [Soil].SoilWater.SWmm
                sum([Soil].SoilWater.SWmm) as ProfileWater
                [Barley].AboveGround.N
                [Barley].AboveGround.Wt
                [Barley].AboveGroundLive.N
                [Barley].AboveGroundLive.N*10 as AboveGroundN
                [Barley].AboveGroundLive.Wt
                [Barley].AboveGroundDead.N
                [Barley].AboveGroundDead.Wt
                [Barley].Arbitrator.DMDemand
                [Barley].Arbitrator.DM.TotalFixationSupply
                [Barley].Ear.N
                [Barley].Ear.Nconc
                [Barley].Ear.Wt
                [Barley].Grain.N
                [Barley].Grain.NConc
                [Barley].Grain.Number
                [Barley].Grain.Size
                [Barley].Grain.Wt
                [Barley].Grain.Live.Wt
                [Barley].Leaf.AppearedCohortNo
                [Barley].Leaf.CoverDead
                [Barley].Leaf.CoverGreen
                [Barley].Leaf.CoverTotal
                [Barley].Leaf.Dead.N
                [Barley].Leaf.Dead.NConc
                [Barley].Leaf.Dead.Wt
                [Barley].Leaf.DeadCohortNo
                [Barley].Leaf.SenescingCohortNo
                [Barley].Leaf.ExpandedCohortNo
                [Barley].Leaf.Fn
                [Barley].Leaf.Fw
                [Barley].Leaf.Height
                [Barley].Leaf.InitialisedCohortNo
                [Barley].Leaf.LAI
                [Barley].Leaf.Live.N
                [Barley].Leaf.Live.NConc
                [Barley].Leaf.Live.Wt
                [Barley].Leaf.SpecificArea
                [Barley].Leaf.Transpiration
                [Barley].Phenology.CurrentPhaseName
                [Barley].Phenology.CurrentStageName
                [Barley].Phenology.DailyVernalisation.Value()
                [Barley].Phenology.MeanTemp.Value()
                [Barley].Phenology.Photoperiod.Value()
                [Barley].Phenology.Stage
                [Barley].Phenology.ThermalTime.Value()
                [Barley].Phenology.ThermalTime.Value
                [Barley].Phenology.Vrn1.Value()
                [Barley].Phenology.Vrn2.Value()
                [Barley].Phenology.Vrn4.Value()
                [Barley].Phenology.Zadok.Stage
                [Barley].Root.Depth
                [Barley].Root.N
                [Barley].Root.Wt
                [Barley].Root.Nconc
                [Barley].Root.WaterUptake
                [Barley].Spike.N
                [Barley].Spike.NConc
                [Barley].Spike.Wt
                [Barley].Spike.Live.StorageWt
                [Barley].Stem.N
                [Barley].Stem.NConc
                [Barley].Stem.Wt
                [Barley].Stem.PercentWSC
                [Barley].Stem.Live.StorageWt
                [Barley].StemPlusSpike.Wt
                [Barley].StemPlusSpike.N
                [Barley].SowingData.Cultivar
                [Barley].Structure.HaunStage.ValueTerminalSpikelet.Value()
                [Barley].Structure.HaunStage.Value()
                [Barley].Structure.Height
                [Barley].Structure.LeafTipsAppeared
                [Barley].Structure.FinalLeafNumber.Value()
                [Barley].Structure.FinalLeafNumber.ValueToHold.PhotoPLeaves.Value()
                [Barley].Structure.MainStemPopn
                [Barley].Structure.MeanTillerGrowthRate.Value()
                [Barley].Structure.TotalStemPopn
                [Barley].Total.N
                [Barley].Total.Wt
                [SurfaceOrganicMatter].Wt
                ([Barley].Leaf.Transpiration + [Soil].SoilWater.Es + [MicroClimate].interception) as ET
                sum([Soil].SoilNitrogen.NO3) as TotalSoilNitrogen
                [Barley].Phenology.FlagLeafDAS
                [Barley].Phenology.FloweringDAS
                [Barley].Phenology.MaturityDAS
                [Barley].Phenology.PhotoPeriod
                [Barley].Phenology.PhotoPeriodDeltaFunction
                [Barley].Phenology.Stage
                [Barley].Phenology.SoilTemperatureFunction.Value()
                [Barley].Population
            Report HarvestReport: EventNames=[Clock].EndOfSimulation
              VariableNames:
                [Barley].Structure.LeafTipsAppeared
                [Barley].Structure.FinalLeafNumber
                [Barley].Phenology.FlagLeafDAS
                [Barley].Phenology.FloweringDAS
                [Barley].Phenology.MaturityDAS
                [Script].CalcVals.SowMonth
            SoluteManager
        Memo
          There were some inconsistencies in the leaf number observations so don't expect to good of a fit with the model
      Experiment MCPD10_11
        Memo Trial details
          This was a cultivar evaluation trial conducted in Lincoln. Eight cultivars were evaluated.
        Factors
          Factor Cult
            Specifications=[Sowing].Script.Cultivar = Booma,County,Dash,Hooded,Omaka,Optic,Quench,Retriever
        Simulation Field10_11
          Weather: FileName=lincoln.met
          Clock: StartDate=2010-08-01; EndDate=2011-02-01
          Summary summaryfile
          SoilArbitrator Soil Arbitrator
          Zone Paddock: Area=1; Slope=0
            Soil: SoilType=NZ_sedementary; Region=Plains; State=Canterbury; Country=New Zealnd; Latitude=0; Longitude=0
              Analysis: Thickness=[150, 150, 300, 300, 300, 300]; PH=[6.6, 6.2, 5.7, 5.5, 5.5, 5.5]; PHUnits=Water; BoronUnits=HotWater
              Water: same as Validation.NewZealand.MCPD09_10.Ablock.Paddock.Soil.Water
              SoilWater: same as Validation.NewZealand.MCPD09_10.Ablock.Paddock.Soil.SoilWater
              SoilNitrogen: fom_type=[default, manure, mucuna, lablab, shemp, stable]; fract_carb=[0.2, 0.3, 0.54, 0.57, 0.45, 0]; fract_cell=[0.7, 0.3, 0.37, 0.37, 0.47, 0.1]; fract_lign=[0.1, 0.4, 0.09, 0.06, 0.08, 0.9]; wfpsN2N2O_x=[22, 88]; wfpsN2N2O_y=[0.1, 1]
              SoilOrganicMatter: same as Validation.NewZealand.MCPD09_10.Ablock.Paddock.Soil.SoilOrganicMatter
              Sample InitialN: NO3Units=ppm; NH4Units=ppm; SWUnits=Volumetric; OCUnits=Total; PHUnits=Water
                Thickness  NO3      NH4
                150        9.7      1.2
                150        11.8667  1.26667
                300        2.125    0.46875
                300        2.11111  1.19444
                300        2.83333  0.361111
                300        3.11111  0.25
              CERESSoilTemperature
              Sample Initial water: Thickness=[200, 200, 200, 200, 200, 200, 200, 200]; SW=[0.31, 0.31, 0.26, 0.27, 0.28, 0.28, 0.26, 0.25]; NO3Units=kgha; NH4Units=kgha; SWUnits=Volumetric; OCUnits=Total; PHUnits=Water
            SoluteManager
            SurfaceOrganicMatter Surface Organic Matter: same as Validation.NewZealand.MCPD09_10.Ablock.Paddock.Surface Organic Matter
            MicroClimate: a_interception=0; b_interception=1; c_interception=0; d_interception=0; soil_albedo=0.3; sun_angle=15; soil_heat_flux_fraction=0.4; night_interception_fraction=0.5; refheight=2; albedo=0.293662; emissivity=0.96; RadIntTotal=0
            Irrigation
            Fertiliser
            Plant Barley: CropType=Barley
            Folder Manager folder
              Manager Sowing
                InitialRootDepth = 40
                Cultivar = Dash
                SowingDate = 2010-08-26
```csharp
using System;
using Models.Core;
using System.Collections.Generic;
using System.Text;
using Models.PMF;
using Models;
using System.Xml.Serialization;
using APSIM.Shared.Utilities;
using System.Data;
using Models.PMF.Interfaces;
using Models.SurfaceOM;

namespace Models
{
    [Serializable] 
    //[System.Xml.Serialization.XmlInclude(typeof(Model))]
    public class Script : Model
    {
        [Link] Plant Barley;
        [Link] Clock Clock;
        [Link] Zone zone;
        [Link] Simulation Simulation;
        [Link] SurfaceOrganicMatter SurfOM;
        
                
        [Description("Initial Root Depth")]
        public double InitialRootDepth { get; set; }
        [Description("Cultivar name")]
        public string Cultivar { get; set; }
        [Description("Sowing Date")]
        public DateTime SowingDate { get; set; }
        
        
        [EventSubscribe("DoManagement")]
        private void OnDoManagement(object sender, EventArgs e)
        {
            if (Clock.Today.Date == SowingDate)
            {
                Barley.Sow(cultivar: Cultivar, population: 240, depth: InitialRootDepth, rowSpacing: 150);
                
            }
                    
            
        }
    }
}
```
              Manager Harvesting: same as Validation.NewZealand.MCPD09_10.Ablock.Paddock.Manager folder.Harvesting
              Operations IrrigationEvents
                2010-10-28  [Irrigation].Apply(20);
                2010-11-03  [Irrigation].Apply(10);
                2010-11-18  [Irrigation].Apply(20);
                2010-12-03  [Irrigation].Apply(20);
              Operations FertiliserEvents
                2010-08-25  [Fertiliser].Apply(22.5, Fertiliser.Types.NO3N,10);
                2010-10-20  [Fertiliser].Apply(50, Fertiliser.Types.NO3N,10);
                2010-11-03  [Fertiliser].Apply(50, Fertiliser.Types.NO3N,10);
            Report DailyReport: same as Validation.NewZealand.MCPD09_10.Ablock.Paddock.DailyReport
            Report HarvestReport: EventNames=[Clock].EndOfSimulation
              VariableNames:
                [Barley].Structure.LeafTipsAppeared
                [Barley].Structure.FinalLeafNumber
                [Barley].Phenology.FlagLeafDAS
                [Barley].Phenology.FloweringDAS
                [Barley].Phenology.MaturityDAS
                [Script].CalcVals.SowMonth
      Experiment MCPD11_12
        Memo Trial details
          This was a nitrogen*irrigation trial conducted at Lincoln
          •	Two water treatments; Rainfed (nil irrigation) and irrigated (310 mm)
          •	Two fertiliser N treatments; 0N (no fertiliser) and 150N (150 kg N/ha)
        Factors
          Factor Cult: Specifications=[Sowing].Script.Cultivar = Dash,Omaka,Booma
          Factor SD
            Factor 1
              Specifications:
                [Sowing].Script.SowingDate = 2011-07-13
                [FertiliserEvents]
              Operations FertiliserEvents
                2011-09-09  [Fertiliser].Apply(32, Fertiliser.Types.NO3N,10);
                2011-10-24  [Fertiliser].Apply(70, Fertiliser.Types.NO3N,10);
                2011-11-07  [Fertiliser].Apply(70, Fertiliser.Types.NO3N,10);
            Factor 2
              Specifications:
                [Sowing].Script.SowingDate = 2011-09-09
                [FertiliserEvents]
              Operations FertiliserEvents
                2011-07-08  [Fertiliser].Apply(32, Fertiliser.Types.NO3N,10);
                2011-09-23  [Fertiliser].Apply(70, Fertiliser.Types.NO3N,10);
                2011-10-18  [Fertiliser].Apply(70, Fertiliser.Types.NO3N,10);
            Factor 3
              Specifications:
                [Sowing].Script.SowingDate = 2011-11-15
                [FertiliserEvents]
              Operations FertiliserEvents
                2011-11-15  [Fertiliser].Apply(32, Fertiliser.Types.NO3N,10);
                2011-12-05  [Fertiliser].Apply(70, Fertiliser.Types.NO3N,10);
                2011-12-15  [Fertiliser].Apply(70, Fertiliser.Types.NO3N,10);
        Simulation Field11_12
          Weather: FileName=lincoln.met
          Clock: StartDate=2011-07-01; EndDate=2012-06-30
          Summary summaryfile
          SoilArbitrator Soil Arbitrator
          Zone Paddock: Area=1; Slope=0
            Soil: SoilType=NZ_sedementary; Region=Plains; State=Canterbury; Country=New Zealnd; Latitude=0; Longitude=0
              Analysis: Thickness=[150, 150, 300, 300, 300, 300]; PH=[6.6, 6.2, 5.7, 5.5, 5.5, 5.5]; PHUnits=Water; BoronUnits=HotWater
              Water
                Thickness  BD    AirDry  LL15  DUL   SAT   KS
                200        1.23  0.14    0.14  0.33  0.48  4832.039
                200        1.23  0.14    0.14  0.33  0.48  389.229
                200        1.2   0.15    0.15  0.3   0.4   16.362
                200        1.2   0.16    0.16  0.31  0.38  97.995
                200        1.2   0.16    0.16  0.32  0.37  97.995
                200        1.2   0.21    0.21  0.33  0.36  97.995
                200        1.2   0.28    0.28  0.34  0.38  98
                200        1.2   0.28    0.28  0.33  0.38  98
                SoilCrop BarleySoil: LL=[0.14, 0.14, 0.15, 0.16, 0.16, 0.21, 0.28, 0.28]; KL=[0.1, 0.1, 0.1, 0.1, 0.1, 0.1, 0.1, 0.1]; XF=[1, 1, 1, 1, 1, 1, 1, 1]
              SoilWater: same as Validation.NewZealand.MCPD09_10.Ablock.Paddock.Soil.SoilWater
              SoilNitrogen: fom_type=[default, manure, mucuna, lablab, shemp, stable]; fract_carb=[0.2, 0.3, 0.54, 0.57, 0.45, 0]; fract_cell=[0.7, 0.3, 0.37, 0.37, 0.47, 0.1]; fract_lign=[0.1, 0.4, 0.09, 0.06, 0.08, 0.9]; wfpsN2N2O_x=[22, 88]; wfpsN2N2O_y=[0.1, 1]
              SoilOrganicMatter: RootCN=31.5; RootWt=1500; SoilCN=11; EnrACoeff=7.4; EnrBCoeff=0.2; OCUnits=Total
                Thickness  OC    FBiom  FInert
                150        2.68  0.025  0.45
                150        2.78  0.025  0.6
                300        1.45  0.015  0.75
                300        0.38  0.01   0.9
                300        0.24  0.01   0.96
                300        0.24  0.01   0.96
              Sample InitialN: NO3Units=kgha; NH4Units=kgha; SWUnits=Volumetric; OCUnits=Total; PHUnits=Water
                Thickness  NO3   NH4
                150        8.4   2
                150        11.6  0.6
                300        10    0.8
                300        11    0.3
                300        9     0.2
                300        3     0.4
              CERESSoilTemperature
              Sample Initial water: Thickness=[200, 200, 200, 200, 200, 200, 200, 200]; SW=[0.33, 0.33, 0.3, 0.31, 0.32, 0.33, 0.34, 0.34]; NO3Units=kgha; NH4Units=kgha; SWUnits=Volumetric; OCUnits=Total; PHUnits=Water
            SoluteManager
            Plant Barley: CropType=Barley
            SurfaceOrganicMatter Surface Organic Matter: same as Validation.NewZealand.MCPD09_10.Ablock.Paddock.Surface Organic Matter
            MicroClimate: a_interception=0; b_interception=1; c_interception=0; d_interception=0; soil_albedo=0.3; sun_angle=15; soil_heat_flux_fraction=0.4; night_interception_fraction=0.5; refheight=2; albedo=0.293662; emissivity=0.96; RadIntTotal=0
            Irrigation
            Fertiliser
            Folder Manager folder
              Manager LeafSize
```csharp
using System;
using Models.Core;
using System.Collections.Generic;
using System.Text;
using Models.Soils;
using Models.PMF;
using Models;
using System.Xml.Serialization;
using APSIM.Shared.Utilities;

namespace Models
{
    [Serializable] 
    public class Script : Model
    {
        [Link] Clock Clock;
        [Link] Plant Barley;
        [Link] Zone zone;
                    
        [XmlIgnore] public bool InitialDay { get; set; }
        
        [XmlIgnore] public double LeafExpandedPosition { get; set; }
        [XmlIgnore] public double LeafAppearedPosition { get; set; }
        [XmlIgnore] public double ExpandedLeafNoYesterday { get; set; }
        [XmlIgnore] public double AppearedLeafNoYesterday { get; set; }
        [XmlIgnore] public double MostRecentlyExpandedLeafSize { get; set; }
        [XmlIgnore] public double MostRecentlyAppearedLeafMaxSize { get; set; }
        
        [EventSubscribe("Commencing")]
        private void OnSimulationCommencing(object sender, EventArgs e)
        {
            InitialDay = true;
            LeafExpandedPosition = 0;
            LeafAppearedPosition = 0;
            ExpandedLeafNoYesterday = 0;
            AppearedLeafNoYesterday = 0;
            MostRecentlyExpandedLeafSize = 0;
            MostRecentlyAppearedLeafMaxSize = 0;
        }
        
        [EventSubscribe("DoManagement")]
        private void OnDoManagement(object sender, EventArgs e)
        {
            ExpandedLeafNoYesterday = (double)zone.Get("Barley.Leaf.ExpandedCohortNo");
            AppearedLeafNoYesterday = (double)zone.Get("Barley.Leaf.AppearedCohortNo");
        }
        
        [EventSubscribe("DoManagementCalculations")]
        private void OnDoManagementCalculations(object sender, EventArgs e)
        {
            if ((double)zone.Get("Barley.Leaf.ExpandedCohortNo") > ExpandedLeafNoYesterday)
            {
                LeafExpandedPosition = (double)zone.Get("Barley.Leaf.ExpandedCohortNo");
                MostRecentlyExpandedLeafSize = (double)zone.Get("Barley.Leaf.CohortSize[" + (int)LeafExpandedPosition + "]");
            }
            
            if ((double)zone.Get("Barley.Leaf.AppearedCohortNo") > AppearedLeafNoYesterday)
            {
                LeafAppearedPosition = (double)zone.Get("Barley.Leaf.AppearedCohortNo");
                MostRecentlyAppearedLeafMaxSize = (double)zone.Get("Barley.Leaf.CohortParameters.MaxArea.Value()");
            }
            
        }
    }
}
```
              Manager Sowing
                InitialRootDepth = 20
                Cultivar = Dash
                SowingDate = 2011-07-13
                script: same as in Validation.NewZealand.MCPD09_10.Ablock.Paddock.Manager folder.Sowing
              Manager Harvesting: same as Validation.NewZealand.MCPD09_10.Ablock.Paddock.Manager folder.Harvesting
              Operations IrrigationEvents
                2011-11-07  [Irrigation].Apply(25);
                2011-11-28  [Irrigation].Apply(25);
                2011-12-14  [Irrigation].Apply(25);
                2011-12-29  [Irrigation].Apply(30);
                2012-01-04  [Irrigation].Apply(30);
                2012-01-19  [Irrigation].Apply(25);
              Operations FertiliserEvents
                2011-07-08  [Fertiliser].Apply(32, Fertiliser.Types.NO3N,10);
                2011-09-23  [Fertiliser].Apply(70, Fertiliser.Types.NO3N,10);
                2011-10-18  [Fertiliser].Apply(70, Fertiliser.Types.NO3N,10);
            Report DailyReport: same as Validation.NewZealand.MCPD09_10.Ablock.Paddock.DailyReport
            Report HarvestReport: EventNames=[Clock].EndOfSimulation
              VariableNames:
                [Barley].Structure.LeafTipsAppeared
                [Barley].Structure.FinalLeafNumber
                [Barley].Phenology.FlagLeafDAS
                [Barley].Phenology.FloweringDAS
                [Barley].Phenology.MaturityDAS
                [Script].CalcVals.SowMonth
            Report SupReport: EventNames=[Clock].DoReport
              VariableNames:
                [Clock].Today
                [Leaf].CohortSize
                [Leaf].CohortParameters.MaxArea.Value()
                [Oats].Structure.Phyllochron
                [Oats].Leaf.CohortMaxSize
                [Oats].Leaf.CohortParameters.GrowthDuration.Value()
                [Oats].Leaf.CohortParameters.LagDuration.Value()
                [Oats].Leaf.CohortParameters.SenescenceDuration.Value()
                [Oats].Leaf.CohortParameters.SpecificLeafAreaMax.Value()
                [Oats].Leaf.CohortParameters.SpecificLeafAreaMin.Value()
                [LeafSize].Script.LeafAppearedPosition
                [LeafSize].Script.MostRecentlyAppearedLeafMaxSize
                [LeafSize].Script.LeafExpandedPosition
                [LeafSize].Script.MostRecentlyExpandedLeafSize
        Memo
          There were some inconsistencies in the leaf number observations so don't expect to good of a fit with the model
      Experiment RS2014_15
        Memo Experiment
          This was a field experiment established at the New Zealand Institute for Plant & Food Research Limited rain-out shelter in October 2014. Barley cultivars cv Dash and cv Omaka, differing canopy characteristics and water extraction capabilities were established with a range of irrigation treatments aimed at producing a range of soil moisture deficits.
          •	High =Full replacement irrigation: replace weekly, measured crop water use;
          •	Mid =Intermediate replacement with reduced frequency and higher volume e.g. monthly application of ½ measured crop water use;
          •	Low =Nil (or near nil) irrigation, e.g.  irrigated once at anthesis.
          The treatments were monitored for:
          •	Soil water - this was measured continuously using auto logging TDR and weekly using a neutron probe;
          •	Canopy light interception;
          •	Biomass - quantified four times during crop growth;
          •	Leaf area.
        Factors
          Factor Cult: Specifications=[Sowing].Script.Cultivar = Dash,Omaka
          Factor Irr: Specifications=[IrrigationEvents]
            Operations Low
              2014-11-18  [Irrigation].Apply(0);
              2014-11-26  [Irrigation].Apply(0);
              2014-11-27  [Irrigation].Apply(0);
              2014-12-02  [Irrigation].Apply(36.7);
              2014-12-10  [Irrigation].Apply(0);
              2014-12-16  [Irrigation].Apply(0);
              2014-12-23  [Irrigation].Apply(0);
              2014-12-30  [Irrigation].Apply(0);
              2015-01-06  [Irrigation].Apply(0);
            Operations Med
              2014-11-18  [Irrigation].Apply(0);
              2014-11-26  [Irrigation].Apply(0);
              2014-11-27  [Irrigation].Apply(0);
              2014-12-02  [Irrigation].Apply(71);
              2014-12-10  [Irrigation].Apply(0);
              2014-12-16  [Irrigation].Apply(0);
              2014-12-23  [Irrigation].Apply(0);
              2014-12-30  [Irrigation].Apply(76);
              2015-01-06  [Irrigation].Apply(0);
            Operations High
              2014-11-18  [Irrigation].Apply(40);
              2014-11-26  [Irrigation].Apply(45);
              2014-11-27  [Irrigation].Apply(45);
              2014-12-02  [Irrigation].Apply(36.7);
              2014-12-10  [Irrigation].Apply(36);
              2014-12-16  [Irrigation].Apply(32);
              2014-12-23  [Irrigation].Apply(43);
              2014-12-30  [Irrigation].Apply(40);
              2015-01-06  [Irrigation].Apply(60);
        Simulation Dash14
          Weather: FileName=lincoln.met
          Clock: StartDate=2014-10-15; EndDate=2015-03-01
          Summary summaryfile
          SoilArbitrator Soil Arbitrator
          Zone Paddock: Area=1; Slope=0
            Manager DAS: same as Validation.NewZealand.MCPD09_10.Ablock.Paddock.DAS
            Soil: SoilType=NZ_sedementary; Region=Plains; State=Canterbury; Country=New Zealnd; Latitude=0; Longitude=0
              Analysis: Thickness=[100, 200, 300, 300, 300, 300]; PH=[6.6, 6.2, 5.7, 5.5, 5.5, 5.5]; PHUnits=Water; BoronUnits=HotWater
              Water
                Thickness  BD    AirDry  LL15  DUL   SAT   KS
                150        1.23  0.14    0.14  0.33  0.48  4832.039
                150        1.1   0.14    0.14  0.33  0.48  389.229
                300        1.1   0.13    0.13  0.33  0.42  16.362
                300        1.1   0.11    0.11  0.35  0.45  97.995
                300        1.1   0.17    0.17  0.35  0.42  97.995
                300        1.1   0.2     0.2   0.37  0.45  97.995
                300        1.1   0.2     0.2   0.37  0.45  97.995
                SoilCrop BarleySoil: LL=[0.14, 0.14, 0.13, 0.11, 0.17, 0.2, 0.2]; KL=[0.1, 0.1, 0.06, 0.05, 0.02, 0.01, 0]; XF=[1, 1, 1, 1, 1, 1, 1]
              SoilWater: SummerDate=1-oct; SummerU=6; SummerCona=2; WinterDate=1-Apr; WinterU=8; WinterCona=4.4; DiffusConst=0; DiffusSlope=0; Salb=0.18; CN2Bare=68; CNRed=20; CNCov=0.8; slope=0; discharge_width=0; catchment_area=0; max_pond=0; residueinterception=0
                Thickness  SWCON  KLAT
                200        0.9    0
                200        0.6    0
                200        0.4    0
                200        0.4    0
                200        0.4    0
                200        0.9    0
                200        0.9    0
                200        0.9    0
              SoilNitrogen: fom_type=[default, manure, mucuna, lablab, shemp, stable]; fract_carb=[0.2, 0.3, 0.54, 0.57, 0.45, 0]; fract_cell=[0.7, 0.3, 0.37, 0.37, 0.47, 0.1]; fract_lign=[0.1, 0.4, 0.09, 0.06, 0.08, 0.9]; wfpsN2N2O_x=[22, 88]; wfpsN2N2O_y=[0.1, 1]
              SoilOrganicMatter: RootCN=31.5; RootWt=1500; SoilCN=11; EnrACoeff=7.4; EnrBCoeff=0.2; OCUnits=Total
                Thickness  OC    FBiom  FInert
                100        2.68  0.025  0.45
                200        2.78  0.025  0.6
                300        1.45  0.015  0.75
                200        0.38  0.01   0.9
                100        0.24  0.01   0.96
                200        0.24  0.01   0.96
                100        0.24  0.01   0.96
                300        0.24  0.01   0.96
              Sample InitialN: NO3Units=kgha; NH4Units=kgha; SWUnits=Volumetric; OCUnits=Total; PHUnits=Water
                Thickness  NO3  NH4  SW
                150        130  2.2  0.31
                150        18   2    0.25
                300        15   1.8  0.33
                300        1.5  1.4  0.35
                300        1.5  1    0.35
                300        1.1  0.9  0.37
                300        1    0.1  0.37
              CERESSoilTemperature
            Plant Barley: CropType=Barley
            SurfaceOrganicMatter Surface Organic Matter: same as Validation.NewZealand.MCPD09_10.Ablock.Paddock.Surface Organic Matter
            MicroClimate: a_interception=0; b_interception=1; c_interception=0; d_interception=0; soil_albedo=0.3; sun_angle=15; soil_heat_flux_fraction=0.4; night_interception_fraction=0.5; refheight=2; albedo=0.293662; emissivity=0.96; RadIntTotal=0
            Irrigation
            Fertiliser
            Folder Manager folder
              Manager Sowing
                InitialRootDepth = 40
                Cultivar =
                SowingDate = 2014-10-15
```csharp
using System;
using Models.Core;
using System.Collections.Generic;
using System.Text;
using Models.PMF;
using Models;
using System.Xml.Serialization;
using APSIM.Shared.Utilities;
using System.Data;
using Models.PMF.Interfaces;
using Models.SurfaceOM;

namespace Models
{
    [Serializable] 
    //[System.Xml.Serialization.XmlInclude(typeof(Model))]
    public class Script : Model
    {
        [Link] Plant Barley;
        [Link] Clock Clock;
        [Link] Zone zone;
        [Link] Simulation Simulation;
        [Link] SurfaceOrganicMatter SurfOM;
        
                
        [Description("Initial Root Depth")]
        public double InitialRootDepth { get; set; }
        [Description("Cultivar")]
        public string Cultivar { get; set; }
        [Description("Sowing Date")]
        public DateTime SowingDate { get; set; }

        
        
        [EventSubscribe("DoManagement")]
        private void OnDoManagement(object sender, EventArgs e)
        {
            if (Clock.Today.Date == SowingDate)
            {
                Barley.Sow(cultivar: Cultivar, population: 250, depth: InitialRootDepth, rowSpacing: 150);
                
            }

        }
    }
}
```
              Operations IrrigationEvents
              Operations FertiliserEvents
                2014-09-16  [Fertiliser].Apply(30, Fertiliser.Types.NO3N,0);
                2014-10-10  [Fertiliser].Apply(30, Fertiliser.Types.NO3N,0);
                2014-12-02  [Fertiliser].Apply(50, Fertiliser.Types.NO3N,0);
              Manager Harvesting
```csharp
using System;
using Models.Core;
using System.Collections.Generic;
using System.Text;
using Models.Soils;
using Models.PMF;
using Models;
using System.Xml.Serialization;
using APSIM.Shared.Utilities;

namespace Models
{
    [Serializable] 
    public class Script : Model
    {
        [Link] Plant Barley;
        [EventSubscribe("DoManagement")]
        private void OnDoManagement(object sender, EventArgs e)
        {
            if (Barley.Phenology.CurrentPhaseName == "Ripening")
            {
                Barley.Harvest();
                Barley.EndCrop();
            }
        }
    }
}
```
            Manager ClimateControl
              StartDate = 2014-10-25
              EndDate = 2015-04-01
              CCOnOff = True
```csharp
using System;
using Models.Core;
using APSIM.Shared.Utilities;



using System.Collections.Generic;
using System.Text;
using Models.PMF;
using Models;
using System.Xml.Serialization;

namespace Models
{
    [Serializable] 
    [System.Xml.Serialization.XmlInclude(typeof(Model))]
    public class Script : Model
    {
        [Link] Weather Met;
        [Link] Clock Clock;
    
        [Description("Start Date")]
        public DateTime StartDate { get; set; }
        
        [Description("End Date")]
        public DateTime EndDate { get; set; }

        [Description("Turn on or off")]
        public bool CCOnOff { get; set; }
 
        [EventSubscribe("PreparingNewWeatherData")]
        private void OnPreparingNewWeatherData(object sender, EventArgs e)
        {
            if (CCOnOff == true)
            if ((Clock.Today.Date >= StartDate) && (Clock.Today.Date <= EndDate))
                Met.Rain = 0;        
        }
    }
}
```
            Report DailyReport: EventNames=[Clock].DoReport
              VariableNames:
                [Clock].Today
                [Weather].MeanT
                [Soil].SoilWater.SW
                [Soil].SoilWater.SWmm
                sum([Soil].SoilWater.SWmm) as ProfileWater
                [Barley].AboveGround.N
                [Barley].AboveGround.Wt
                [Barley].AboveGroundLive.N
                [Barley].AboveGroundLive.N*10 as AboveGroundN
                [Barley].AboveGroundLive.Wt
                [Barley].AboveGroundDead.N
                [Barley].AboveGroundDead.Wt
                [Barley].Arbitrator.DMDemand
                [Barley].Arbitrator.DM.TotalFixationSupply
                [Barley].Ear.N
                [Barley].Ear.Nconc
                [Barley].Ear.Wt
                [Barley].Grain.N
                [Barley].Grain.NConc
                [Barley].Grain.Number
                [Barley].Grain.Size
                [Barley].Grain.Wt
                [Barley].Grain.Live.Wt
                [Barley].Leaf.AppearedCohortNo
                [Barley].Leaf.CoverDead
                [Barley].Leaf.CoverGreen
                [Barley].Leaf.CoverTotal
                [Barley].Leaf.Dead.N
                [Barley].Leaf.Dead.NConc
                [Barley].Leaf.Dead.Wt
                [Barley].Leaf.DeadCohortNo
                [Barley].Leaf.SenescingCohortNo
                [Barley].Leaf.ExpandedCohortNo
                [Barley].Leaf.Fn
                [Barley].Leaf.Fw
                [Barley].Leaf.Height
                [Barley].Leaf.InitialisedCohortNo
                [Barley].Leaf.LAI
                [Barley].Leaf.Live.N
                [Barley].Leaf.Live.NConc
                [Barley].Leaf.Live.Wt
                [Barley].Leaf.SpecificArea
                [Barley].Leaf.Transpiration
                [Barley].Phenology.CurrentPhaseName
                [Barley].Phenology.CurrentStageName
                [Barley].Phenology.DailyVernalisation.Value()
                [Barley].Phenology.MeanTemp.Value()
                [Barley].Phenology.Photoperiod.Value()
                [Barley].Phenology.Stage
                [Barley].Phenology.ThermalTime.Value()
                [Barley].Phenology.ThermalTime.Value
                [Barley].Phenology.Vrn1.Value()
                [Barley].Phenology.Vrn2.Value()
                [Barley].Phenology.Vrn4.Value()
                [Barley].Phenology.Zadok.Stage
                [Barley].Root.Depth
                [Barley].Root.N
                [Barley].Root.Wt
                [Barley].Root.Nconc
                [Barley].Root.WaterUptake
                [Barley].Spike.N
                [Barley].Spike.NConc
                [Barley].Spike.Wt
                [Barley].Spike.Live.StorageWt
                [Barley].Stem.N
                [Barley].Stem.NConc
                [Barley].Stem.Wt
                [Barley].Stem.PercentWSC
                [Barley].Stem.Live.StorageWt
                [Barley].StemPlusSpike.Wt
                [Barley].StemPlusSpike.N
                [Barley].SowingData.Cultivar
                [Barley].Structure.HaunStage.ValueTerminalSpikelet.Value()
                [Barley].Structure.HaunStage.Value()
                [Barley].Structure.Height
                [Barley].Structure.LeafTipsAppeared
                [Barley].Structure.FinalLeafNumber.Value()
                [Barley].Structure.FinalLeafNumber.ValueToHold.PhotoPLeaves.Value()
                [Barley].Structure.MainStemPopn
                [Barley].Structure.MeanTillerGrowthRate.Value()
                [Barley].Structure.TotalStemPopn
                [Barley].Total.N
                [Barley].Total.Wt
                [SurfaceOrganicMatter].Wt
                ([Barley].Leaf.Transpiration + [Soil].SoilWater.Es + [MicroClimate].interception) as ET
                sum([Soil].SoilNitrogen.NO3) as TotalSoilNitrogen
                [Barley].Phenology.FlagLeafDAS
                [Barley].Phenology.FloweringDAS
                [Barley].Phenology.MaturityDAS
                [Barley].Phenology.PhotoPeriod
                [Barley].Phenology.PhotoPeriodDeltaFunction
                [Barley].Phenology.Stage
                [Barley].Phenology.SoilTemperatureFunction.Value()
                [Barley].Population
                [Soil].SoilNitrogen.TotalN
            Report HarvestReport: EventNames=[Clock].EndOfSimulation
              VariableNames:
                [Barley].Structure.LeafTipsAppeared
                [Barley].Structure.FinalLeafNumber
                [Barley].Phenology.FlagLeafDAS
                [Barley].Phenology.FloweringDAS
                [Barley].Phenology.MaturityDAS
                [Script].CalcVals.SowMonth
            SoluteManager
      Experiment RS1988_89
        Memo Trial details
          This experiment was conducted in the rainshelter at Plant and Food Research in Lincoln, New Zealand. The objective was to evaluate the effect of drought on the yield of barley crops. The experiment is fully described by Jamieson et al. (1995).  Briefly, 'Triumph' barley was sown at 188kg/ha on 07 September 1988. This sowing rate resulted in a population of 291 ± 6 plants/m2.  Plants were evaluated for their response to drought of varying duration. The treatments were:

          •	Full irrigation – measured ET replaced weekly (06 October to 29 December)
          •	Early Drought 1 – irrigated from 03 November to 05 January
          •	Early Drought 2 – irrigated from 17 November to 19 January
          •	Early Drought 3 – irrigated from 24 November to 19 January
          •	Early Drought 3 – irrigated from 01 December to 09 February
          •	Middle Drought 1 – irrigated (06/10/1988 to 03/11/1988) and (24/11/1988 to 29/12/1989)
          •	Middle Drought 2 – irrigated (06/10/1988 to 03/11/1988) and (01/12/1988 to 29/12/1989)
          •	Middle Drought 3 – irrigated (06/10/1988 to 03/11/1988) and (15/12/1988 to 29/12/1989)
          •	Middle Drought 3 – irrigated (06/10/1988 to 03/11/1988)
          •	Late Drought 1 – irrigated (06/10/1988 to 17/11/1988)
          •	Late Drought 2 – irrigated (06/10/1988 to 24/11/1988)
          •	Late Drought 3 – irrigated (06/10/1988 to 01/12/1989)
        Factors
          Factor Irr
            Factor Control
              Specifications:
                [Water]
                [InitialN]
                [ClimateControl]
              Water
                Thickness  BD   AirDry  LL15  DUL   SAT
                200        1.3  0.08    0.08  0.29  0.44
                200        1.3  0.07    0.07  0.3   0.4
                200        1.3  0.07    0.07  0.28  0.4
                200        1.3  0.09    0.09  0.26  0.38
                200        1.3  0.11    0.11  0.26  0.38
                200        1.3  0.16    0.16  0.28  0.38
                200        1.3  0.15    0.15  0.27  0.38
                200        1.3  0.12    0.12  0.22  0.38
                SoilCrop BarleySoil: LL=[0.08, 0.07, 0.07, 0.09, 0.11, 0.16, 0.15, 0.12]; KL=[0.05, 0.03, 0.02, 0.03, 0.03, 0.03, 0.01, 0.01]; XF=[1, 0.2, 0.3, 1, 1, 1, 1, 1]
              Sample InitialN: NO3Units=kgha; NH4Units=kgha; SWUnits=Volumetric; OCUnits=Total; PHUnits=Water
                Thickness  NO3  NH4  SW
                200        30   5    0.27
                200        15   0.5  0.3
                200        15   0.5  0.28
                200        10   0    0.25
                200        5    0    0.24
                200        5    0    0.27
                200        5    0    0.27
                200        5    0    0.21
              Manager ClimateControl
                StartDate = 1988-09-01
                EndDate = 1989-12-31
                CCOnOff = False
                script: same as in Validation.NewZealand.RS2014_15.Dash14.Paddock.ClimateControl
            Factor EarlyDrought1
              Specifications:
                [IrrigationEvents]
                [Water]
                [InitialN]
                [ClimateControl]
              Operations IrrigationEvents
                1988-11-03  [Irrigation].Apply(45);
                1988-11-10  [Irrigation].Apply(47);
                1988-11-17  [Irrigation].Apply(32);
                1988-10-24  [Irrigation].Apply(18);
                1988-12-01  [Irrigation].Apply(35);
                1988-12-08  [Irrigation].Apply(24);
                1988-12-15  [Irrigation].Apply(43);
                1988-12-22  [Irrigation].Apply(32);
                1988-12-29  [Irrigation].Apply(36);
                1989-01-05  [Irrigation].Apply(35);
              Water
                Thickness  BD   AirDry  LL15  DUL      SAT
                200        1.3  0.06    0.06  0.31     0.44
                200        1.3  0.09    0.09  0.3      0.44
                200        1.3  0.07    0.07  0.28     0.44
                200        1.3  0.12    0.12  0.31145  0.44
                200        1.3  0.16    0.16  0.3079   0.44
                200        1.3  0.16    0.16  0.3007   0.44
                200        1.3  0.15    0.15  0.28705  0.44
                200        1.3  0.16    0.16  0.3117   0.44
                SoilCrop BarleySoil: LL=[0.06, 0.09, 0.07, 0.12, 0.16, 0.16, 0.15, 0.16]; KL=[0.05, 0.03, 0.02, 0.03, 0.03, 0.03, 0.01, 0.01]; XF=[1, 0.2, 0.3, 1, 1, 1, 1, 1]
              Sample InitialN: NO3Units=ppm; NH4Units=ppm; SWUnits=Volumetric; OCUnits=Total; PHUnits=Water
                Thickness  NO3  NH4  SW
                200        30   5    0.32
                200        15   0.5  0.3
                200        15   0.5  0.29
                200        10   0    0.33
                200        5    0    0.31
                200        5    0    0.3
                200        5    0    0.3
                200        5    0    0.23
              Manager ClimateControl
                StartDate = 1988-09-01
                EndDate = 1989-12-31
                CCOnOff = True
                script: same as in Validation.NewZealand.RS2014_15.Dash14.Paddock.ClimateControl
            Factor EarlyDrought2
              Specifications:
                [IrrigationEvents]
                [Water]
                [InitialN]
                [ClimateControl]
              Operations IrrigationEvents
                1988-11-17  [Irrigation].Apply(57);
                1988-10-24  [Irrigation].Apply(18);
                1988-12-01  [Irrigation].Apply(35);
                1988-12-08  [Irrigation].Apply(24);
                1988-12-15  [Irrigation].Apply(43);
                1988-12-22  [Irrigation].Apply(32);
                1988-12-29  [Irrigation].Apply(36);
                1989-01-05  [Irrigation].Apply(35);
                1989-01-12  [Irrigation].Apply(26);
                1989-01-19  [Irrigation].Apply(22);
              Water: same as Validation.NewZealand.RS1988_89.Factors.Irr.EarlyDrought1.Water
              Manager ClimateControl: same as Validation.NewZealand.RS1988_89.Factors.Irr.EarlyDrought1.ClimateControl
              Sample InitialN: same as Validation.NewZealand.RS1988_89.Factors.Irr.EarlyDrought1.InitialN
            Factor EarlyDrought3
              Specifications:
                [IrrigationEvents]
                [Water]
                [InitialN]
                [ClimateControl]
              Operations IrrigationEvents
                1988-10-24  [Irrigation].Apply(43);
                1988-12-01  [Irrigation].Apply(35);
                1988-12-08  [Irrigation].Apply(24);
                1988-12-15  [Irrigation].Apply(43);
                1988-12-22  [Irrigation].Apply(32);
                1988-12-29  [Irrigation].Apply(36);
                1989-01-05  [Irrigation].Apply(35);
                1989-01-12  [Irrigation].Apply(26);
                1989-01-19  [Irrigation].Apply(22);
              Water: same as Validation.NewZealand.RS1988_89.Factors.Irr.EarlyDrought1.Water
              Manager ClimateControl: same as Validation.NewZealand.RS1988_89.Factors.Irr.EarlyDrought1.ClimateControl
              Sample InitialN: same as Validation.NewZealand.RS1988_89.Factors.Irr.EarlyDrought1.InitialN
            Factor EarlyDrought4
              Specifications:
                [IrrigationEvents]
                [Water]
                [InitialN]
                [ClimateControl]
              Operations IrrigationEvents
                1988-12-01  [Irrigation].Apply(35);
                1988-12-08  [Irrigation].Apply(50);
                1988-12-15  [Irrigation].Apply(43);
                1988-12-22  [Irrigation].Apply(32);
                1988-12-29  [Irrigation].Apply(36);
                1989-01-05  [Irrigation].Apply(35);
                1989-01-12  [Irrigation].Apply(26);
                1989-01-19  [Irrigation].Apply(22);
                1989-01-26  [Irrigation].Apply(20);
                1989-02-02  [Irrigation].Apply(17);
                1989-02-09  [Irrigation].Apply(15);
              Water: same as Validation.NewZealand.RS1988_89.Factors.Irr.EarlyDrought1.Water
              Manager ClimateControl: same as Validation.NewZealand.RS1988_89.Factors.Irr.EarlyDrought1.ClimateControl
              Sample InitialN: same as Validation.NewZealand.RS1988_89.Factors.Irr.EarlyDrought1.InitialN
            Factor MiddleDrought1
              Specifications:
                [IrrigationEvents]
                [Water]
                [InitialN]
                [ClimateControl]
              Operations IrrigationEvents
                1988-10-06  [Irrigation].Apply(27);
                1988-10-13  [Irrigation].Apply(10);
                1988-10-20  [Irrigation].Apply(30);
                1988-10-27  [Irrigation].Apply(25);
                1988-11-03  [Irrigation].Apply(25);
                1988-11-24  [Irrigation].Apply(43);
                1988-12-01  [Irrigation].Apply(35);
                1988-12-08  [Irrigation].Apply(24);
                1988-12-15  [Irrigation].Apply(43);
                1988-12-22  [Irrigation].Apply(32);
                1988-12-29  [Irrigation].Apply(36);
              Water: same as Validation.NewZealand.RS1988_89.Factors.Irr.EarlyDrought1.Water
              Manager ClimateControl: same as Validation.NewZealand.RS1988_89.Factors.Irr.EarlyDrought1.ClimateControl
              Sample InitialN: same as Validation.NewZealand.RS1988_89.Factors.Irr.EarlyDrought1.InitialN
            Factor MiddleDrought2
              Specifications:
                [IrrigationEvents]
                [Water]
                [InitialN]
                [ClimateControl]
              Operations IrrigationEvents
                1988-10-06  [Irrigation].Apply(27);
                1988-10-13  [Irrigation].Apply(10);
                1988-10-20  [Irrigation].Apply(30);
                1988-10-27  [Irrigation].Apply(25);
                1988-11-03  [Irrigation].Apply(25);
                1988-11-24  [Irrigation].Apply(0);
                1988-12-01  [Irrigation].Apply(35);
                1988-12-08  [Irrigation].Apply(50);
                1988-12-15  [Irrigation].Apply(43);
                1988-12-22  [Irrigation].Apply(32);
                1988-12-29  [Irrigation].Apply(36);
              Water: same as Validation.NewZealand.RS1988_89.Factors.Irr.EarlyDrought1.Water
              Manager ClimateControl: same as Validation.NewZealand.RS1988_89.Factors.Irr.EarlyDrought1.ClimateControl
              Sample InitialN: same as Validation.NewZealand.RS1988_89.Factors.Irr.EarlyDrought1.InitialN
            Factor MiddleDrought3
              Specifications:
                [IrrigationEvents]
                [Water]
                [InitialN]
                [ClimateControl]
              Operations IrrigationEvents
                1988-10-06  [Irrigation].Apply(27);
                1988-10-13  [Irrigation].Apply(10);
                1988-10-20  [Irrigation].Apply(30);
                1988-10-27  [Irrigation].Apply(25);
                1988-11-03  [Irrigation].Apply(25);
                1988-11-24  [Irrigation].Apply(0);
                1988-12-01  [Irrigation].Apply(0);
                1988-12-08  [Irrigation].Apply(0);
                1988-12-15  [Irrigation].Apply(43);
                1988-12-22  [Irrigation].Apply(32);
                1988-12-29  [Irrigation].Apply(36);
              Water: same as Validation.NewZealand.RS1988_89.Factors.Irr.EarlyDrought1.Water
              Sample Initial water: NO3Units=ppm; NH4Units=ppm; SWUnits=Volumetric; OCUnits=Total; PHUnits=Water
                Thickness  NO3  NH4  SW
                200        30   5    0.2655
                200        15   0.5  0.27
                200        15   0.5  0.209
                200        10   0    0.31145
                200        5    0    0.3079
                200        5    0    0.3007
                200        5    0    0.28705
                200        5    0    0.3117
              Manager ClimateControl: same as Validation.NewZealand.RS1988_89.Factors.Irr.EarlyDrought1.ClimateControl
            Factor MiddleDrought4
              Specifications:
                [IrrigationEvents]
                [Water]
                [InitialN]
                [ClimateControl]
              Operations IrrigationEvents
                1988-10-06  [Irrigation].Apply(27);
                1988-10-13  [Irrigation].Apply(10);
                1988-10-20  [Irrigation].Apply(30);
                1988-10-27  [Irrigation].Apply(25);
                1988-11-03  [Irrigation].Apply(0);
                1988-11-24  [Irrigation].Apply(0);
                1988-12-01  [Irrigation].Apply(0);
                1988-12-08  [Irrigation].Apply(0);
                1988-12-15  [Irrigation].Apply(0);
                1988-12-22  [Irrigation].Apply(0);
                1988-12-29  [Irrigation].Apply(0);
              Water: same as Validation.NewZealand.RS1988_89.Factors.Irr.EarlyDrought1.Water
              Manager ClimateControl: same as Validation.NewZealand.RS1988_89.Factors.Irr.EarlyDrought1.ClimateControl
              Sample InitialN: same as Validation.NewZealand.RS1988_89.Factors.Irr.EarlyDrought1.InitialN
            Factor LateDrought1
              Specifications:
                [IrrigationEvents]
                [Water]
                [InitialN]
                [ClimateControl]
              Operations IrrigationEvents
                1988-10-06  [Irrigation].Apply(27);
                1988-10-13  [Irrigation].Apply(10);
                1988-10-20  [Irrigation].Apply(30);
                1988-10-27  [Irrigation].Apply(25);
                1988-11-03  [Irrigation].Apply(25);
                1988-11-10  [Irrigation].Apply(47);
                1988-11-17  [Irrigation].Apply(32);
              Water: same as Validation.NewZealand.RS1988_89.Factors.Irr.EarlyDrought1.Water
              Manager ClimateControl: same as Validation.NewZealand.RS1988_89.Factors.Irr.EarlyDrought1.ClimateControl
              Sample InitialN: same as Validation.NewZealand.RS1988_89.Factors.Irr.EarlyDrought1.InitialN
            Factor LateDrought2
              Specifications:
                [IrrigationEvents]
                [Water]
                [InitialN]
                [ClimateControl]
              Operations IrrigationEvents
                1988-10-06  [Irrigation].Apply(27);
                1988-10-13  [Irrigation].Apply(10);
                1988-10-20  [Irrigation].Apply(30);
                1988-10-27  [Irrigation].Apply(25);
                1988-11-03  [Irrigation].Apply(25);
                1988-11-10  [Irrigation].Apply(47);
                1988-11-17  [Irrigation].Apply(32);
                1988-11-24  [Irrigation].Apply(18);
              Water: same as Validation.NewZealand.RS1988_89.Factors.Irr.EarlyDrought1.Water
              Manager ClimateControl: same as Validation.NewZealand.RS1988_89.Factors.Irr.EarlyDrought1.ClimateControl
              Sample InitialN: same as Validation.NewZealand.RS1988_89.Factors.Irr.EarlyDrought1.InitialN
            Factor LateDrought3
              Specifications:
                [IrrigationEvents]
                [Water]
                [InitialN]
                [ClimateControl]
              Operations IrrigationEvents
                1988-10-06  [Irrigation].Apply(27);
                1988-10-13  [Irrigation].Apply(10);
                1988-10-20  [Irrigation].Apply(30);
                1988-10-27  [Irrigation].Apply(25);
                1988-11-03  [Irrigation].Apply(25);
                1988-11-10  [Irrigation].Apply(47);
                1988-11-17  [Irrigation].Apply(32);
                1988-11-24  [Irrigation].Apply(18);
                1988-12-01  [Irrigation].Apply(35);
              Water: same as Validation.NewZealand.RS1988_89.Factors.Irr.EarlyDrought1.Water
              Manager ClimateControl: same as Validation.NewZealand.RS1988_89.Factors.Irr.EarlyDrought1.ClimateControl
              Sample InitialN: same as Validation.NewZealand.RS1988_89.Factors.Irr.EarlyDrought1.InitialN
        Simulation FullIrrig
          Weather: FileName=lincoln.met
          Clock: StartDate=1988-09-01; EndDate=1989-03-01
          Summary summaryfile
          SoilArbitrator Soil Arbitrator
          Zone Paddock: Area=1; Slope=0
            Soil: Region=Plains; State=Canterbury; Country=New Zealand; Latitude=0; Longitude=0
              DataSource=Generic profile descriptions provided by Trevor Webb and data for functional horizions based on SWAMP project results
              Comments=Bulk density values were measured on the fine earth fraction so values entered into apsim soil are adjusted down to account for stone content (assuming stones are inert from all soil process so their mass and volume is removed from model paramaters).  SAT, DUL, LL15 and Air dry have been adjusted down to account for stone content.  OC has not been adjusted so the model will get the correct carbon and N amounts using the adjusted BD.
              Analysis: Thickness=[100, 200, 200, 100, 300, 200, 100, 300]; PH=[6, 6, 6, 6, 6, 6, 6, 6]; PHUnits=Water; BoronUnits=HotWater
              Water
                Thickness  BD     AirDry  LL15   DUL   SAT
                100        1.23   0.05    0.14   0.33  0.48
                200        1.23   0.05    0.14   0.33  0.48
                300        1.59   0.157   0.13   0.29  0.4
                200        1.57   0.173   0.11   0.28  0.38
                100        1.57   0.173   0.173  0.3   0.366
                200        1.6    0.165   0.165  0.3   0.358
                100        1.6    0.165   0.165  0.3   0.358
                300        1.601  0.115   0.115  0.3   0.316
                SoilCrop BarleySoil: LL=[0.1, 0.1, 0.157, 0.173, 0.173, 0.165, 0.165, 0.115]; KL=[0.1, 0.1, 0.1, 0.1, 0.1, 0.1, 0.1, 0.1]; XF=[1, 1, 1, 1, 1, 1, 1, 1]
              SoilWater: SummerDate=1-oct; SummerU=9; SummerCona=4.4; WinterDate=1-Apr; WinterU=2; WinterCona=1.5; DiffusConst=88; DiffusSlope=35; Salb=0.13; CN2Bare=73; CNRed=20; CNCov=0.8; max_pond=0; Thickness=[100, 200, 300, 200, 100, 200, 100, 300]; SWCON=[0.9, 0.6, 0.4, 0.4, 0.4, 0.9, 0.9, 0.9]; residueinterception=0
              SoilNitrogen: fom_type=[default, manure, mucuna, lablab, shemp, stable]; fract_carb=[0.2, 0.3, 0.54, 0.57, 0.45, 0]; fract_cell=[0.7, 0.3, 0.37, 0.37, 0.47, 0.1]; fract_lign=[0.1, 0.4, 0.09, 0.06, 0.08, 0.9]; wfpsN2N2O_x=[22, 88]; wfpsN2N2O_y=[0.1, 1]
              SoilOrganicMatter: RootCN=31.5; RootWt=1500; SoilCN=11; EnrACoeff=7.4; EnrBCoeff=0.2; OCUnits=Total
                Thickness  OC     FBiom  FInert
                100        2.677  0.025  0.45
                200        2.784  0.025  0.6
                300        1.454  0.015  0.75
                200        0.383  0.01   0.9
                100        0.243  0.01   0.96
                200        0.243  0.01   0.96
                100        0.243  0.01   0.96
                300        0.243  0.01   0.96
              Sample InitialN: NO3Units=kgha; NH4Units=kgha; SWUnits=Volumetric; OCUnits=Total; PHUnits=Water
                Thickness  NO3  NH4  SW
                100        30   5    0.27
                200        15   0.5  0.3
                300        15   0.5  0.28
                200        10   0    0.25
                100        5    0    0.24
                200        5    0    0.27
                100        5    0    0.27
                300        5    0    0.21
              CERESSoilTemperature
            Plant Barley: CropType=Barley
            SurfaceOrganicMatter Surface Organic Matter: PoolName=Barley_stubble; type=Barley; mass=1000; standing_fraction=0; cnr=80; CriticalResidueWeight=2000; OptimumDecompTemp=20; MaxCumulativeEOS=20; CNRatioDecompCoeff=0.277; CNRatioDecompThreshold=25; TotalLeachRain=25; MinRainToLeach=10; CriticalMinimumOrganicC=0.004; DefaultCPRatio=0; DefaultStandingFraction=0; StandingExtinctCoeff=0.5; FractionFaecesAdded=0.5
              Pools:
                {PoolName=Barley_stubble, ResidueType=Barley, Mass=1000, CNRatio=80, StandingFraction=0}
              ResidueTypes: LoadFromResource=ResidueTypes
            MicroClimate: a_interception=0; b_interception=1; c_interception=0; d_interception=0; soil_albedo=0.3; sun_angle=15; soil_heat_flux_fraction=0.4; night_interception_fraction=0.5; refheight=2; albedo=0.293662; emissivity=0.96; RadIntTotal=0
            Irrigation
            Fertiliser
            Folder Manager folder
              Operations SowingEvent
                1988-09-07  [Barley].Sow(population:250, cultivar:"Triumph", depth:15, rowSpacing:150);
              Operations IrrigationEvents
                1988-10-06  [Irrigation].Apply(27);
                1988-10-13  [Irrigation].Apply(10);
                1988-10-20  [Irrigation].Apply(30);
                1988-10-27  [Irrigation].Apply(25);
                1988-11-03  [Irrigation].Apply(25);
                1988-11-10  [Irrigation].Apply(47);
                1988-11-17  [Irrigation].Apply(32);
                1988-11-24  [Irrigation].Apply(18);
                1988-12-01  [Irrigation].Apply(35);
                1988-12-08  [Irrigation].Apply(24);
                1988-12-15  [Irrigation].Apply(43);
                1988-12-22  [Irrigation].Apply(32);
                1988-12-29  [Irrigation].Apply(36);
              Operations FertiliserEvents
                1988-09-26  [Fertiliser].Apply(50, Fertiliser.Types.NO3N,10);
                1988-11-02  [Fertiliser].Apply(70, Fertiliser.Types.NO3N,10);
              Manager ClimateControl: same as Validation.NewZealand.RS1988_89.Factors.Irr.Control.ClimateControl
              Manager Harvesting: same as Validation.NewZealand.RS2014_15.Dash14.Paddock.Manager folder.Harvesting
            Report DailyReport: EventNames=[Clock].DoReport
              VariableNames:
                [Clock].Today
                [Weather].MeanT
                [Soil].SoilWater.SW
                [Soil].SoilWater.SWmm
                sum([Soil].SoilWater.SWmm) as ProfileWater
                [Barley].AboveGround.N
                [Barley].AboveGround.Wt
                [Barley].AboveGroundLive.N
                [Barley].AboveGroundLive.N*10 as AboveGroundN
                [Barley].AboveGroundLive.Wt
                [Barley].AboveGroundDead.N
                [Barley].AboveGroundDead.Wt
                [Barley].Arbitrator.DMDemand
                [Barley].Arbitrator.DM.TotalFixationSupply
                [Barley].Ear.N
                [Barley].Ear.Nconc
                [Barley].Ear.Wt
                [Barley].Grain.N
                [Barley].Grain.NConc
                [Barley].Grain.Number
                [Barley].Grain.Size
                [Barley].Grain.Wt
                [Barley].Grain.Live.Wt
                [Barley].Leaf.AppearedCohortNo
                [Barley].Leaf.CoverDead
                [Barley].Leaf.CoverGreen
                [Barley].Leaf.CoverTotal
                [Barley].Leaf.Dead.N
                [Barley].Leaf.Dead.NConc
                [Barley].Leaf.Dead.Wt
                [Barley].Leaf.DeadCohortNo
                [Barley].Leaf.SenescingCohortNo
                [Barley].Leaf.ExpandedCohortNo
                [Barley].Leaf.Fn
                [Barley].Leaf.Fw
                [Barley].Leaf.Height
                [Barley].Leaf.InitialisedCohortNo
                [Barley].Leaf.LAI
                [Barley].Leaf.Live.N
                [Barley].Leaf.Live.NConc
                [Barley].Leaf.Live.Wt
                [Barley].Leaf.SpecificArea
                [Barley].Leaf.Transpiration
                [Barley].Phenology.CurrentPhaseName
                [Barley].Phenology.CurrentStageName
                [Barley].Phenology.DailyVernalisation.Value()
                [Barley].Phenology.MeanTemp.Value()
                [Barley].Phenology.Photoperiod.Value()
                [Barley].Phenology.Stage
                [Barley].Phenology.ThermalTime.Value()
                [Barley].Phenology.ThermalTime.Value
                [Barley].Phenology.Vrn1.Value()
                [Barley].Phenology.Vrn2.Value()
                [Barley].Phenology.Vrn4.Value()
                [Barley].Phenology.Zadok.Stage
                [Barley].Root.Depth
                [Barley].Root.N
                [Barley].Root.Wt
                [Barley].Root.Nconc
                [Barley].Root.WaterUptake
                [Barley].Spike.N
                [Barley].Spike.NConc
                [Barley].Spike.Wt
                [Barley].Spike.Live.StorageWt
                [Barley].Stem.N
                [Barley].Stem.NConc
                [Barley].Stem.Wt
                [Barley].Stem.PercentWSC
                [Barley].Stem.Live.StorageWt
                [Barley].StemPlusSpike.Wt
                [Barley].StemPlusSpike.N
                [Barley].SowingData.Cultivar
                [Barley].Structure.HaunStage.ValueTerminalSpikelet.Value()
                [Barley].Structure.HaunStage.Value()
                [Barley].Structure.Height
                [Barley].Structure.LeafTipsAppeared
                [Barley].Structure.FinalLeafNumber.Value()
                [Barley].Structure.FinalLeafNumber.ValueToHold.PhotoPLeaves.Value()
                [Barley].Structure.MainStemPopn
                [Barley].Structure.MeanTillerGrowthRate.Value()
                [Barley].Structure.TotalStemPopn
                [Barley].Total.N
                [Barley].Total.Wt
                [SurfaceOrganicMatter].Wt
                ([Barley].Leaf.Transpiration + [Soil].SoilWater.Es + [MicroClimate].interception) as ET
                sum([Soil].SoilNitrogen.NO3) as TotalSoilNitrogen
                [Barley].Phenology.FlagLeafDAS
                [Barley].Phenology.FloweringDAS
                [Barley].Phenology.MaturityDAS
                [Barley].Phenology.PhotoPeriod
                [Barley].Phenology.PhotoPeriodDeltaFunction
                [Barley].Phenology.Stage
                [Barley].Phenology.SoilTemperatureFunction.Value()
            Report HarvestReport: EventNames=[Clock].EndOfSimulation
              VariableNames:
                [Barley].Structure.LeafTipsAppeared
                [Barley].Structure.FinalLeafNumber
                [Barley].Phenology.FlagLeafDAS
                [Barley].Phenology.FloweringDAS
                [Barley].Phenology.MaturityDAS
                [Script].CalcVals.SowMonth
            SoluteManager
      Experiment RS1995_96
        Memo Trial details
          This is a water response trial conducted inside and outside the rain shelter at the New Zealand Institute for Plant & Food Research in Lincoln and described in De Ruiter et al (1999). Briefly, a vernalisation insensitive barley, variety "Valetta", was sown at 280 plant/m^2^ on 20 October 1995 and subjected to five water treatments as follows:

          •	Full drought (in rain shelter) – was not irrigated except for 17 mm rainfall as a result of shelter failure 42 days after sowing;

          •	Early drought (in rain shelter) – also receive 17 mm rainfall and the drought was fully relieved at the onset stem elongation;

          •	Late drought (in rain shelter) – fully irrigated (i.e. net crop water use + soil water evaporation) up to stem elongation and nil irrigation thereafter;

          •	Rain-fed (outside the rain shelter) – received all the rain but no irrigation;

          •	Full irrigation (located outside the rain shelter) – received all the rain and irrigation to replace ET.
        Factors
          Factor Water
            Factor Rainfed
              Specifications:
                [Water]
                [InitialN]
              Water
                Thickness  BD   AirDry  LL15  DUL   SAT
                200        1.3  0.08    0.08  0.29  0.44
                200        1.3  0.07    0.07  0.3   0.4
                200        1.3  0.07    0.07  0.28  0.4
                200        1.3  0.09    0.09  0.26  0.38
                200        1.3  0.11    0.11  0.26  0.38
                200        1.3  0.16    0.16  0.28  0.38
                200        1.3  0.15    0.15  0.27  0.38
                200        1.3  0.12    0.12  0.22  0.38
                SoilCrop BarleySoil: LL=[0.08, 0.07, 0.07, 0.09, 0.11, 0.16, 0.15, 0.12]; KL=[0.05, 0.03, 0.02, 0.03, 0.03, 0.03, 0.01, 0.01]; XF=[1, 1, 1, 1, 1, 1, 1, 1]
              Sample InitialN: NO3Units=kgha; NH4Units=kgha; SWUnits=Volumetric; OCUnits=Total; PHUnits=Water
                Thickness  NO3  NH4  SW
                100        23   2.2  0.27
                200        18   2    0.3
                300        15   1.8  0.28
                200        1.5  1.4  0.25
                100        1.5  1    0.24
                200        1.5  0.9  0.27
                100        1.5  0.1  0.27
                300        1    0.1  0.21
            Factor Fullirrigation
              Specifications:
                [IrrigationEvents]
                [Water]
                [InitialN]
                [ClimateControl]
              Operations IrrigationEvents
                1995-10-28  [Irrigation].Apply(2);
                1995-11-04  [Irrigation].Apply(3.8);
                1995-11-15  [Irrigation].Apply(5.2);
                1995-11-28  [Irrigation].Apply(49.3);
                1995-12-05  [Irrigation].Apply(5.3);
                1995-12-12  [Irrigation].Apply(32);
                1995-12-18  [Irrigation].Apply(5);
                1995-12-19  [Irrigation].Apply(40.3);
                1995-12-27  [Irrigation].Apply(5.3);
                1996-01-03  [Irrigation].Apply(80);
                1996-01-09  [Irrigation].Apply(50.3);
                1996-01-16  [Irrigation].Apply(36);
                1996-01-23  [Irrigation].Apply(24.8);
                1996-01-30  [Irrigation].Apply(21.4);
                1996-02-07  [Irrigation].Apply(15.9);
                1996-02-12  [Irrigation].Apply(11.3);
              Water
                Thickness  BD   AirDry  LL15  DUL    SAT
                200        1.3  0.08    0.08  0.281  0.44
                200        1.3  0.08    0.08  0.28   0.44
                200        1.3  0.09    0.09  0.27   0.44
                200        1.3  0.12    0.12  0.296  0.44
                200        1.3  0.11    0.11  0.231  0.44
                200        1.3  0.16    0.16  0.245  0.44
                200        1.3  0.1     0.1   0.204  0.44
                200        1.3  0.08    0.08  0.156  0.44
                SoilCrop BarleySoil: LL=[0.08, 0.08, 0.09, 0.12, 0.11, 0.16, 0.1, 0.08]; KL=[0.05, 0.03, 0.02, 0.03, 0.03, 0.03, 0.01, 0.01]; XF=[1, 1, 1, 1, 1, 1, 1, 1]
              Manager ClimateControl
                StartDate = 1995-10-20
                EndDate = 1996-04-01
                CCOnOff = False
                script: same as in Validation.NewZealand.RS2014_15.Dash14.Paddock.ClimateControl
              Sample InitialN: NO3Units=kgha; NH4Units=kgha; SWUnits=Volumetric; OCUnits=Total; PHUnits=Water
                Thickness  NO3  NH4  SW
                100        23   2.2  0.28
                200        18   2    0.27
                300        15   1.8  0.25
                200        1.5  1.4  0.27
                100        1.5  1    0.31
                200        1.5  0.9  0.25
                100        1.5  0.1  0.28
                300        1    0.1  0.14
            Factor Earlydrought
              Specifications:
                [IrrigationEvents]
                [Water]
                [InitialN]
                [ClimateControl]
              Operations IrrigationEvents
                1995-10-28  [Irrigation].Apply(2);
                1995-11-04  [Irrigation].Apply(0);
                1995-11-15  [Irrigation].Apply(0);
                1995-11-28  [Irrigation].Apply(31.2);
                1995-12-05  [Irrigation].Apply(5);
                1995-12-12  [Irrigation].Apply(5);
                1995-12-18  [Irrigation].Apply(0);
                1995-12-19  [Irrigation].Apply(32.1);
                1995-12-27  [Irrigation].Apply(0);
                1996-01-03  [Irrigation].Apply(79.3);
                1996-01-09  [Irrigation].Apply(44.7);
                1996-01-16  [Irrigation].Apply(38.8);
                1996-01-23  [Irrigation].Apply(30);
                1996-01-30  [Irrigation].Apply(21.4);
                1996-02-07  [Irrigation].Apply(0);
                1996-02-12  [Irrigation].Apply(0);
              Water
                Thickness  BD   AirDry  LL15  DUL      SAT
                200        1.3  0.06    0.06  0.31     0.44
                200        1.3  0.09    0.09  0.3      0.44
                200        1.3  0.07    0.07  0.28     0.44
                200        1.3  0.12    0.12  0.31145  0.44
                200        1.3  0.16    0.16  0.3079   0.44
                200        1.3  0.16    0.16  0.3007   0.44
                200        1.3  0.15    0.15  0.28705  0.44
                200        1.3  0.16    0.16  0.3117   0.44
                SoilCrop BarleySoil: LL=[0.06, 0.09, 0.07, 0.12, 0.16, 0.16, 0.15, 0.16]; KL=[0.05, 0.03, 0.02, 0.03, 0.03, 0.03, 0.01, 0.01]; XF=[1, 1, 1, 1, 1, 1, 1, 1]
              Manager ClimateControl
                StartDate = 1995-10-20
                EndDate = 1996-04-01
                CCOnOff = True
                script: same as in Validation.NewZealand.RS2014_15.Dash14.Paddock.ClimateControl
              Sample InitialN: NO3Units=kgha; NH4Units=kgha; SWUnits=Volumetric; OCUnits=Total; PHUnits=Water
                Thickness  NO3  NH4  SW
                100        23   2.2  0.27
                200        18   2    0.27
                300        15   1.8  0.21
                200        1.5  1.4  0.31
                100        1.5  1    0.31
                200        1.5  0.9  0.3
                100        1.5  0.1  0.29
                300        1    0.1  0.31
            Factor Latedrought
              Specifications:
                [IrrigationEvents]
                [Water]
                [InitialN]
                [ClimateControl]
              Operations IrrigationEvents
                1995-10-28  [Irrigation].Apply(2);
                1995-11-04  [Irrigation].Apply(0);
                1995-11-15  [Irrigation].Apply(0);
                1995-11-28  [Irrigation].Apply(47);
                1995-12-05  [Irrigation].Apply(5);
                1995-12-12  [Irrigation].Apply(30.5);
                1995-12-18  [Irrigation].Apply(5);
                1995-12-19  [Irrigation].Apply(3.1);
                1995-12-27  [Irrigation].Apply(0);
                1996-01-03  [Irrigation].Apply(0);
                1996-01-09  [Irrigation].Apply(0);
                1996-01-16  [Irrigation].Apply(0);
                1996-01-23  [Irrigation].Apply(0);
                1996-01-30  [Irrigation].Apply(0);
                1996-02-07  [Irrigation].Apply(0);
                1996-02-12  [Irrigation].Apply(0);
              Water: same as Validation.NewZealand.RS1995_96.Factors.Water.Fullirrigation.Water
              Manager ClimateControl: same as Validation.NewZealand.RS1995_96.Factors.Water.Earlydrought.ClimateControl
              Sample InitialN: NO3Units=kgha; NH4Units=kgha; SWUnits=Volumetric; OCUnits=Total; PHUnits=Water
                Thickness  NO3  NH4  SW
                100        23   2.2  0.28
                200        18   2    0.28
                300        15   1.8  0.27
                200        1.5  1.4  0.3
                100        1.5  1    0.23
                200        1.5  0.9  0.25
                100        1.5  0.1  0.2
                300        1    0.1  0.31
            Factor Fulldrought
              Specifications:
                [IrrigationEvents]
                [Water]
                [InitialN]
                [ClimateControl]
              Operations IrrigationEvents
                1995-10-28  [Irrigation].Apply(2);
                1995-11-28  [Irrigation].Apply(31.2);
                1995-12-05  [Irrigation].Apply(5);
                1995-12-18  [Irrigation].Apply(5);
                1995-12-19  [Irrigation].Apply(3.1);
              Water
                Thickness  BD   AirDry  LL15  DUL      SAT
                200        1.3  0.08    0.08  0.31     0.44
                200        1.3  0.07    0.07  0.27     0.44
                200        1.3  0.06    0.06  0.25355  0.44
                200        1.3  0.09    0.09  0.2364   0.44
                200        1.3  0.15    0.15  0.2635   0.44
                200        1.3  0.16    0.16  0.27705  0.44
                200        1.3  0.15    0.15  0.3392   0.44
                200        1.3  0.08    0.08  0.2      0.44
                SoilCrop BarleySoil: LL=[0.08, 0.07, 0.06, 0.09, 0.15, 0.16, 0.15, 0.08]; KL=[0.05, 0.03, 0.02, 0.03, 0.03, 0.03, 0.01, 0.01]; XF=[1, 1, 1, 1, 1, 1, 1, 1]
              Manager ClimateControl: same as Validation.NewZealand.RS1995_96.Factors.Water.Earlydrought.ClimateControl
              Sample InitialN: NO3Units=kgha; NH4Units=kgha; SWUnits=Volumetric; OCUnits=Total; PHUnits=Water
                Thickness  NO3  NH4  SW
                100        23   2.2  0.28
                200        18   2    0.27
                300        15   1.8  0.25
                200        1.5  1.4  0.24
                100        1.5  1    0.26
                200        1.5  0.9  0.28
                100        1.5  0.1  0.34
                300        1    0.1  0.2
          Factor N: Specifications=[FertiliserEvents]
            Operations 0
            Operations 50
              1995-10-28  [Fertiliser].Apply(50, Fertiliser.Types.NO3N,0);
            Operations 100
              1995-10-28  [Fertiliser].Apply(50, Fertiliser.Types.NO3N,0);
              1995-12-05  [Fertiliser].Apply(50, Fertiliser.Types.NO3N,0);
            Operations 150
              1995-10-28  [Fertiliser].Apply(50, Fertiliser.Types.NO3N,0);
              1995-12-05  [Fertiliser].Apply(50, Fertiliser.Types.NO3N,0);
              1995-12-18  [Fertiliser].Apply(50, Fertiliser.Types.NO3N,0);
        Simulation Rainfed
          Weather: FileName=lincoln.met
          Clock: StartDate=1995-10-19; EndDate=1996-03-31
          Summary summaryfile
          SoilArbitrator Soil Arbitrator
          Zone Paddock: Area=1; Slope=0
            Manager DAS: same as Validation.NewZealand.MCPD09_10.Ablock.Paddock.DAS
            Soil: SoilType=NZ_sedementary; Region=Plains; State=Canterbury; Country=New Zealnd; Latitude=0; Longitude=0
              Analysis: Thickness=[100, 200, 300, 300, 300, 300]; PH=[6.6, 6.2, 5.7, 5.5, 5.5, 5.5]; PHUnits=Water; BoronUnits=HotWater
              Water
                Thickness  BD    AirDry  LL15  DUL   SAT   KS
                200        1.23  0.05    0.14  0.33  0.48  4832.039
                200        1.23  0.05    0.14  0.33  0.48  389.229
                200        1.59  0.16    0.13  0.29  0.4   16.362
                200        1.57  0.17    0.11  0.28  0.38  97.995
                200        1.57  0.17    0.17  0.3   0.37  97.995
                200        1.6   0.17    0.17  0.3   0.36  97.995
                200        1.6   0.17    0.17  0.3   0.36  97.995
                200        1.6   0.12    0.12  0.3   0.32  97.995
                SoilCrop BarleySoil: LL=[0.1, 0.1, 0.157, 0.173, 0.173, 0.165, 0.165, 0.115]; KL=[0.1, 0.1, 0.1, 0.1, 0.1, 0.1, 0.1, 0.1]; XF=[1, 1, 1, 1, 1, 1, 1, 1]
              SoilWater: SummerDate=1-Nov; SummerU=6; SummerCona=2; WinterDate=1-Apr; WinterU=9; WinterCona=4.4; DiffusConst=0; DiffusSlope=0; Salb=0.18; CN2Bare=68; CNRed=20; CNCov=0.8; slope=0; discharge_width=0; catchment_area=0; max_pond=0; residueinterception=0
                Thickness  SWCON  KLAT
                200        0.9    0
                200        0.6    0
                200        0.4    0
                200        0.4    0
                200        0.4    0
                200        0.9    0
                200        0.9    0
                200        0.9    0
              SoilNitrogen: fom_type=[default, manure, mucuna, lablab, shemp, stable]; fract_carb=[0.2, 0.3, 0.54, 0.57, 0.45, 0]; fract_cell=[0.7, 0.3, 0.37, 0.37, 0.47, 0.1]; fract_lign=[0.1, 0.4, 0.09, 0.06, 0.08, 0.9]; wfpsN2N2O_x=[22, 88]; wfpsN2N2O_y=[0.1, 1]
              SoilOrganicMatter: same as Validation.NewZealand.RS2014_15.Dash14.Paddock.Soil.SoilOrganicMatter
              Sample InitialN: NO3Units=kgha; NH4Units=kgha; SWUnits=Volumetric; OCUnits=Total; PHUnits=Water
                Thickness  NO3  NH4  SW
                100        23   2.2  0.31
                200        18   2    0.31
                300        15   1.8  0.16
                200        1.5  1.4  0.15
                100        1.5  1    0.2
                200        1.1  0.9  0.2
                100        1    0.1  0.2
                300        1    0.1  0.2
              CERESSoilTemperature
            Plant Barley: CropType=Barley
            SurfaceOrganicMatter Surface Organic Matter: same as Validation.NewZealand.MCPD09_10.Ablock.Paddock.Surface Organic Matter
            MicroClimate: a_interception=0; b_interception=1; c_interception=0; d_interception=0; soil_albedo=0.3; sun_angle=15; soil_heat_flux_fraction=0.4; night_interception_fraction=0.5; refheight=2; albedo=0.293662; emissivity=0.96; RadIntTotal=0
            Irrigation
            Fertiliser
            Folder Manager folder
              Operations SowingEvent
                1995-10-20  [Barley].Sow(population:280, cultivar:"Valetta", depth:40, rowSpacing:150);
              Operations IrrigationEvents
                1995-10-28  [Irrigation].Apply(2);
                1995-11-04  [Irrigation].Apply(0);
                1995-11-15  [Irrigation].Apply(0);
                1995-11-28  [Irrigation].Apply(21.3);
                1995-12-05  [Irrigation].Apply(5.3);
                1995-12-12  [Irrigation].Apply(1.5);
                1995-12-18  [Irrigation].Apply(5);
                1995-12-19  [Irrigation].Apply(11.3);
                1995-12-27  [Irrigation].Apply(5.3);
                1996-01-03  [Irrigation].Apply(2.8);
                1996-01-09  [Irrigation].Apply(8.4);
                1996-01-16  [Irrigation].Apply(5.9);
                1996-01-23  [Irrigation].Apply(0.7);
                1996-01-30  [Irrigation].Apply(0.7);
                1996-02-07  [Irrigation].Apply(0);
                1996-02-12  [Irrigation].Apply(0);
              Operations FertiliserEvents
                1995-10-28  [Fertiliser].Apply(50, Fertiliser.Types.NO3N,0);
                1995-12-05  [Fertiliser].Apply(50, Fertiliser.Types.NO3N,0);
                1995-12-18  [Fertiliser].Apply(50, Fertiliser.Types.NO3N,0);
            Manager ClimateControl
              StartDate = 1995-10-15
              EndDate = 1996-04-01
              CCOnOff = False
              script: same as in Validation.NewZealand.RS2014_15.Dash14.Paddock.ClimateControl
            Manager Harvesting: same as Validation.NewZealand.RS2014_15.Dash14.Paddock.Manager folder.Harvesting
            Report DailyReport: EventNames=[Clock].DoReport
              VariableNames:
                [Clock].Today
                [Weather].MeanT
                [Soil].SoilWater.SW
                [Soil].SoilWater.SWmm
                sum([Soil].SoilWater.SWmm) as ProfileWater
                [Barley].AboveGround.N
                [Barley].AboveGround.Wt
                [Barley].AboveGroundLive.N
                [Barley].AboveGroundLive.N*10 as AboveGroundN
                [Barley].AboveGroundLive.Wt
                [Barley].AboveGroundDead.N
                [Barley].AboveGroundDead.Wt
                [Barley].Arbitrator.DMDemand
                [Barley].Arbitrator.DM.TotalFixationSupply
                [Barley].Ear.N
                [Barley].Ear.Nconc
                [Barley].Ear.Wt
                [Barley].Grain.N
                [Barley].Grain.NConc
                [Barley].Grain.Number
                [Barley].Grain.Size
                [Barley].Grain.Wt
                [Barley].Grain.Live.Wt
                [Barley].Leaf.AppearedCohortNo
                [Barley].Leaf.CoverDead
                [Barley].Leaf.CoverGreen
                [Barley].Leaf.CoverTotal
                [Barley].Leaf.Dead.N
                [Barley].Leaf.Dead.NConc
                [Barley].Leaf.Dead.Wt
                [Barley].Leaf.DeadCohortNo
                [Barley].Leaf.SenescingCohortNo
                [Barley].Leaf.ExpandedCohortNo
                [Barley].Leaf.Fn
                [Barley].Leaf.Fw
                [Barley].Leaf.Height
                [Barley].Leaf.InitialisedCohortNo
                [Barley].Leaf.LAI
                [Barley].Leaf.Live.N
                [Barley].Leaf.Live.NConc
                [Barley].Leaf.Live.Wt
                [Barley].Leaf.SpecificArea
                [Barley].Leaf.Transpiration
                [Barley].Phenology.CurrentPhaseName
                [Barley].Phenology.CurrentStageName
                [Barley].Phenology.DailyVernalisation.Value()
                [Barley].Phenology.MeanTemp.Value()
                [Barley].Phenology.Photoperiod.Value()
                [Barley].Phenology.Stage
                [Barley].Phenology.ThermalTime.Value()
                [Barley].Phenology.ThermalTime.Value
                [Barley].Phenology.Vrn1.Value()
                [Barley].Phenology.Vrn2.Value()
                [Barley].Phenology.Vrn4.Value()
                [Barley].Phenology.Zadok.Stage
                [Barley].Root.Depth
                [Barley].Root.N
                [Barley].Root.Wt
                [Barley].Root.Nconc
                [Barley].Root.WaterUptake
                [Barley].Spike.N
                [Barley].Spike.NConc
                [Barley].Spike.Wt
                [Barley].Spike.Live.StorageWt
                [Barley].Stem.N
                [Barley].Stem.NConc
                [Barley].Stem.Wt
                [Barley].Stem.PercentWSC
                [Barley].Stem.Live.StorageWt
                [Barley].StemPlusSpike.Wt
                [Barley].StemPlusSpike.N
                [Barley].SowingData.Cultivar
                [Barley].Structure.HaunStage.ValueTerminalSpikelet.Value()
                [Barley].Structure.HaunStage.Value()
                [Barley].Structure.Height
                [Barley].Structure.LeafTipsAppeared
                [Barley].Structure.FinalLeafNumber.Value()
                [Barley].Structure.FinalLeafNumber.ValueToHold.PhotoPLeaves.Value()
                [Barley].Structure.MainStemPopn
                [Barley].Structure.MeanTillerGrowthRate.Value()
                [Barley].Structure.TotalStemPopn
                [Barley].Total.N
                [Barley].Total.Wt
                [SurfaceOrganicMatter].Wt
                ([Barley].Leaf.Transpiration + [Soil].SoilWater.Es + [MicroClimate].interception) as ET
                sum([Soil].SoilNitrogen.NO3) as TotalSoilNitrogen
                [Barley].Phenology.FlagLeafDAS
                [Barley].Phenology.FloweringDAS
                [Barley].Phenology.MaturityDAS
                [Barley].Phenology.PhotoPeriod
                [Barley].Phenology.PhotoPeriodDeltaFunction
                [Barley].Phenology.Stage
                [Barley].Phenology.SoilTemperatureFunction.Value()
                [Barley].Population
                [Soil].SoilNitrogen.TotalN
                sum([Soil].SoilWater.SWmm) as sw_dep
            Report HarvestReport: EventNames=[Clock].EndOfSimulation
              VariableNames:
                [Barley].Structure.LeafTipsAppeared
                [Barley].Structure.FinalLeafNumber
                [Barley].Phenology.FlagLeafDAS
                [Barley].Phenology.FloweringDAS
                [Barley].Phenology.MaturityDAS
                [Script].CalcVals.SowMonth
            SoluteManager
      Experiment LUDF2015_16
        Memo Trial details
          This is the mineral nitrogen (N) validation trial conducted at the Lincoln University Dairy Farm on a deep well-drained Templeton silt loam soil. The trial ran from September 2015 to February 2016. Five N fertiliser treatments were evaluated:
          •	Nil (0%) N - the crop did not get any fertiliser N
          •	50% N - the crop received 50% of the required fertiliser N
          •	75% N - the crop received 75% of the required fertiliser N
          •	100% N - the crop received the required fertiliser N as estimated by the fertiliser calculator
          •	125% N - the crop received 25% fertiliser N above the requirement.
        Factors
          Factor NProp
            Factor 0: Specifications=[FertiliserEvents]
              Operations FertiliserEvents
                2015-11-10  [Fertiliser].Apply(0, Fertiliser.Types.NO3N,0);
                2015-11-29  [Fertiliser].Apply(0, Fertiliser.Types.NO3N,0);
                2015-12-16  [Fertiliser].Apply(0, Fertiliser.Types.NO3N,0);
                2015-12-16  [Fertiliser].Apply(0, Fertiliser.Types.NO3N,0);
            Factor 50: Specifications=[FertiliserEvents]
              Operations FertiliserEvents
                2015-11-10  [Fertiliser].Apply(23, Fertiliser.Types.NO3N,0);
                2015-11-29  [Fertiliser].Apply(23, Fertiliser.Types.NO3N,0);
                2015-12-16  [Fertiliser].Apply(23, Fertiliser.Types.NO3N,0);
                2015-12-16  [Fertiliser].Apply(23, Fertiliser.Types.NO3N,0);
            Factor 75: Specifications=[FertiliserEvents]
              Operations FertiliserEvents
                2015-11-10  [Fertiliser].Apply(34, Fertiliser.Types.NO3N,0);
                2015-11-29  [Fertiliser].Apply(34, Fertiliser.Types.NO3N,0);
                2015-12-16  [Fertiliser].Apply(34, Fertiliser.Types.NO3N,0);
                2015-12-16  [Fertiliser].Apply(34, Fertiliser.Types.NO3N,0);
            Factor 100: Specifications=[FertiliserEvents]
              Operations FertiliserEvents
                2015-11-10  [Fertiliser].Apply(45, Fertiliser.Types.NO3N,0);
                2015-11-29  [Fertiliser].Apply(45, Fertiliser.Types.NO3N,0);
                2015-12-16  [Fertiliser].Apply(45, Fertiliser.Types.NO3N,0);
                2015-12-16  [Fertiliser].Apply(45, Fertiliser.Types.NO3N,0);
            Factor 125: Specifications=[FertiliserEvents]
              Operations FertiliserEvents
                2015-11-10  [Fertiliser].Apply(56, Fertiliser.Types.NO3N,0);
                2015-11-29  [Fertiliser].Apply(56, Fertiliser.Types.NO3N,0);
                2015-12-16  [Fertiliser].Apply(56, Fertiliser.Types.NO3N,0);
                2015-12-16  [Fertiliser].Apply(56, Fertiliser.Types.NO3N,0);
        Simulation Base_ZeroN
          Weather: FileName=Lincoln15-17.met
          Clock: StartDate=2015-09-11; EndDate=2016-03-31
          Summary summaryfile
          SoilArbitrator Soil Arbitrator
          Zone Paddock: Area=1; Slope=0
            Manager DAS: same as Validation.NewZealand.MCPD09_10.Ablock.Paddock.DAS
            Soil: SoilType=NZ_sedementary; Region=Plains; State=Canterbury; Country=New Zealnd; Latitude=0; Longitude=0
              Analysis: Thickness=[150, 150, 300, 300, 300, 300]; PH=[6.6, 6.2, 5.7, 5.5, 5.5, 5.5]; PHUnits=Water; BoronUnits=HotWater
              Water
                Thickness  BD    AirDry  LL15  DUL   SAT   KS
                150        1.23  0.05    0.14  0.33  0.48  4832.039
                150        1.23  0.05    0.14  0.33  0.48  389.229
                300        1.59  0.16    0.16  0.29  0.4   16.362
                300        1.57  0.17    0.17  0.28  0.38  97.995
                300        1.57  0.17    0.17  0.3   0.37  97.995
                300        1.6   0.17    0.17  0.3   0.36  97.995
                SoilCrop BarleySoil: LL=[0.1, 0.1, 0.157, 0.173, 0.173, 0.165]; KL=[0.1, 0.1, 0.1, 0.1, 0.1, 0.1]; XF=[1, 1, 1, 1, 1, 1]
              SoilWater: same as Validation.NewZealand.MCPD09_10.Ablock.Paddock.Soil.SoilWater
              SoilNitrogen: fom_type=[default, manure, mucuna, lablab, shemp, stable]; fract_carb=[0.2, 0.3, 0.54, 0.57, 0.45, 0]; fract_cell=[0.7, 0.3, 0.37, 0.37, 0.47, 0.1]; fract_lign=[0.1, 0.4, 0.09, 0.06, 0.08, 0.9]; wfpsN2N2O_x=[22, 88]; wfpsN2N2O_y=[0.1, 1]
              SoilOrganicMatter: same as Validation.NewZealand.MCPD11_12.Field11_12.Paddock.Soil.SoilOrganicMatter
              Sample InitialN: NO3Units=kgha; NH4Units=kgha; SWUnits=Volumetric; OCUnits=Total; PHUnits=Water
                Thickness  NO3   NH4  SW
                150        8.4   2    0.31
                150        11.6  0.6  0.31
                300        10    0.8  0.16
                300        11    0.3  0.15
                300        9     0.2  0.2
                300        3     0.4  0.2
              CERESSoilTemperature
              Sample Initial water: Thickness=[150, 150, 300, 300, 300, 300]; SW=[0.31, 0.31, 0.16, 0.15, 0.2, 0.2]; NO3Units=kgha; NH4Units=kgha; SWUnits=Volumetric; OCUnits=Total; PHUnits=Water
            Plant Barley: CropType=Barley
            SurfaceOrganicMatter Surface Organic Matter: same as Validation.NewZealand.MCPD09_10.Ablock.Paddock.Surface Organic Matter
            MicroClimate: a_interception=0; b_interception=1; c_interception=0; d_interception=0; soil_albedo=0.3; sun_angle=15; soil_heat_flux_fraction=0.4; night_interception_fraction=0.5; refheight=2; albedo=0.293662; emissivity=0.96; RadIntTotal=0
            Irrigation
            Fertiliser
            Folder Manager folder
              Operations SowingEvent
                2015-09-28  [Barley].Sow(population:280, cultivar:"Bumpa", depth:40, rowSpacing:150);
              Operations IrrigationEvents
                2015-10-19  [Irrigation].Apply(30);
                2015-11-26  [Irrigation].Apply(30);
                2015-12-01  [Irrigation].Apply(30);
                2015-12-10  [Irrigation].Apply(30);
              Operations FertiliserEvents
                2015-11-10  [Fertiliser].Apply(0, Fertiliser.Types.NO3N,0);
                2015-11-29  [Fertiliser].Apply(0, Fertiliser.Types.NO3N,0);
                2015-12-16  [Fertiliser].Apply(0, Fertiliser.Types.NO3N,0);
                2015-12-16  [Fertiliser].Apply(0, Fertiliser.Types.NO3N,0);
              Manager Harvesting: same as Validation.NewZealand.MCPD09_10.Ablock.Paddock.Manager folder.Harvesting
            Report DailyReport: same as Validation.NewZealand.MCPD09_10.Ablock.Paddock.DailyReport
            Report HarvestReport: EventNames=[Clock].EndOfSimulation
              VariableNames:
                [Barley].Structure.LeafTipsAppeared
                [Barley].Structure.FinalLeafNumber
                [Barley].Phenology.FlagLeafDAS
                [Barley].Phenology.FloweringDAS
                [Barley].Phenology.MaturityDAS
                [Script].CalcVals.SowMonth
            SoluteManager
        Memo
          Total biomass data is suspect
        Memo
          Total biomass data is suspect
        Memo
          Total biomass data is suspect
      Experiment ABlock99_00
        Memo Trial details
          This was a nitrogen*irrigation trial conducted at Lincoln
          •	Two water treatments; Rainfed (nil irrigation) and irrigated (310 mm)
          •	Two fertiliser N treatments; 0N (no fertiliser) and 150N (150 kg N/ha)
        Factors
          Factor Sow
            Factor May
              Specifications:
                [Sowing].Script.SowingDate = 1999-05-28
                [FertAndIrrig]
              Operations FertAndIrrig
                1999-10-28  [Irrigation].Apply(25);
                1999-12-01  [Irrigation].Apply(40);
                1999-12-17  [Irrigation].Apply(40);
                1999-08-06  [Fertiliser].Apply(50, Fertiliser.Types.NO3N,10);
                1999-08-31  [Fertiliser].Apply(50, Fertiliser.Types.NO3N,10);
                1999-10-07  [Fertiliser].Apply(50, Fertiliser.Types.NO3N,10);
            Factor Aug
              Specifications:
                [Sowing].Script.SowingDate = 1999-08-30
                [FertAndIrrig]
              Operations FertAndIrrig
                1999-10-28  [Irrigation].Apply(25);
                1999-12-01  [Irrigation].Apply(40);
                1999-12-17  [Irrigation].Apply(40);
                1999-10-06  [Fertiliser].Apply(50, Fertiliser.Types.NO3N,10);
                1999-10-29  [Fertiliser].Apply(50, Fertiliser.Types.NO3N,10);
                1999-11-24  [Fertiliser].Apply(50, Fertiliser.Types.NO3N,10);
            Factor Nov
              Specifications:
                [Sowing].Script.SowingDate = 1999-11-24
                [FertAndIrrig]
              Operations FertAndIrrig
                1999-12-17  [Irrigation].Apply(40);
                2000-02-17  [Irrigation].Apply(40);
                1999-11-24  [Fertiliser].Apply(50, Fertiliser.Types.NO3N,10);
                1999-12-14  [Fertiliser].Apply(50, Fertiliser.Types.NO3N,10);
                2000-01-12  [Fertiliser].Apply(50, Fertiliser.Types.NO3N,10);
          Factor Pop: Specifications=[Sowing].Script.Popn = 100,200,300,400
        Simulation AblockSD
          Weather: FileName=lincoln.met
          Clock: StartDate=1999-05-20; EndDate=2000-05-30
          Summary summaryfile
          SoilArbitrator Soil Arbitrator
          Zone Paddock: Area=1; Slope=0
            Soil: SoilType=NZ_sedementary; Region=Plains; State=Canterbury; Country=New Zealnd; Latitude=0; Longitude=0
              Analysis: Thickness=[150, 150, 300, 300, 300, 300]; PH=[6.6, 6.2, 5.7, 5.5, 5.5, 5.5]; PHUnits=Water; BoronUnits=HotWater
              Water: same as Validation.NewZealand.MCPD11_12.Field11_12.Paddock.Soil.Water
              SoilWater: same as Validation.NewZealand.MCPD09_10.Ablock.Paddock.Soil.SoilWater
              SoilNitrogen: fom_type=[default, manure, mucuna, lablab, shemp, stable]; fract_carb=[0.2, 0.3, 0.54, 0.57, 0.45, 0]; fract_cell=[0.7, 0.3, 0.37, 0.37, 0.47, 0.1]; fract_lign=[0.1, 0.4, 0.09, 0.06, 0.08, 0.9]; wfpsN2N2O_x=[22, 88]; wfpsN2N2O_y=[0.1, 1]
              SoilOrganicMatter: same as Validation.NewZealand.MCPD11_12.Field11_12.Paddock.Soil.SoilOrganicMatter
              Sample InitialN: NO3Units=kgha; NH4Units=kgha; SWUnits=Volumetric; OCUnits=Total; PHUnits=Water
                Thickness  NO3   NH4
                150        8.4   2
                150        11.6  0.6
                300        10    0.8
                300        11    0.3
                300        9     0.2
                300        3     0.4
              CERESSoilTemperature
              Sample Initial water: Thickness=[200, 200, 200, 200, 200, 200, 200, 200]; SW=[0.33, 0.33, 0.3, 0.31, 0.32, 0.33, 0.34, 0.33]; NO3Units=kgha; NH4Units=kgha; SWUnits=Volumetric; OCUnits=Total; PHUnits=Water
            SoluteManager
            Plant Barley: CropType=Barley
            SurfaceOrganicMatter Surface Organic Matter: same as Validation.NewZealand.MCPD09_10.Ablock.Paddock.Surface Organic Matter
            MicroClimate: a_interception=0; b_interception=1; c_interception=0; d_interception=0; soil_albedo=0.3; sun_angle=15; soil_heat_flux_fraction=0.4; night_interception_fraction=0.5; refheight=2; albedo=0.293662; emissivity=0.96; RadIntTotal=0
            Irrigation
            Fertiliser
            Folder Manager folder
              Manager LeafSize: same as Validation.NewZealand.MCPD11_12.Field11_12.Paddock.Manager folder.LeafSize
              Manager Sowing
                SowDepth = 20
                Popn = 300
                SowingDate = 1999-05-28
                CultivarName = Dash
```csharp
using System;
using Models.Core;
using System.Collections.Generic;
using System.Text;
using Models.PMF;
using Models;
using System.Xml.Serialization;
using APSIM.Shared.Utilities;
using System.Data;
using Models.PMF.Interfaces;
using Models.SurfaceOM;

namespace Models
{
    [Serializable] 
    public class Script : Model
    {
        [Link] Plant Barley;
        [Link] Clock Clock;
                
        [Description("SowDepth")]
        public double SowDepth { get; set; }
        [Description("Population")]
        public double Popn { get; set; }
        [Description("Sowing Date")]
        public DateTime SowingDate { get; set; }
        [Description("Cultivar")]
        [Display(DisplayType = DisplayAttribute.DisplayTypeEnum.CultivarName)]
        public string CultivarName { get; set; }

        
        [EventSubscribe("DoManagement")]
        private void OnDoManagement(object sender, EventArgs e)
        {
            if (Clock.Today.Date == SowingDate)
            {
                Barley.Sow(cultivar: CultivarName, population: Popn, depth: SowDepth, rowSpacing: 150);
            }
        }
    }
}
```
              Manager Harvesting: same as Validation.NewZealand.MCPD09_10.Ablock.Paddock.Manager folder.Harvesting
              Operations FertAndIrrig
                1999-10-29  Irrigation.Apply(
            Report DailyReport: same as Validation.NewZealand.MCPD09_10.Ablock.Paddock.DailyReport
            Report HarvestReport: EventNames=[Clock].EndOfSimulation
              VariableNames:
                [Barley].Structure.LeafTipsAppeared
                [Barley].Structure.FinalLeafNumber
                [Barley].Phenology.FlagLeafDAS
                [Barley].Phenology.FloweringDAS
                [Barley].Phenology.MaturityDAS
                [Script].CalcVals.SowMonth
            Report SupReport: same as Validation.NewZealand.MCPD11_12.Field11_12.Paddock.SupReport
      Folder CPT
        Memo Trial details
          This was a cultivar evaluation trial conducted between 2003 and 2006 for crops sown in May or September. Observations made were (i) final leaf number (ii) DAS to flag leaf appearance and (iii) DAS to flowering.
        Experiment CPT
          Factors
            Factor Cult
              Specifications=[SowAndHarvest].Script.Cultivar = Boss,Cellar,County,Dash,Doyen,Omaka,Optic,Pyramid,Sherwood,Tavern,Vortex
            Factor SD
              Specifications=[Clock].StartDate  = 2002-05-15,2002-09-09,2003-05-21,2003-09-02,2004-05-28,2004-09-06,2005-05-27,2005-09-05,2006-05-10,2006-10-11
          Simulation Boss
            Weather: FileName=lincoln.met
            Clock: StartDate=2003-05-01; EndDate=2007-12-31
            Summary summaryfile
            SoilArbitrator Soil Arbitrator
            Manager DAS: same as Validation.NewZealand.MCPD09_10.Ablock.Paddock.DAS
            Zone Paddock: Area=1; Slope=0
              Soil: SoilType=NZ_sedementary; Region=Plains; State=Canterbury; Country=New Zealnd; Latitude=0; Longitude=0
                Analysis: Thickness=[100, 200, 300, 300, 300, 300]; PH=[6.6, 6.2, 5.7, 5.5, 5.5, 5.5]; PHUnits=Water; BoronUnits=HotWater
                Water
                  Thickness  BD    AirDry  LL15  DUL   SAT   KS
                  200        1.23  0.05    0.14  0.33  0.48  4832.039
                  200        1.23  0.05    0.14  0.33  0.48  389.229
                  200        1.59  0.16    0.16  0.29  0.4   16.362
                  200        1.57  0.17    0.17  0.28  0.38  97.995
                  200        1.57  0.17    0.17  0.3   0.37  97.995
                  200        1.6   0.17    0.17  0.3   0.36  97.995
                  200        1.6   0.17    0.17  0.3   0.36  97.995
                  200        1.6   0.12    0.12  0.3   0.32  97.995
                  SoilCrop BarleySoil: LL=[0.1, 0.1, 0.157, 0.173, 0.173, 0.165, 0.165, 0.115]; KL=[0.1, 0.1, 0.1, 0.1, 0.1, 0.1, 0.1, 0.1]; XF=[1, 1, 1, 1, 1, 1, 1, 1]
                SoilWater: same as Validation.NewZealand.RS1995_96.Rainfed.Paddock.Soil.SoilWater
                SoilNitrogen: fom_type=[default, manure, mucuna, lablab, shemp, stable]; fract_carb=[0.2, 0.3, 0.54, 0.57, 0.45, 0]; fract_cell=[0.7, 0.3, 0.37, 0.37, 0.47, 0.1]; fract_lign=[0.1, 0.4, 0.09, 0.06, 0.08, 0.9]; wfpsN2N2O_x=[22, 88]; wfpsN2N2O_y=[0.1, 1]
                SoilOrganicMatter: same as Validation.NewZealand.RS2014_15.Dash14.Paddock.Soil.SoilOrganicMatter
                Sample Initial water: Thickness=[200, 200, 200, 200, 200, 200, 200, 200]; SW=[0.31, 0.31, 0.16, 0.15, 0.1, 0.1, 0.11, 0.12]; NO3Units=kgha; NH4Units=ppm; SWUnits=Volumetric; OCUnits=Total; PHUnits=Water
                Sample InitialN: NO3Units=kgha; NH4Units=kgha; SWUnits=Volumetric; OCUnits=Total; PHUnits=Water
                  Thickness  NO3  NH4  SW
                  100        23   2.2  0.31
                  200        18   2    0.31
                  300        15   1.8  0.16
                  200        1.5  1.2  0.15
                  100        1.5  1    0.2
                  200        1.5  0.9  0.2
                  100        1.5  0.1  0.2
                  300        1    0.1  0.2
                CERESSoilTemperature
              Plant Barley: CropType=Barley
              SurfaceOrganicMatter Surface Organic Matter: same as Validation.NewZealand.MCPD09_10.Ablock.Paddock.Surface Organic Matter
              MicroClimate: a_interception=0; b_interception=1; c_interception=0; d_interception=0; soil_albedo=0.3; sun_angle=15; soil_heat_flux_fraction=0.4; night_interception_fraction=0.5; refheight=2; albedo=0.293662; emissivity=0.96; RadIntTotal=0
              Irrigation
              Fertiliser
              SoluteManager
              Manager Auto_Irrigation
                Trigger_Def = 30
                Irrigation_Amount = 30
                Top_Depth = 1000
```csharp
using System;
using Models.Core;
using Models.PMF;
using Models.Soils;
using System.Xml.Serialization;
using Models.PMF;
using APSIM.Shared.Utilities;

        
namespace Models
{
    [Serializable] 
    [System.Xml.Serialization.XmlInclude(typeof(Model))]
    public class Script : Model
    {
        //Communication to other modules
        [Link] ISummary summary = null;
        [Link] Irrigation Irrig;
        [Link] Clock Clock;
        [Link] Soils.Soil soil;
        [Link] Plant Barley;
        [Link] Simulation Simulation;
        
       
        //User inputs from properties tab

        [Description("Deficit to trigger irrigation Y(mm)")]
        public double Trigger_Def { get; set; }
        [Description("Irrigation application Y(mm)")]
        public double Irrigation_Amount { get; set; }
        [Description("Depth to calculate Deficit (mm)")]
        public double Top_Depth { get; set; }
        
        //private
        [XmlIgnore] public bool SoilIsDry { get; set; }
        [XmlIgnore] public double Top_DUL { get; set; }
        [XmlIgnore] public double Top_Refull { get; set; }
        [XmlIgnore] public double Top_Trigger { get; set; }
        [XmlIgnore] public double Top_LL { get; set; }
        [XmlIgnore] public double Top_SW { get; set; }
        [XmlIgnore] public double Accumulated_depth { get; set; }
        [XmlIgnore] public double Current_Deficit { get; set; }
        
        
       
    
        //Calculate static soil variables
        [EventSubscribe("StartOfSimulation")]
        private void OnStartOfSimulation(object sender, EventArgs e)
        {   
            //Calculated soil water variables
            Accumulated_depth = 0;
            for (int layer = 0; Accumulated_depth < Top_Depth; layer++)
            {
                Top_LL += soil.LL15mm[layer];
                Top_DUL += soil.DULmm[layer];
                Accumulated_depth += soil.Thickness[layer];
            }
            Top_Trigger = Top_DUL - Trigger_Def;
            //SeasonIsOpen = false;
        
        }
       
      
        //Determine daily requirement for irrigation
        [EventSubscribe("DoManagement")]
        private void OnDoManagement(object sender, EventArgs e)
        {
            //double DAS = (double)Apsim.Get(Simulation, "DAS.Script.DAS");
                        
        
        
        
            
              
            //Is the soil dry enough to require irrigation?
            SoilIsDry = false;
            double CurrentRootDepth = 0;
            double RootDepth = Barley.Root.Depth;
            CurrentRootDepth = Math.Max(RootDepth, CurrentRootDepth);
          
            Accumulated_depth = 0;
            Top_SW = 0;
            for (int layer = 0; Accumulated_depth < Top_Depth; layer++)
            {
                Top_SW += soil.SoilWater.SWmm[layer];
                Accumulated_depth += soil.Thickness[layer];
            }
            
            if (Top_SW <= Top_Trigger)
                SoilIsDry = true;
            
                
            
            if (SoilIsDry) //Set Deficit-based irrigation
            {
                
                
                Irrig.Apply(Irrigation_Amount);
                summary.WriteMessage(this, "Automatic Irrigation");
                
                            
            }
        }
    }
}
```
              Manager ApplyN_at_sowing
```csharp
using System;
using Models.Core;
using System.Collections.Generic;
using System.Text;
using Models.Soils;
using Models.PMF;
using Models;
using System.Xml.Serialization;
using APSIM.Shared.Utilities;

namespace Models
{
    [Serializable] 
    public class Script : Model
    {
        [Link] Clock Clock;
        [Link] Fertiliser Fertiliser;
        [Link] Irrigation Irrig;
        [Link] Simulation Simulation;
        
                    
        [XmlIgnore] public bool InitialDay { get; set; }
        //[XmlIgnore] public double FertN { get; set; }
        
        [EventSubscribe("Commencing")]
        private void OnSimulationCommencing(object sender, EventArgs e)
        {
            InitialDay = true;
        }
        
        [EventSubscribe("DoManagement")]
        private void OnDoManagement(object sender, EventArgs e)
        {
            double DAS = (double)Apsim.Get(Simulation, "DAS.Script.DAS");
            if (DAS == 1)
                Fertiliser.Apply(100, Fertiliser.Types.NO3N, 50);
        }
    }
    
}
```
              Manager SowAndHarvest
                Cultivar = Otane
```csharp
using System;
using Models.Core;
using Models.PMF;
using APSIM.Shared.Utilities;
using System.Xml.Serialization;
        
namespace Models
{
    [Serializable] 
    [System.Xml.Serialization.XmlInclude(typeof(Model))]
    public class Script : Model
    {
        [Link] Plant Barley;
        [Link] Clock Clock;
        [Link] Simulation sim;
        [Link] Summary Summary;
        
        [Description("Cultivar")]
        public string Cultivar { get; set; }
        
        [XmlIgnore] public bool Sown { get; set; }
        [XmlIgnore] public bool Harvested { get; set; }
        [XmlIgnore] public bool EndSet { get; set; }
        
        [EventSubscribe("Commencing")]
        private void OnSimulationCommencing(object sender, EventArgs e)
        {
            Sown = false;
            Harvested = false;
            EndSet = false;
        }
        
        [EventSubscribe("DoManagement")]
        private void OnDoManagement(object sender, EventArgs e)
        {
            if (Sown == false)
            {
                Barley.Sow(population: 200, cultivar: Cultivar, depth: 15, rowSpacing: 150, budNumber: 1);
                Sown = true;
            }
            
            if (Barley.Phenology.CurrentPhaseName == "ReadyForHarvesting")
            {
                Barley.Harvest();
                Barley.EndCrop();
                Harvested = true;
                Summary.WriteMessage(this, "Flowering reached so setting end date to stop simulation");
            }
            
            if ((Harvested == true) && (EndSet == false))
            {
                sim.Set("Clock.EndDate", Clock.Today.AddDays(1));
                EndSet = true;
            }
        }
    }
}
```
              Report HarvestReport: EventNames=[Clock].EndOfSimulation
              Report DailyReport: EventNames=[Clock].DoReport
    Folder Australia
      Memo Trial details
        •	These simulations are inherited from barley validation (Path = Apsim\Tests\Validation\Barley) & modified for ApsimX.
        •	HRS = Hermitage Research Station (28" l8/S, 152"06/E, altitude 480 m), near Warwick, Queensland) - see Goyne et al. (1996).
        •	This reference indicates plant population of 90/m2 and row spacing of 0.5 m (adopted here as a place holder).
        •	Roma Research Station (R?) – see Table 1 in Goyne et al. (1996).
        •	Kingsthorpe (Kthpe?) – see Table 1 in Goyne et al. (1996).
      Folder MCVP
        Experiment MCVPGatton
          Factors
            Factor Cv
              Specifications=[SowingRule].Script.CultivarName = Baudin, Buloke, Capstan, Commander, Fleet, Hindmarsh, Keel, Oxford
            Factor TOS: Specifications=[SowingRule].Script.SowDate = 16-may, 26-jun
          Simulation MCVPGattonBase
            Clock: StartDate=2011-05-05; EndDate=2011-12-29
            Weather: FileName=Gatton.met
            Summary summaryfile
            SoilArbitrator Soil Arbitrator
            Manager DAS: same as Validation.NewZealand.MCPD09_10.Ablock.Paddock.DAS
            Zone paddock: Area=1; Slope=0
              Folder Management
                Manager Auto_Irrigation
                  Trigger_Def = 30
                  Irrigation_Amount = 30
                  Top_Depth = 1000
```csharp
using System;
using Models.Core;
using Models.PMF;
using Models.Soils;
using System.Xml.Serialization;
using Models.PMF;
using APSIM.Shared.Utilities;

        
namespace Models
{
    [Serializable] 
    [System.Xml.Serialization.XmlInclude(typeof(Model))]
    public class Script : Model
    {
        //Communication to other modules
        [Link] ISummary summary = null;
        [Link] Irrigation Irrig;
        [Link] Clock Clock;
        [Link] Soils.Soil soil;
        [Link] Plant Barley;
        [Link] Simulation Simulation;
        
       
        //User inputs from properties tab

        [Description("Deficit to trigger irrigation(mm)")]
        public double Trigger_Def { get; set; }
        [Description("Irrigation application(mm)")]
        public double Irrigation_Amount { get; set; }
        [Description("Depth to calculate Deficit(mm)")]
        public double Top_Depth { get; set; }
        
        //private
        [XmlIgnore] public bool SoilIsDry { get; set; }
        [XmlIgnore] public double Top_DUL { get; set; }
        [XmlIgnore] public double Top_Refull { get; set; }
        [XmlIgnore] public double Top_Trigger { get; set; }
        [XmlIgnore] public double Top_LL { get; set; }
        [XmlIgnore] public double Top_SW { get; set; }
        [XmlIgnore] public double Accumulated_depth { get; set; }
        [XmlIgnore] public double Current_Deficit { get; set; }
        
        
       
    
        //Calculate static soil variables
        [EventSubscribe("StartOfSimulation")]
        private void OnStartOfSimulation(object sender, EventArgs e)
        {   
            //Calculated soil water variables
            Accumulated_depth = 0;
            for (int layer = 0; Accumulated_depth < Top_Depth; layer++)
            {
                Top_LL += soil.LL15mm[layer];
                Top_DUL += soil.DULmm[layer];
                Accumulated_depth += soil.Thickness[layer];
            }
            Top_Trigger = Top_DUL - Trigger_Def;
            //SeasonIsOpen = false;
        
        }
       
      
        //Determine daily requirement for irrigation
        [EventSubscribe("DoManagement")]
        private void OnDoManagement(object sender, EventArgs e)
        {
            //double DAS = (double)Apsim.Get(Simulation, "DAS.Script.DAS");
                        
        
        
        
            
              
            //Is the soil dry enough to require irrigation?
            SoilIsDry = false;
            double CurrentRootDepth = 0;
            double RootDepth = Barley.Root.Depth;
            CurrentRootDepth = Math.Max(RootDepth, CurrentRootDepth);
          
            Accumulated_depth = 0;
            Top_SW = 0;
            for (int layer = 0; Accumulated_depth < Top_Depth; layer++)
            {
                Top_SW += soil.SoilWater.SWmm[layer];
                Accumulated_depth += soil.Thickness[layer];
            }
            
            if (Top_SW <= Top_Trigger)
                SoilIsDry = true;
            
                
            
            if (SoilIsDry) //Set Deficit-based irrigation
            {
                
                
                Irrig.Apply(Irrigation_Amount);
                summary.WriteMessage(this, "Automatic Irrigation");
                
                            
            }
        }
    }
}
```
                Manager SowingRule
                  SowDate =
                  CultivarName = Hartog
                  SowingDepth = 30
                  RowSpacing = 250
                  Population = 120
```csharp
using System;
using Models.Core;
using Models.PMF;
using Models.Soils;
using Models.Utilities;
using APSIM.Shared.Utilities;

namespace Models
{
    [Serializable]
    public class Script : Model
    {
        [Link] Clock Clock;
        [Link] Fertiliser Fertiliser;
        [Link] Summary Summary;
        [Link] Plant Barley;
        [Link] Soil Soil; 

        [Description("Sowing Date (d-mmm)")]
        public string SowDate { get; set;}
        [Description("Cultivar to be sown")]
        public string CultivarName { get; set;}
        [Description("Sowing depth (mm)")]
        public double SowingDepth { get; set;}        
        [Description("Row spacing (mm)")]
        public double RowSpacing { get; set;}    
        [Description("Plant population (/m2)")]
        public double Population { get; set;}    
        
        
        [EventSubscribe("DoManagement")]
        private void OnDoManagement(object sender, EventArgs e)
        {
            if (DateUtilities.WithinDates(SowDate,Clock.Today,SowDate))
               Barley.Sow(population:Population, cultivar:CultivarName, depth:SowingDepth, rowSpacing:RowSpacing);    
        }
        
    }
}
```
                Manager Harvesting: same as Validation.NewZealand.RS2014_15.Dash14.Paddock.Manager folder.Harvesting
              Plant Barley: CropType=Barley
              SurfaceOrganicMatter: PoolName=Barley_stubble; type=Barley; mass=0; standing_fraction=0; cpr=0; cnr=80; CriticalResidueWeight=2000; OptimumDecompTemp=20; MaxCumulativeEOS=20; CNRatioDecompCoeff=0.277; CNRatioDecompThreshold=25; TotalLeachRain=25; MinRainToLeach=10; CriticalMinimumOrganicC=0.004; DefaultCPRatio=0; DefaultStandingFraction=0; StandingExtinctCoeff=0.5; FractionFaecesAdded=0.5
                Pools:
                  {PoolName=Barley_stubble, ResidueType=Barley, Mass=0, CNRatio=80, CPRatio=0, StandingFraction=0}
                ResidueTypes ResidueTypesList: LoadFromResource=ResidueTypes
              MicroClimate: a_interception=0; b_interception=1; c_interception=0; d_interception=0; soil_albedo=0.23; sun_angle=15; soil_heat_flux_fraction=0.4; night_interception_fraction=0.5; refheight=2; albedo=0.15; emissivity=0.96; RadIntTotal=0
              Soil: SoilType=Black Vertosol; Site=Lawes; NearestTown=Lawes, Q 4343; Region=Southeast Coast; State=Queensland; Country=Australia; NaturalVegetation=Blue Gum, Moreton Bay Ash, Tea Tree; ApsoilNumber=37; Latitude=-27.537; Longitude=152.336; LocationAccuracy=+/- 20m; DataSource=CSIRO Sustainable Ecosystems, Toowoomba
                Comments=Soil naming structure: \State\Region\Classification-Local Name (Site/district and locator number); oc and ph estimated
                Water
                  Thickness  BD    AirDry  LL15  DUL   SAT
                  150        1.32  0.13    0.26  0.41  0.47
                  150        1.3   0.208   0.26  0.43  0.48
                  300        1.23  0.26    0.26  0.46  0.51
                  300        1.27  0.26    0.26  0.44  0.49
                  300        1.37  0.25    0.25  0.4   0.45
                  300        1.35  0.26    0.26  0.41  0.46
                  300        1.35  0.26    0.26  0.38  0.46
                  SoilCrop BarleySoil: LL=[0.26, 0.26, 0.39, 0.36, 0.31, 0.28, 0.32]; KL=[0.06, 0.06, 0.06, 0.04, 0.04, 0.02, 0.01]; XF=[1, 1, 1, 1, 1, 1, 1]
                SoilWater: SummerDate=1-Nov; SummerU=6; SummerCona=3.5; WinterDate=1-Apr; WinterU=4; WinterCona=2.5; DiffusConst=40; DiffusSlope=16; Salb=0.12; CN2Bare=73; CNRed=20; CNCov=0.8; max_pond=0; Thickness=[150, 150, 300, 300, 300, 300, 300]; SWCON=[0.3, 0.3, 0.3, 0.3, 0.3, 0.3, 0.3]; residueinterception=0
                SoilNitrogen: fom_type=[default, manure, mucuna, lablab, shemp, stable]; fract_carb=[0.2, 0.3, 0.54, 0.57, 0.45, 0]; fract_cell=[0.7, 0.3, 0.37, 0.37, 0.47, 0.1]; fract_lign=[0.1, 0.4, 0.09, 0.06, 0.08, 0.9]; wfpsN2N2O_x=[22, 88]; wfpsN2N2O_y=[0.1, 1]
                SoilOrganicMatter: RootCN=40; RootWt=1000; SoilCN=12; EnrACoeff=7.4; EnrBCoeff=0.2; OCUnits=Total
                  Thickness  OC        FBiom  FInert
                  150        0.953846  0.04   0.4
                  150        0.953846  0.02   0.6
                  300        0.961538  0.02   0.8
                  300        0.846154  0.02   1
                  300        0.546154  0.01   1
                  300        0.261538  0.01   1
                  300        0.2       0.01   1
                Analysis: Thickness=[150, 150, 300, 300, 300, 300, 300]; PH=[8, 8, 8, 8, 8, 8, 8]; PHUnits=Water; BoronUnits=HotWater
                InitialWater: PercentMethod=FilledFromTop; FractionFull=1
                Sample Initial nitrogen: NO3Units=ppm; NH4Units=ppm; SWUnits=Volumetric; OCUnits=Total; PHUnits=Water
                  Thickness  NO3  NH4  SW
                  200        100  1    0
                  1800       10   1    -
                CERESSoilTemperature
              SoluteManager
              Irrigation
              Fertiliser
              Report DailyReport: same as Validation.NewZealand.MCPD09_10.Ablock.Paddock.DailyReport
              Report HarvestReport: EventNames=[Clock].EndOfSimulation
                VariableNames:
                  [Barley].Structure.LeafTipsAppeared
                  [Barley].Structure.FinalLeafNumber
                  [Barley].Phenology.FlagLeafDAS
                  [Barley].Phenology.FloweringDAS
                  [Barley].Phenology.MaturityDAS
                  [Script].CalcVals.SowMonth
              Operations Fertiliser Schedule
                2011-05-13  [Fertiliser].Apply(55, Fertiliser.Types.UreaN, 0);
                2011-05-13  [Irrigation].Apply(10);
                2011-06-30  [Fertiliser].Apply(43, Fertiliser.Types.Urea, 0);
                2011-08-08  [Fertiliser].Apply(90, Fertiliser.Types.Urea, 0);
        Experiment MCVPBirchip
          Factors
            Factor Cv
              Specifications=[SowingRule].Script.CultivarName = Baudin, Buloke, Capstan, Commander, Fleet, Hindmarsh, Keel, Oxford
            Factor TOS: Specifications=[SowingRule].Script.SowDate = 13-may, 28-jun
          Simulation MCVPBirchipBase
            Clock: StartDate=2011-05-05; EndDate=2011-12-29
            Weather: FileName=Birchip.met
            Summary summaryfile
            SoilArbitrator Soil Arbitrator
            Manager DAS: same as Validation.NewZealand.MCPD09_10.Ablock.Paddock.DAS
            Zone paddock: Area=1; Slope=0
              Folder Management: same as Validation.Australia.MCVP.MCVPGatton.MCVPGattonBase.paddock.Management
              Plant Barley: CropType=Barley
              SurfaceOrganicMatter: same as Validation.Australia.MCVP.MCVPGatton.MCVPGattonBase.paddock.SurfaceOrganicMatter
              MicroClimate: a_interception=0; b_interception=1; c_interception=0; d_interception=0; soil_albedo=0.23; sun_angle=15; soil_heat_flux_fraction=0.4; night_interception_fraction=0.5; refheight=2; albedo=0.15; emissivity=0.96; RadIntTotal=0
              Soil: SoilType=Clay Loam; Site=Jil Jil; NearestTown=Jil Jil; Region=Mallee; State=Victoria; Country=Australia; ApsoilNumber=728; Latitude=-35.8822; Longitude=142.99226; LocationAccuracy=+/- 1000m; Comments=Medium SSC; GPS at paddock scale only; BCG systems trial
                DataSource=Based on Soil Characterisation undertaken by Birchip Cropping Group during 2005
                Water
                  Thickness  BD     AirDry  LL15  DUL   SAT
                  100        1.33   0.085   0.17  0.36  0.43
                  150        1.36   0.168   0.21  0.37  0.44
                  150        1.39   0.2     0.2   0.4   0.45
                  150        1.415  0.2     0.2   0.41  0.45
                  150        1.437  0.2     0.2   0.41  0.45
                  300        1.428  0.2     0.2   0.44  0.46
                  300        1.41   0.2     0.2   0.46  0.467
                  SoilCrop BarleySoil: LL=[0.17, 0.21, 0.25, 0.26, 0.26, 0.44, 0.46]; KL=[0.07, 0.07, 0.07, 0.07, 0.05, 0.05, 0.03]; XF=[1, 0.5, 0.3, 0.2, 0.2, 0, 0]
                SoilWater: SummerDate=1-Nov; SummerU=6; SummerCona=3.5; WinterDate=1-Apr; WinterU=2; WinterCona=2; DiffusConst=40; DiffusSlope=16; Salb=0.13; CN2Bare=73; CNRed=20; CNCov=0.8; max_pond=0; Thickness=[100, 150, 150, 150, 150, 300, 300]; SWCON=[0.4, 0.4, 0.3, 0.3, 0.3, 0.3, 0.3]; residueinterception=0
                SoilNitrogen: fom_type=[default, manure, mucuna, lablab, shemp, stable]; fract_carb=[0.2, 0.3, 0.54, 0.57, 0.45, 0]; fract_cell=[0.7, 0.3, 0.37, 0.37, 0.47, 0.1]; fract_lign=[0.1, 0.4, 0.09, 0.06, 0.08, 0.9]; wfpsN2N2O_x=[22, 88]; wfpsN2N2O_y=[0.1, 1]
                SoilOrganicMatter: RootCN=40; RootWt=1000; SoilCN=12; EnrACoeff=7.4; EnrBCoeff=0.2; OCUnits=Total
                  Thickness  OC    FBiom  FInert
                  100        1.3   0.05   0.3
                  150        1     0.02   0.5
                  150        0.3   0.02   0.5
                  150        0.2   0.02   0.8
                  150        0.05  0.01   0.6
                  300        0.01  0.01   0.7
                  300        0.01  0.01   0.8
                Analysis: Thickness=[100, 150, 150, 150, 150, 300, 300]; PH=[8.6, 9.4, 9.6, 9.7, 9.7, 9.7, 9.3]; PHUnits=Water; BoronUnits=HotWater
                InitialWater: PercentMethod=FilledFromTop; FractionFull=1
                Sample Initial nitrogen: Thickness=[100]; NO3=[0]; NH4=[0]; SW=[0]; NO3Units=ppm; NH4Units=ppm; SWUnits=Volumetric; OCUnits=Total; PHUnits=Water
                CERESSoilTemperature
              SoluteManager
              Irrigation
              Fertiliser
              Report DailyReport: same as Validation.NewZealand.MCPD09_10.Ablock.Paddock.DailyReport
              Report HarvestReport: EventNames=[Clock].EndOfSimulation
                VariableNames:
                  [Barley].Structure.LeafTipsAppeared
                  [Barley].Structure.FinalLeafNumber
                  [Barley].Phenology.FlagLeafDAS
                  [Barley].Phenology.FloweringDAS
                  [Barley].Phenology.MaturityDAS
                  [Script].CalcVals.SowMonth
              Operations Fertiliser Schedule
                2011-05-13  [Fertiliser].Apply(55, Fertiliser.Types.UreaN, 0);
                2011-05-13  [Irrigation].Apply(10);
                2011-06-30  [Fertiliser].Apply(43, Fertiliser.Types.Urea, 0);
                2011-08-08  [Fertiliser].Apply(90, Fertiliser.Types.Urea, 0);
        Experiment MCVPTarlee
          Factors
            Factor Cv
              Specifications=[SowingRule].Script.CultivarName = Baudin, Buloke, Capstan, Commander, Fleet, Hindmarsh, Keel, Oxford
            Factor TOS: Specifications=[SowingRule].Script.SowDate = 20-may, 15-jul
          Simulation MCVPTarleeBase
            Clock: StartDate=2011-05-05; EndDate=2011-12-28
            Weather: FileName=Tarlee.met
            Summary summaryfile
            SoilArbitrator Soil Arbitrator
            Manager DAS: same as Validation.NewZealand.MCPD09_10.Ablock.Paddock.DAS
            Zone paddock: Area=1; Slope=0
              Folder Management: same as Validation.Australia.MCVP.MCVPGatton.MCVPGattonBase.paddock.Management
              Plant Barley: CropType=Barley
              SurfaceOrganicMatter: same as Validation.Australia.MCVP.MCVPGatton.MCVPGattonBase.paddock.SurfaceOrganicMatter
              MicroClimate: a_interception=0; b_interception=1; c_interception=0; d_interception=0; soil_albedo=0.23; sun_angle=15; soil_heat_flux_fraction=0.4; night_interception_fraction=0.5; refheight=2; albedo=0.15; emissivity=0.96; RadIntTotal=0
              Soil: SoilType=Sandy Loam; Site=Tarlee; NearestTown=Tarlee; Region=Mid North; State=South Australia; Country=Australia; ApsoilNumber=610; Latitude=-34.276; Longitude=138.759; LocationAccuracy=+/- 20m
                DataSource=Characterisation 2008 by University of Adelaide, CSIRO Sustainable Ecosystems and Allan Mayfield Consulting, Clare, SA
                Comments=LB Code:TAR; Strongly duplex low-moderate clay soil. Surface CEC low, moderate below. Texture change at about 7cm. Little chemical impediment to root growth, but high ESP below about 60cm may result in slaking or dispersion and high bulk density. DM Descr
                Water
                  Thickness  BD    AirDry  LL15   DUL    SAT
                  100        1.54  0.055   0.11   0.223  0.389
                  200        1.41  0.167   0.209  0.388  0.438
                  300        1.53  0.22    0.22   0.342  0.393
                  300        1.57  0.22    0.22   0.293  0.378
                  350        1.6   0.22    0.22   0.264  0.366
                  SoilCrop BarleySoil: LL=[0.11, 0.209, 0.24, 0.225, 0.222]; KL=[0.07, 0.07, 0.07, 0.05, 0.05]; XF=[1, 1, 1, 1, 1]
                SoilWater: SummerDate=1-Nov; SummerU=6; SummerCona=3.5; WinterDate=1-Apr; WinterU=2; WinterCona=2; DiffusConst=88; DiffusSlope=35; Salb=0.13; CN2Bare=73; CNRed=20; CNCov=0.8; max_pond=0; Thickness=[100, 200, 300, 300, 350]; SWCON=[0.5, 0.5, 0.5, 0.5, 0.5]; residueinterception=0
                SoilNitrogen: fom_type=[default, manure, mucuna, lablab, shemp, stable]; fract_carb=[0.2, 0.3, 0.54, 0.57, 0.45, 0]; fract_cell=[0.7, 0.3, 0.37, 0.37, 0.47, 0.1]; fract_lign=[0.1, 0.4, 0.09, 0.06, 0.08, 0.9]; wfpsN2N2O_x=[22, 88]; wfpsN2N2O_y=[0.1, 1]
                SoilOrganicMatter: RootCN=40; RootWt=1000; SoilCN=12; EnrACoeff=7.4; EnrBCoeff=0.2; OCUnits=Total
                  Thickness  OC    FBiom  FInert
                  100        1.16  0.04   0.4
                  200        0.75  0.02   0.5
                  300        0.36  0.02   0.7
                  300        0.12  0.02   1
                  350        0.12  0.01   1
                Analysis: Thickness=[100, 200, 300, 300, 350]; PH=[7, 7.9, 8.9, 9.2, 9.2]; PHUnits=Water; BoronUnits=HotWater
                InitialWater: PercentMethod=FilledFromTop; FractionFull=1
                Sample Initial nitrogen: Thickness=[100]; NO3=[0]; NH4=[0]; SW=[0]; NO3Units=ppm; NH4Units=ppm; SWUnits=Volumetric; OCUnits=Total; PHUnits=Water
                CERESSoilTemperature
              SoluteManager
              Irrigation
              Fertiliser
              Report DailyReport: same as Validation.NewZealand.MCPD09_10.Ablock.Paddock.DailyReport
              Report HarvestReport: EventNames=[Clock].EndOfSimulation
                VariableNames:
                  [Barley].Structure.LeafTipsAppeared
                  [Barley].Structure.FinalLeafNumber
                  [Barley].Phenology.FlagLeafDAS
                  [Barley].Phenology.FloweringDAS
                  [Barley].Phenology.MaturityDAS
                  [Script].CalcVals.SowMonth
              Operations Fertiliser Schedule
                2011-05-13  [Fertiliser].Apply(55, Fertiliser.Types.UreaN, 0);
                2011-05-13  [Irrigation].Apply(10);
                2011-06-30  [Fertiliser].Apply(43, Fertiliser.Types.Urea, 0);
                2011-08-08  [Fertiliser].Apply(90, Fertiliser.Types.Urea, 0);
      Folder HermitageRS
        Experiment HermitageRS
          Factors
            Factor Irr: Specifications=[IrrigationSchedule]
              Operations DD
              Operations DI
                1991-07-07  [Irrigation].Apply(22)
                1991-07-10  [Irrigation].Apply(10)
                1991-09-19  [Irrigation].Apply(96)
                1991-10-01  [Irrigation].Apply(62)
                1991-10-10  [Irrigation].Apply(48)
                1991-10-19  [Irrigation].Apply(63)
                1991-10-30  [Irrigation].Apply(135)
                1991-11-08  [Irrigation].Apply(40)
                1991-11-21  [Irrigation].Apply(32)
              Operations II
                1991-07-07  [Irrigation].Apply(22)
                1991-07-10  [Irrigation].Apply(10)
                1991-08-08  [Irrigation].Apply(19)
                1991-08-12  [Irrigation].Apply(56)
                1991-08-26  [Irrigation].Apply(40)
                1991-09-09  [Irrigation].Apply(50)
                1991-09-19  [Irrigation].Apply(50)
                1991-10-01  [Irrigation].Apply(54)
                1991-10-10  [Irrigation].Apply(35)
                1991-10-18  [Irrigation].Apply(1)
                1991-10-19  [Irrigation].Apply(60)
                1991-10-30  [Irrigation].Apply(60)
                1991-11-08  [Irrigation].Apply(37)
          Simulation HermitageRSBase
            Clock: StartDate=1991-06-24; EndDate=1991-11-20
            Summary summaryfile
            Weather: FileName=HRSRO - DD.met
            SoilArbitrator Soil Arbitrator
            Zone paddock: Area=1; Slope=0
              Soil: SoilType=HMM92; Site=HRS; NearestTown=Unknown; Region=Warwick; NaturalVegetation=Unknown; Latitude=0; Longitude=0
                Water
                  Thickness  BD    AirDry  LL15  DUL   SAT
                  100        0.93  0.08    0.2   0.42  0.45
                  100        0.97  0.19    0.25  0.42  0.45
                  200        1     0.23    0.25  0.46  0.48
                  200        1.01  0.3     0.3   0.46  0.48
                  200        1.03  0.32    0.32  0.43  0.45
                  200        1.06  0.33    0.33  0.4   0.41
                  200        1.11  0.28    0.28  0.37  0.38
                  200        1.15  0.29    0.29  0.33  0.37
                  200        1.2   0.29    0.29  0.32  0.37
                  200        1.25  0.32    0.32  0.33  0.37
                  SoilCrop BarleySoil
                    LL=[0.2, 0.25, 0.25, 0.3, 0.32, 0.33, 0.28, 0.29, 0.29, 0.32]
                    KL=[0.09, 0.09, 0.09, 0.09, 0.08, 0.07, 0.06, 0.05, 0.05, 0.04]
                    XF=[1, 1, 1, 1, 1, 1, 1, 1, 1, 1]
                SoilWater: SummerDate=1-Nov; SummerU=2; SummerCona=6.5; WinterDate=1-Apr; WinterU=2; WinterCona=6.5; DiffusConst=88; DiffusSlope=35; Salb=0.2; CN2Bare=85; CNRed=20; CNCov=0.8; max_pond=0; Thickness=[100, 100, 200, 200, 200, 200, 200, 200, 200, 200]; SWCON=[0.3, 0.3, 0.3, 0.3, 0.3, 0.3, 0.3, 0.3, 0.3, 0.3]; residueinterception=0
                SoilNitrogen: fom_type=[default, manure, mucuna, lablab, shemp, stable]; fract_carb=[0.2, 0.3, 0.54, 0.57, 0.45, 0]; fract_cell=[0.7, 0.3, 0.37, 0.37, 0.47, 0.1]; fract_lign=[0.1, 0.4, 0.09, 0.06, 0.08, 0.9]; wfpsN2N2O_x=[22, 88]; wfpsN2N2O_y=[0.1, 1]
                SoilOrganicMatter: RootCN=50; RootWt=1000; SoilCN=12.5; EnrACoeff=7.4; EnrBCoeff=0.2; OCUnits=Total
                  Thickness  OC    FBiom  FInert
                  100        1.19  0.05   0.45
                  100        0.59  0.02   0.6
                  200        0.45  0.01   0.75
                  200        0.3   0.01   0.9
                  200        0.2   0.01   0.9
                  200        0.16  0.01   0.9
                  200        0.17  0.01   0.9
                  200        0.17  0.05   0.9
                  200        0.17  0.02   0.9
                  200        0.17  0.01   0.9
                Analysis: Thickness=[100, 100, 200, 200, 200, 200, 200, 200, 200, 200]; PH=[6.3, 6.4, 6.5, 6.6, 6.6, 6.5, 6.5, 6.5, 6.5, 6.5]; PHUnits=Water; BoronUnits=HotWater
                Sample Initial nitrogen: NO3Units=kgha; NH4Units=kgha; SWUnits=Volumetric; OCUnits=Total; PHUnits=Water
                  Thickness  NO3      NH4
                  100        1.59681  0.69285
                  100        1.66549  0.12028
                  200        1.374    0.248
                  200        0.69286  0.25048
                  200        0.70658  0.25544
                  200        0.72716  0.26288
                  200        0.76146  0.27528
                  200        0.7889   0.2852
                  200        0.8232   0.2976
                  200        0.8575   0.31
                Sample Initial water: Thickness=[100, 100, 200, 200, 200, 200, 200, 200, 200, 200]; NO3Units=ppm; NH4Units=ppm; SWUnits=Volumetric; OCUnits=Total; PHUnits=Water
                  SW=[0.32, 0.405, 0.47, 0.45, 0.4, 0.37, 0.339, 0.31, 0.291, 0.321]
                CERESSoilTemperature
              Plant Barley: CropType=barley
              SurfaceOrganicMatter: same as Validation.Australia.MCVP.MCVPGatton.MCVPGattonBase.paddock.SurfaceOrganicMatter
              MicroClimate: a_interception=0; b_interception=1; c_interception=0; d_interception=0; soil_albedo=0.23; sun_angle=15; soil_heat_flux_fraction=0.4; night_interception_fraction=0.5; refheight=2; albedo=0.15; emissivity=0.96; RadIntTotal=0
              SoluteManager
              Folder Management
                Manager Sow_n_Harvest
                  SowingDate = 1991-06-30
                  Cultivar = Grimmett
```csharp
using System;
using Models.Core;
using Models.PMF;
using APSIM.Shared.Utilities;
using System.Xml.Serialization;
        
namespace Models
{
    [Serializable] 
    [System.Xml.Serialization.XmlInclude(typeof(Model))]
    public class Script : Model
    {
        [Link] Plant Barley;
        [Link] Clock Clock;
        [Link] Simulation sim;
        [Link] Summary Summary;
        
        [Description("Sowing Date")]
        public DateTime SowingDate { get; set; }
        [Description("Cultivar")]
        public string Cultivar { get; set; }
        
        
        [XmlIgnore] public bool Harvested { get; set; }
        [XmlIgnore] public bool EndSet { get; set; }
        
        [EventSubscribe("Commencing")]
        private void OnSimulationCommencing(object sender, EventArgs e)
        {
            Harvested = false;
            EndSet = false;
        }
        
        [EventSubscribe("DoManagement")]
        private void OnDoManagement(object sender, EventArgs e)
        {
            if (Clock.Today.Date == SowingDate)
            {
                Barley.Sow(population: 90, cultivar: Cultivar, depth: 40, rowSpacing: 500, budNumber: 1);
                
            }
            
            if (Barley.Phenology.CurrentPhaseName == "ReadyForHarvesting")
            {
                Barley.Harvest();
                Barley.EndCrop();
                Harvested = true;
                Summary.WriteMessage(this, "Flowering reached so setting end date to stop simulation");
            }
            
            if ((Harvested == true) && (EndSet == false))
            {
                sim.Set("Clock.EndDate", Clock.Today.AddDays(1));
                EndSet = true;
            }
        }
    }
}
```
                Manager ApplyN_at_sowing: same as Validation.NewZealand.CPT.CPT.Boss.Paddock.ApplyN_at_sowing
                Operations IrrigationSchedule
              Report DailyReport: same as Validation.NewZealand.MCPD09_10.Ablock.Paddock.DailyReport
              Report HarvestReport: EventNames=[Clock].EndOfSimulation
                VariableNames:
                  [Barley].Structure.LeafTipsAppeared
                  [Barley].Structure.FinalLeafNumber
                  [Barley].Phenology.FlagLeafDAS
                  [Barley].Phenology.FloweringDAS
                  [Barley].Phenology.MaturityDAS
                  [Script].CalcVals.SowMonth
              Irrigation
              Fertiliser
            Manager DAS: same as Validation.NewZealand.MCPD09_10.Ablock.Paddock.DAS
      Folder Wellcamp
        Simulation Wellcamp
          Clock: StartDate=1993-06-29; EndDate=1993-12-21
          Summary summaryfile
          Weather: FileName=Well360.met
          SoilArbitrator Soil Arbitrator
          Zone paddock: Area=1; Slope=0
            Soil: SoilType=Wellcamp93; Site=Wellcamp; NearestTown=Unknown; Region=Jondaryan; NaturalVegetation=Unknown; Latitude=0; Longitude=0
              Water
                Thickness  BD    AirDry  LL15  DUL   SAT
                150        0.9   0.11    0.22  0.52  0.59
                150        1.01  0.306   0.34  0.53  0.59
                300        1.02  0.38    0.38  0.54  0.59
                300        1     0.36    0.36  0.54  0.59
                300        1.06  0.4     0.4   0.52  0.57
                300        1.14  0.36    0.36  0.49  0.54
                300        1.23  0.38    0.38  0.46  0.51
                SoilCrop BarleySoil: LL=[0.22, 0.34, 0.38, 0.36, 0.4, 0.36, 0.38]; KL=[0.9, 0.9, 0.9, 0.8, 0.7, 0.6, 0.5]; XF=[1, 1, 1, 1, 1, 1, 1]
              SoilWater: SummerDate=1-Nov; SummerU=6; SummerCona=3.5; WinterDate=1-Apr; WinterU=6; WinterCona=3.5; DiffusConst=88; DiffusSlope=35.4; Salb=0.13; CN2Bare=60; CNRed=20; CNCov=0.8; max_pond=0; Thickness=[150, 150, 300, 300, 300, 300, 300]; SWCON=[0.4, 0.4, 0.4, 0.4, 0.4, 0.4, 0.4]; residueinterception=0
              SoilNitrogen: fom_type=[default, manure, mucuna, lablab, shemp, stable]; fract_carb=[0.2, 0.3, 0.54, 0.57, 0.45, 0]; fract_cell=[0.7, 0.3, 0.37, 0.37, 0.47, 0.1]; fract_lign=[0.1, 0.4, 0.09, 0.06, 0.08, 0.9]; wfpsN2N2O_x=[22, 88]; wfpsN2N2O_y=[0.1, 1]
              SoilOrganicMatter: RootCN=40; RootWt=200; SoilCN=12.5; EnrACoeff=7.4; EnrBCoeff=0.2; OCUnits=Total
                Thickness  OC   FBiom  FInert
                150        1    0.03   0.4
                150        0.9  0.03   0.4
                300        0.8  0.02   0.6
                300        0.8  0.02   0.6
                300        0.4  0.01   0.8
                300        0.3  0.01   0.9
                300        0.3  0.01   0.95
              Analysis: Thickness=[150, 150, 300, 300, 300, 300, 300]; PH=[7, 7, 8.5, 8.5, 8.5, 8.5, 8.5]; PHUnits=Water; BoronUnits=HotWater
              Sample Initial nitrogen: NO3Units=kgha; NH4Units=kgha; SWUnits=Volumetric; OCUnits=Total; PHUnits=Water
                Thickness  NO3       NH4
                150        14.2857   0.42795
                150        14.2864   0.428745
                300        14.2871   0.4284
                300        13.35     0.402
                300        13.16838  0.39432
                300        12.2436   0.36594
                300        13.01463  0.39114
              Sample Initial water: Thickness=[150, 150, 300, 300, 300, 300, 300]; SW=[0.52, 0.53, 0.53, 0.48, 0.48, 0.48, 0.48]; NO3Units=ppm; NH4Units=ppm; SWUnits=Volumetric; OCUnits=Total; PHUnits=Water
              CERESSoilTemperature
            Plant Barley: CropType=barley
            SurfaceOrganicMatter: same as Validation.Australia.MCVP.MCVPGatton.MCVPGattonBase.paddock.SurfaceOrganicMatter
            MicroClimate: a_interception=0; b_interception=1; c_interception=0; d_interception=0; soil_albedo=0.23; sun_angle=15; soil_heat_flux_fraction=0.4; night_interception_fraction=0.5; refheight=2; albedo=0.15; emissivity=0.96; RadIntTotal=0
            SoluteManager
            Folder Management
              Manager Sow_n_Harvest
                SowingDate = 1993-06-29
                Cultivar = Grimmett
                script: same as in Validation.Australia.HermitageRS.HermitageRS.HermitageRSBase.paddock.Management.Sow_n_Harvest
              Manager Auto_Irrigation: same as Validation.NewZealand.CPT.CPT.Boss.Paddock.Auto_Irrigation
              Manager ApplyN_at_sowing: same as Validation.NewZealand.CPT.CPT.Boss.Paddock.ApplyN_at_sowing
            Report DailyReport: same as Validation.NewZealand.MCPD09_10.Ablock.Paddock.DailyReport
            Irrigation
            Fertiliser
          Manager DAS: same as Validation.NewZealand.MCPD09_10.Ablock.Paddock.DAS
      Folder Hermitage1990
        Experiment Hermitage1990
          Factors
            Factor TOS: Specifications=[SowingRule].Script.SowDate = 26-apr, 5-jun, 7-aug
          Simulation Hermitage1990Base
            Clock: StartDate=1990-04-26; EndDate=1990-12-03
            Weather: FileName=Hermitage1990.met
            Summary summaryfile
            SoilArbitrator Soil Arbitrator
            Manager DAS: same as Validation.NewZealand.MCPD09_10.Ablock.Paddock.DAS
            Zone paddock: Area=1; Slope=0
              Soil: SoilType=HMM90; Site=HRS; NearestTown=Unknown; Region=Warwick; NaturalVegetation=Unknown; Latitude=0; Longitude=0
                Water
                  Thickness  BD    AirDry  LL15  DUL   SAT
                  100        0.93  0.08    0.2   0.42  0.45
                  100        0.97  0.19    0.2   0.42  0.45
                  200        1     0.23    0.23  0.46  0.48
                  200        1.01  0.26    0.26  0.46  0.48
                  200        1.03  0.26    0.26  0.43  0.45
                  200        1.06  0.28    0.28  0.4   0.41
                  200        1.11  0.25    0.25  0.37  0.38
                  200        1.15  0.28    0.28  0.33  0.37
                  200        1.2   0.3     0.3   0.32  0.37
                  200        1.25  0.31    0.31  0.33  0.37
                  SoilCrop BarleySoil
                    LL=[0.2, 0.2, 0.23, 0.26, 0.26, 0.28, 0.25, 0.28, 0.3, 0.31]
                    KL=[0.09, 0.09, 0.09, 0.09, 0.08, 0.07, 0.06, 0.05, 0.05, 0.04]
                    XF=[1, 1, 1, 1, 1, 1, 1, 1, 1, 1]
                SoilWater: same as Validation.Australia.HermitageRS.HermitageRS.HermitageRSBase.paddock.Soil.SoilWater
                SoilNitrogen: fom_type=[default, manure, mucuna, lablab, shemp, stable]; fract_carb=[0.2, 0.3, 0.54, 0.57, 0.45, 0]; fract_cell=[0.7, 0.3, 0.37, 0.37, 0.47, 0.1]; fract_lign=[0.1, 0.4, 0.09, 0.06, 0.08, 0.9]; wfpsN2N2O_x=[22, 88]; wfpsN2N2O_y=[0.1, 1]
                SoilOrganicMatter: same as Validation.Australia.HermitageRS.HermitageRS.HermitageRSBase.paddock.Soil.SoilOrganicMatter
                Analysis: Thickness=[100, 100, 200, 200, 200, 200, 200, 200, 200, 200]; PH=[6.3, 6.4, 6.5, 6.6, 6.6, 6.5, 6.5, 6.5, 6.5, 6.5]; PHUnits=Water; BoronUnits=HotWater
                Sample Initial nitrogen: NO3Units=kgha; NH4Units=kgha; SWUnits=Volumetric; OCUnits=Total; PHUnits=Water
                  Thickness  NO3      NH4
                  100        3.99249  0.55428
                  100        4.16421  0.09603
                  200        3.434    0.198
                  200        1.73518  0.19998
                  200        1.76954  0.20394
                  200        1.82108  0.20988
                  200        1.90698  0.21978
                  200        1.9757   0.2277
                  200        2.0616   0.2376
                  200        2.1475   0.2475
                Sample Initial water: Thickness=[100, 100, 200, 200, 200, 200, 200, 200, 200, 200]; SW=[0.42, 0.42, 0.46, 0.46, 0.43, 0.4, 0.37, 0.33, 0.32, 0.33]; NO3Units=ppm; NH4Units=ppm; SWUnits=Volumetric; OCUnits=Total; PHUnits=Water
                CERESSoilTemperature
              Folder Management
                Manager ApplyN_at_sowing
```csharp
using System;
using Models.Core;
using System.Collections.Generic;
using System.Text;
using Models.Soils;
using Models.PMF;
using Models;
using System.Xml.Serialization;
using APSIM.Shared.Utilities;

namespace Models
{
    [Serializable] 
    public class Script : Model
    {
        [Link] Clock Clock;
        [Link] Fertiliser Fertiliser;
        [Link] Irrigation Irrig;
        [Link] Simulation Simulation;
        
                    
        [XmlIgnore] public bool InitialDay { get; set; }
        //[XmlIgnore] public double FertN { get; set; }
        
        [EventSubscribe("Commencing")]
        private void OnSimulationCommencing(object sender, EventArgs e)
        {
            InitialDay = true;
        }
        
        [EventSubscribe("DoManagement")]
        private void OnDoManagement(object sender, EventArgs e)
        {
            double DAS = (double)Apsim.Get(Simulation, "DAS.Script.DAS");
            if (DAS == 1)
                Fertiliser.Apply(130, Fertiliser.Types.NO3N, 50);
        }
    }
    
}
```
                Manager SowingRule
                  SowDate =
                  CultivarName = Grimmett
                  SowingDepth = 30
                  RowSpacing = 250
                  Population = 120
                  script: same as in Validation.Australia.MCVP.MCVPGatton.MCVPGattonBase.paddock.Management.SowingRule
                Manager Harvesting: same as Validation.NewZealand.RS2014_15.Dash14.Paddock.Manager folder.Harvesting
                Manager Auto_Irrigation: same as Validation.NewZealand.CPT.CPT.Boss.Paddock.Auto_Irrigation
              Plant Barley: CropType=Barley
              SurfaceOrganicMatter: same as Validation.Australia.MCVP.MCVPGatton.MCVPGattonBase.paddock.SurfaceOrganicMatter
              MicroClimate: a_interception=0; b_interception=1; c_interception=0; d_interception=0; soil_albedo=0.23; sun_angle=15; soil_heat_flux_fraction=0.4; night_interception_fraction=0.5; refheight=2; albedo=0.15; emissivity=0.96; RadIntTotal=0
              SoluteManager
              Irrigation
              Fertiliser
              Report DailyReport: same as Validation.NewZealand.MCPD09_10.Ablock.Paddock.DailyReport
              Report HarvestReport: EventNames=[Clock].EndOfSimulation
                VariableNames:
                  [Barley].Structure.LeafTipsAppeared
                  [Barley].Structure.FinalLeafNumber
                  [Barley].Phenology.FlagLeafDAS
                  [Barley].Phenology.FloweringDAS
                  [Barley].Phenology.MaturityDAS
                  [Script].CalcVals.SowMonth
      Folder Roma1988
        Experiment Roma1988
          Factors
            Factor Sow: Specifications=[SowingRule].Script.SowDate = 12-mar, 21-apr, 11-may, 8-jun
            Factor Pop: Specifications=[SowingRule].Script.Population = 36, 62, 160
          Simulation Roma1988Base
            Clock: StartDate=1988-03-12; EndDate=1988-10-19
            Summary summaryfile
            Weather: FileName=Roma1988.met
            SoilArbitrator Soil Arbitrator
            Zone paddock: Area=1; Slope=0
              Soil Bay 0: SoilType=R88; Site=Roma; NearestTown=Unknown; Region=Roma; NaturalVegetation=Unknown; Latitude=0; Longitude=0
                Water
                  Thickness  BD    AirDry  LL15  DUL   SAT
                  100        1.3   0.1     0.13  0.38  0.41
                  100        1.3   0.15    0.19  0.41  0.46
                  100        1.29  0.19    0.19  0.41  0.46
                  100        1.31  0.22    0.22  0.43  0.48
                  100        1.35  0.25    0.25  0.42  0.47
                  100        1.36  0.25    0.25  0.42  0.47
                  200        1.36  0.28    0.28  0.41  0.46
                  200        1.35  0.28    0.28  0.4   0.45
                  400        1.36  0.26    0.26  0.36  0.41
                  200        1.36  0.25    0.25  0.34  0.39
                  SoilCrop BarleySoil
                    LL=[0.13, 0.19, 0.19, 0.22, 0.25, 0.25, 0.28, 0.28, 0.26, 0.25]
                    KL=[0.09, 0.09, 0.09, 0.09, 0.08, 0.08, 0.07, 0.06, 0.03, 0.01]
                    XF=[1, 1, 1, 1, 1, 1, 1, 1, 1, 1]
                SoilWater: SummerDate=1-Nov; SummerU=6; SummerCona=3.5; WinterDate=1-Apr; WinterU=6; WinterCona=3.5; DiffusConst=88; DiffusSlope=35.4; Salb=0.13; CN2Bare=73; CNRed=20; CNCov=0.8; max_pond=0; Thickness=[100, 100, 100, 100, 100, 100, 200, 200, 400, 200]; SWCON=[0.1, 0.1, 0.1, 0.1, 0.1, 0.1, 0.1, 0.1, 0.1, 0.1]; residueinterception=0
                SoilNitrogen: fom_type=[default, manure, mucuna, lablab, shemp, stable]; fract_carb=[0.2, 0.3, 0.54, 0.57, 0.45, 0]; fract_cell=[0.7, 0.3, 0.37, 0.37, 0.47, 0.1]; fract_lign=[0.1, 0.4, 0.09, 0.06, 0.08, 0.9]; wfpsN2N2O_x=[22, 88]; wfpsN2N2O_y=[0.1, 1]
                SoilOrganicMatter: RootCN=40; RootWt=6; SoilCN=14.5; EnrACoeff=7.4; EnrBCoeff=0.2; OCUnits=Total
                  Thickness  OC    FBiom  FInert
                  100        1.03  0.05   0.39
                  100        0.86  0.02   0.47
                  100        0.77  0.01   0.52
                  100        0.65  0.01   0.62
                  100        0.54  0.01   0.74
                  100        0.48  0.01   0.83
                  200        0.43  0.01   0.93
                  200        0.54  0.01   0.93
                  400        0.48  0.01   0.93
                  200        0.43  0.01   0.93
                Analysis: Thickness=[100, 100, 100, 100, 100, 100, 200, 200, 400, 200]; PH=[8.2, 8.5, 8.6, 8.6, 7.4, 5.3, 5, 7.4, 5.3, 5]; PHUnits=Water; BoronUnits=HotWater
                Sample Initial nitrogen: NO3Units=kgha; NH4Units=kgha; SWUnits=Volumetric; OCUnits=Total; PHUnits=Water
                  Thickness  NO3      NH4
                  100        10.1439  1.69
                  100        1.4729   1.3
                  100        1.46157  1.29
                  100        1.07158  1.048
                  100        0.9342   1.08
                  100        1.36952  0.68
                  200        1.71088  1.36
                  200        1.6983   1.35
                  400        3.42176  2.72
                  200        1.71088  1.36
                Sample Initial water: Thickness=[100, 100, 100, 100, 100, 100, 200, 200, 400, 200]; NO3Units=ppm; NH4Units=ppm; SWUnits=Volumetric; OCUnits=Total; PHUnits=Water
                  SW=[0.376, 0.431, 0.407, 0.444, 0.403, 0.402, 0.341, 0.325, 0.295, 0.26]
                CERESSoilTemperature
              Plant Barley: CropType=barley
              SurfaceOrganicMatter: same as Validation.Australia.MCVP.MCVPGatton.MCVPGattonBase.paddock.SurfaceOrganicMatter
              MicroClimate: a_interception=0; b_interception=1; c_interception=0; d_interception=0; soil_albedo=0.23; sun_angle=15; soil_heat_flux_fraction=0.4; night_interception_fraction=0.5; refheight=2; albedo=0.15; emissivity=0.96; RadIntTotal=0
              SoluteManager
              Folder Management
                Manager Auto_Irrigation: same as Validation.NewZealand.CPT.CPT.Boss.Paddock.Auto_Irrigation
                Manager ApplyN_at_sowing: same as Validation.NewZealand.CPT.CPT.Boss.Paddock.ApplyN_at_sowing
                Manager SowingRule: same as Validation.Australia.Hermitage1990.Hermitage1990.Hermitage1990Base.paddock.Management.SowingRule
                Manager Harvesting: same as Validation.NewZealand.RS2014_15.Dash14.Paddock.Manager folder.Harvesting
              Report DailyReport: same as Validation.NewZealand.MCPD09_10.Ablock.Paddock.DailyReport
              Irrigation
              Fertiliser
            Manager DAS: same as Validation.NewZealand.MCPD09_10.Ablock.Paddock.DAS
      Folder Gatton1984
        Experiment Gatton1984
          Memo
            NOTE: High N treatment logdged.  Final grain sizes were less than expected.
          Factors
            Factor NRate: Specifications=[ApplyFertiliser]
              Operations 0
              Operations 50
                1984-05-23  [Fertiliser].Apply(Amount: 50, Type: Fertiliser.Types.NO3N);
              Operations 100
                1984-05-23  [Fertiliser].Apply(Amount: 100, Type: Fertiliser.Types.NO3N);
              Operations 150
                1984-05-23  [Fertiliser].Apply(Amount: 150, Type: Fertiliser.Types.NO3N);
              Operations 200
                1984-05-23  [Fertiliser].Apply(Amount: 200, Type: Fertiliser.Types.NO3N);
          Simulation Gatton1984Base
            Clock: StartDate=1984-05-20; EndDate=1984-12-31
            Summary summaryfile
            Weather: FileName=Gatton1984.met
            Zone paddock: Area=1; Slope=0
              Irrigation
              Manager Auto_Irrigation: same as Validation.NewZealand.CPT.CPT.Boss.Paddock.Auto_Irrigation
              Fertiliser
              Soil: SoilType=APS6Soil; LocalName=APS6Site; Site=APS6Site; NearestTown=Unknown; Region=Lawes; NaturalVegetation=Unknown; Latitude=0; Longitude=0
                Water
                  Thickness  BD    AirDry  LL15  DUL   SAT
                  150        1.38  0.1     0.2   0.38  0.43
                  150        1.34  0.1     0.2   0.38  0.43
                  300        1.35  0.1     0.22  0.4   0.43
                  300        1.5   0.1     0.18  0.4   0.43
                  300        1.49  0.1     0.14  0.39  0.42
                  300        1.46  0.1     0.2   0.38  0.4
                  300        1.46  0.1     0.2   0.38  0.4
                  SoilCrop BarleySoil: LL=[0.2, 0.2, 0.22, 0.18, 0.14, 0.25, 0.28]; KL=[0.06, 0.05, 0.05, 0.04, 0.04, 0.06, 0.06]; XF=[1, 1, 1, 1, 1, 1, 1]
                SoilWater: SummerDate=1-Nov; SummerU=6; SummerCona=3.5; WinterDate=1-Apr; WinterU=6; WinterCona=3.5; DiffusConst=88; DiffusSlope=35.4; Salb=0.13; CN2Bare=60; CNRed=20; CNCov=0.8; slope=0; discharge_width=0; catchment_area=0; max_pond=0; residueinterception=0
                  Thickness  SWCON  KLAT
                  150        0.3    0
                  150        0.3    0
                  300        0.3    0
                  300        0.3    0
                  300        0.3    0
                  300        0.3    0
                  300        0.3    0
                SoilNitrogen: fom_type=[default, manure, mucuna, lablab, shemp, stable]; fract_carb=[0.2, 0.3, 0.54, 0.57, 0.45, 0]; fract_cell=[0.7, 0.3, 0.37, 0.37, 0.47, 0.1]; fract_lign=[0.1, 0.4, 0.09, 0.06, 0.08, 0.9]; wfpsN2N2O_x=[22, 88]; wfpsN2N2O_y=[0.1, 1]
                SoilOrganicMatter: RootCN=60; RootWt=2000; SoilCN=14.5; EnrACoeff=1; EnrBCoeff=1; OCUnits=Total
                  Thickness  OC    FBiom  FInert
                  150        2.2   0.03   0.45
                  150        1.6   0.02   0.6
                  300        1.15  0.01   0.78
                  300        1     0.01   0.9
                  300        0.8   0.01   0.99
                  300        0.45  0.01   0.99
                  300        0.45  0.01   0.99
                Analysis: Thickness=[150, 150, 300, 300, 300, 300, 300]; PH=[7.5, 8, 8, 8, 8, 8, 8]; PHUnits=Water; BoronUnits=HotWater
                Sample Initial Water: Thickness=[150, 150, 300, 300, 300, 300, 300]; SW=[0.326, 0.326, 0.346, 0.333, 0.315, 0.326, 0.326]; NO3Units=ppm; NH4Units=ppm; SWUnits=Volumetric; OCUnits=Total; PHUnits=Water
                Sample Initial Nitrogen: NO3Units=ppm; NH4Units=ppm; SWUnits=Volumetric; OCUnits=Total; PHUnits=Water
                  Thickness  NO3   NH4
                  150        1.3   1.3
                  150        0.6   1
                  300        0.25  1
                  300        0.2   0.8
                  300        0.1   0.8
                  300        0.1   0.5
                  300        0.1   0.5
                CERESSoilTemperature
              SurfaceOrganicMatter: PoolName=wheat_stubble; type=wheat; mass=500; standing_fraction=0; cnr=100; CriticalResidueWeight=2000; OptimumDecompTemp=20; MaxCumulativeEOS=20; CNRatioDecompCoeff=0.277; CNRatioDecompThreshold=25; TotalLeachRain=25; MinRainToLeach=10; CriticalMinimumOrganicC=0.004; DefaultCPRatio=0; DefaultStandingFraction=0; StandingExtinctCoeff=0.5; FractionFaecesAdded=0.5
                Pools:
                  {PoolName=wheat_stubble, ResidueType=wheat, Mass=500, CNRatio=100, StandingFraction=0}
                ResidueTypes: LoadFromResource=ResidueTypes
              Plant Barley: CropType=barley
              Operations ApplyFertiliser
                1992-06-16  [Fertiliser].Apply(Amount: 0, Type: Fertiliser.Types.NO3N);
              Manager SowingRule
                SowDate = 25-may
                CultivarName = Grimmett
                SowingDepth = 30
                RowSpacing = 250
                Population = 120
                script: same as in Validation.Australia.MCVP.MCVPGatton.MCVPGattonBase.paddock.Management.SowingRule
              Manager Harvesting: same as Validation.NewZealand.RS2014_15.Dash14.Paddock.Manager folder.Harvesting
              MicroClimate: a_interception=0; b_interception=1; c_interception=0; d_interception=0; soil_albedo=0.3; sun_angle=15; soil_heat_flux_fraction=0.4; night_interception_fraction=0.5; refheight=2; albedo=0.15; emissivity=0.96; RadIntTotal=0
              Report DailyReport
              Report HarvestReport
              SoluteManager
            SoilArbitrator Soil Arbitrator
      Simulation Barley_HRS87-2MP_1
        Clock: StartDate=1987-04-02; EndDate=1987-09-19
        Summary summaryfile
        Weather: FileName=HRS87-2MP.met
        SoilArbitrator Soil Arbitrator
        Manager DAS: same as Validation.NewZealand.MCPD09_10.Ablock.Paddock.DAS
        Zone paddock: Area=1; Slope=0
          Soil M Block87: SoilType=HMM87; Site=HRS; NearestTown=Unknown; Region=Warwick; NaturalVegetation=Unknown; Latitude=0; Longitude=0
            Water
              Thickness  BD    AirDry  LL15  DUL   SAT
              100        1.3   0.16    0.18  0.4   0.45
              100        1.3   0.22    0.22  0.45  0.46
              100        1.29  0.26    0.26  0.47  0.48
              100        1.31  0.27    0.27  0.48  0.49
              100        1.35  0.3     0.3   0.49  0.49
              100        1.36  0.3     0.3   0.48  0.486
              200        1.36  0.27    0.27  0.43  0.44
              200        1.35  0.23    0.23  0.38  0.39
              200        1.36  0.24    0.24  0.37  0.38
              200        1.36  0.23    0.23  0.38  0.39
              SoilCrop BarleySoil
                LL=[0.18, 0.22, 0.26, 0.27, 0.3, 0.3, 0.27, 0.23, 0.24, 0.23]
                KL=[0.09, 0.09, 0.09, 0.09, 0.09, 0.08, 0.07, 0.06, 0.05, 0.04]
                XF=[1, 1, 1, 1, 1, 1, 1, 1, 1, 1]
            SoilWater: SummerDate=1-Nov; SummerU=6; SummerCona=3.5; WinterDate=1-Apr; WinterU=6; WinterCona=3.5; DiffusConst=88; DiffusSlope=35.4; Salb=0.13; CN2Bare=85; CNRed=20; CNCov=0.8; max_pond=0; Thickness=[100, 100, 100, 100, 100, 100, 200, 200, 200, 200]; SWCON=[0.1, 0.1, 0.1, 0.1, 0.1, 0.1, 0.1, 0.1, 0.1, 0.1]; residueinterception=0
            SoilNitrogen: fom_type=[default, manure, mucuna, lablab, shemp, stable]; fract_carb=[0.2, 0.3, 0.54, 0.57, 0.45, 0]; fract_cell=[0.7, 0.3, 0.37, 0.37, 0.47, 0.1]; fract_lign=[0.1, 0.4, 0.09, 0.06, 0.08, 0.9]; wfpsN2N2O_x=[22, 88]; wfpsN2N2O_y=[0.1, 1]
            SoilOrganicMatter: RootCN=50; RootWt=1000; SoilCN=12.5; EnrACoeff=7.4; EnrBCoeff=0.2; OCUnits=Total
              Thickness  OC    FBiom  FInert
              100        1.03  0.05   0.39
              100        0.86  0.02   0.47
              100        0.77  0.01   0.52
              100        0.65  0.01   0.62
              100        0.54  0.01   0.74
              100        0.48  0.01   0.83
              200        0.04  0.01   0.93
              200        0.54  0.01   0.93
              200        0.48  0.01   0.93
              200        0.43  0.01   0.93
            Analysis: Thickness=[100, 100, 100, 100, 100, 100, 200, 200, 200, 200]; PH=[8.2, 8.5, 8.6, 8.6, 7.4, 5.3, 5, 7.4, 5.3, 5]; PHUnits=Water; BoronUnits=HotWater
            Sample Initial nitrogen: NO3Units=kgha; NH4Units=kgha; SWUnits=Volumetric; OCUnits=Total; PHUnits=Water
              Thickness  NO3      NH4
              100        21.7802  1.6874
              100        3.1616   1.2987
              100        3.13728  1.28871
              100        2.30036  1.04669
              100        2.0061   1.07865
              100        2.94032  0.67864
              200        3.67472  1.35728
              200        3.6477   1.3473
              200        3.67472  1.35728
              200        3.67472  1.35728
            Sample Initial water: Thickness=[100, 100, 100, 100, 100, 100, 200, 200, 200, 200]; NO3Units=ppm; NH4Units=ppm; SWUnits=Volumetric; OCUnits=Total; PHUnits=Water
              SW=[0.371, 0.418, 0.442, 0.455, 0.438, 0.435, 0.366, 0.32, 0.335, 0.337]
            CERESSoilTemperature
          Plant Barley: CropType=barley
          SurfaceOrganicMatter: same as Validation.Australia.MCVP.MCVPGatton.MCVPGattonBase.paddock.SurfaceOrganicMatter
          MicroClimate: a_interception=0; b_interception=1; c_interception=0; d_interception=0; soil_albedo=0.23; sun_angle=15; soil_heat_flux_fraction=0.4; night_interception_fraction=0.5; refheight=2; albedo=0.15; emissivity=0.96; RadIntTotal=0
          SoluteManager
          Folder Management
            Manager Sow_n_Harvest
              SowingDate = 1987-04-02
              Cultivar = Grimmett
              script: same as in Validation.Australia.HermitageRS.HermitageRS.HermitageRSBase.paddock.Management.Sow_n_Harvest
            Manager Auto_Irrigation: same as Validation.NewZealand.CPT.CPT.Boss.Paddock.Auto_Irrigation
            Manager ApplyN_at_sowing: same as Validation.NewZealand.CPT.CPT.Boss.Paddock.ApplyN_at_sowing
          Report DailyReport: same as Validation.NewZealand.MCPD09_10.Ablock.Paddock.DailyReport
          Irrigation
          Fertiliser
      Simulation Barley_HRS87-3MP_1
        Clock: StartDate=1987-05-26; EndDate=1987-10-31
        Summary summaryfile
        Weather: FileName=HRS87-3MP.met
        SoilArbitrator Soil Arbitrator
        Manager DAS: same as Validation.NewZealand.MCPD09_10.Ablock.Paddock.DAS
        Zone paddock: Area=1; Slope=0
          Soil M Block87: same as Validation.Australia.Barley_HRS87-2MP_1.paddock.M Block87
          Plant Barley: CropType=barley
          SurfaceOrganicMatter: same as Validation.Australia.MCVP.MCVPGatton.MCVPGattonBase.paddock.SurfaceOrganicMatter
          MicroClimate: a_interception=0; b_interception=1; c_interception=0; d_interception=0; soil_albedo=0.23; sun_angle=15; soil_heat_flux_fraction=0.4; night_interception_fraction=0.5; refheight=2; albedo=0.15; emissivity=0.96; RadIntTotal=0
          SoluteManager
          Folder Management
            Manager Sow_n_Harvest
              SowingDate = 1987-05-26
              Cultivar = Grimmett
              script: same as in Validation.Australia.HermitageRS.HermitageRS.HermitageRSBase.paddock.Management.Sow_n_Harvest
            Manager Auto_Irrigation: same as Validation.NewZealand.CPT.CPT.Boss.Paddock.Auto_Irrigation
            Manager ApplyN_at_sowing: same as Validation.NewZealand.CPT.CPT.Boss.Paddock.ApplyN_at_sowing
          Report DailyReport: same as Validation.NewZealand.MCPD09_10.Ablock.Paddock.DailyReport
          Irrigation
          Fertiliser
      Simulation Barley_KthpeRain05_5
        Clock: StartDate=2005-07-11; EndDate=2005-11-29
        Summary summaryfile
        Weather: FileName=KthpeRain05.met
        SoilArbitrator Soil Arbitrator
        Zone paddock: Area=1; Slope=0
          Soil Bay 0: SoilType=Waco-R; Site=Kingsthorpe; NearestTown=Unknown; Region=Jondaryan; NaturalVegetation=Unknown; Latitude=0; Longitude=0
            Water
              Thickness  BD    AirDry  LL15  DUL   SAT
              100        1.08  0.22    0.34  0.52  0.57
              200        1.08  0.34    0.35  0.53  0.58
              200        1.06  0.36    0.36  0.53  0.57
              200        1.06  0.34    0.34  0.53  0.58
              200        1.09  0.34    0.34  0.54  0.54
              200        1.09  0.35    0.35  0.52  0.54
              200        1.09  0.36    0.36  0.51  0.55
              200        1.09  0.35    0.35  0.51  0.53
              200        1.13  0.37    0.37  0.46  0.53
              200        1.13  0.37    0.37  0.46  0.53
              SoilCrop BarleySoil
                LL=[0.34, 0.35, 0.36, 0.34, 0.34, 0.35, 0.36, 0.35, 0.37, 0.37]
                KL=[0.09, 0.09, 0.09, 0.08, 0.08, 0.07, 0.06, 0.05, 0.04, 0.03]
                XF=[1, 1, 1, 1, 1, 1, 1, 1, 1, 1]
            SoilWater: SummerDate=1-Nov; SummerU=6; SummerCona=3.5; WinterDate=1-Apr; WinterU=6; WinterCona=3.5; DiffusConst=40; DiffusSlope=16; Salb=0.13; CN2Bare=73; CNRed=20; CNCov=0.8; max_pond=0; Thickness=[100, 200, 200, 200, 200, 200, 200, 200, 200, 200]; SWCON=[0.3, 0.3, 0.3, 0.3, 0.3, 0.3, 0.3, 0.3, 0.3, 0.3]; residueinterception=0
            SoilNitrogen: fom_type=[default, manure, mucuna, lablab, shemp, stable]; fract_carb=[0.2, 0.3, 0.54, 0.57, 0.45, 0]; fract_cell=[0.7, 0.3, 0.37, 0.37, 0.47, 0.1]; fract_lign=[0.1, 0.4, 0.09, 0.06, 0.08, 0.9]; wfpsN2N2O_x=[22, 88]; wfpsN2N2O_y=[0.1, 1]
            SoilOrganicMatter: RootCN=40; RootWt=200; SoilCN=12.5; EnrACoeff=7.4; EnrBCoeff=0.2; OCUnits=Total
              Thickness  OC   FBiom  FInert
              100        1    0.03   0.4
              200        0.9  0.03   0.4
              200        0.9  0.02   0.6
              200        0.9  0.02   0.6
              200        0.9  0.01   0.8
              200        0.8  0.01   0.9
              200        0.8  0.01   0.95
              200        0.4  0.01   0.95
              200        0.3  0.01   0.95
              200        0.3  0.01   0.95
            Analysis: Thickness=[100, 200, 200, 200, 200, 200, 200, 200, 200, 200]; PH=[7, 7, 8.5, 8.5, 8.5, 8.5, 8.5, 8.5, 8.5, 8.5]; PHUnits=Water; BoronUnits=HotWater
            Sample Initial nitrogen: NO3Units=kgha; NH4Units=kgha; SWUnits=Volumetric; OCUnits=Total; PHUnits=Water
              Thickness  NO3     NH4
              100        40.068  0.30024
              200        80.136  0.30024
              200        41.764  0.30104
              200        41.764  0.30104
              200        36.624  0.30084
              200        36.624  0.30084
              200        34.662  0.30084
              200        34.662  0.30084
              200        38.646  0.30058
              200        38.646  0.30058
            Sample Initial water: Thickness=[100, 200, 200, 200, 200, 200, 200, 200, 200, 200]; SW=[0.38, 0.5, 0.53, 0.52, 0.5, 0.49, 0.51, 0.5, 0.46, 0.46]; NO3Units=ppm; NH4Units=ppm; SWUnits=Volumetric; OCUnits=Total; PHUnits=Water
            CERESSoilTemperature
          Plant Barley: CropType=barley
          SurfaceOrganicMatter: same as Validation.Australia.MCVP.MCVPGatton.MCVPGattonBase.paddock.SurfaceOrganicMatter
          MicroClimate: a_interception=0; b_interception=1; c_interception=0; d_interception=0; soil_albedo=0.23; sun_angle=15; soil_heat_flux_fraction=0.4; night_interception_fraction=0.5; refheight=2; albedo=0.15; emissivity=0.96; RadIntTotal=0
          SoluteManager
          Folder Management
            Manager Sow_n_Harvest
              SowingDate = 2005-07-11
              Cultivar = Grimmett
              script: same as in Validation.Australia.HermitageRS.HermitageRS.HermitageRSBase.paddock.Management.Sow_n_Harvest
            Manager Auto_Irrigation: same as Validation.NewZealand.CPT.CPT.Boss.Paddock.Auto_Irrigation
            Manager ApplyN_at_sowing: same as Validation.NewZealand.CPT.CPT.Boss.Paddock.ApplyN_at_sowing
          Report DailyReport: same as Validation.NewZealand.MCPD09_10.Ablock.Paddock.DailyReport
          Irrigation
          Fertiliser
        Manager DAS: same as Validation.NewZealand.MCPD09_10.Ablock.Paddock.DAS
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