Simulations
  Replacements
    Plant Chickpea: CropType=Chickpea
      Memo Memo1
        References

        Ayaz S, McKenzie BA, McNeil DL, Hill GD.2004. Light interception and utilization of four grain legumes sown at different plant populations and depths. Journal of Agricultural Science,: 297-308.

        Ayaz S, McKenzie BA, Hill GD, McNeil DL.2004. Variability in yield of four grain legume species in a subhumid temperate environment. II. Yield components. Journal of Agricultural Science,: 21-28.

        Ayaz S, McKenzie BA, Hill GD, McNeil DL.2004. Nitrogen distribution in four grain legumes. Journal of Agricultural Science,: 309-317.

        Wilson DR, Robertson MJ.1996.Pea phenology responses to temperature and photoperiod.  Australian Agronomy Society.
      OrganArbitrator Arbitrator: NArbitrationOption=RelativeAllocation; DMArbitrationOption=RelativeAllocation
      Phenology: Emerged=false
        AirTemperatureFunction ThermalTime
          XYPairs: X=[4.5, 30, 40]; Y=[0, 25.5, 0]
        PhotoperiodFunction Photoperiod: Twilight=-6
        GerminatingPhase Germinating: Start=Sowing; End=Germination
        EmergingPhase Emerging: Start=Germination; End=Emergence; ShootLag=15; ShootRate=5
          VariableReference ThermalTime: VariableName=[Phenology].ThermalTime.Value
        NodeNumberPhase Vegetative: Start=Emergence; End=StartFlowering
          LinearInterpolationFunction CompletionNodeNumber: XProperty=[Phenology].Photoperiod.Value
            XYPairs: X=[13, 16]; Y=[18, 15]
        NodeNumberPhase Flowering: Start=StartFlowering; End=EndFlowering
          AddFunction CompletionNodeNumber
            VariableReference VegetativeNodes: VariableName=[Phenology].NFF.Value
            LinearInterpolationFunction FloweringNodes: XProperty=[Phenology].Photoperiod.Value
              XYPairs: X=[13, 16]; Y=[10, 7]
          MultiplyFunction Target
            VariableReference NodeNumberDuration
              VariableName=[Phenology].Flowering.CompletionNodeNumber.FloweringNodes.Value
            VariableReference Phyllochron: VariableName=[Structure].MainStemNodeAppearanceRate.Value
        GenericPhase GrainFilling: Start=EndFlowering; End=EndGrainFill
          Constant Target: Value=500
          VariableReference ThermalTime: VariableName=[Phenology].ThermalTime.Value
        GenericPhase Maturing: Start=EndGrainFill; End=Maturity
          Constant Target: Value=60
          VariableReference ThermalTime: VariableName=[Phenology].ThermalTime.Value
        GenericPhase Ripening: Start=Maturity; End=HarvestRipe
          Constant Target: Value=1
          VariableReference ThermalTime: VariableName=[Phenology].ThermalTime.Value
        EndPhase ReadyForHarvesting: Start=HarvestRipe; End=Unused
          VariableReference ThermalTime: VariableName=[Phenology].ThermalTime.Value
        OnEventFunction NFF: SetEvent=StartFlowering; ReSetEvent=never
          Constant PreEventValue: Value=0
          VariableReference PostEventValue: VariableName=[Phenology].Vegetative.CompletionNodeNumber.Value
        OnEventFunction FN: SetEvent=EndFlowering; ReSetEvent=never
          Constant PreEventValue: Value=0
          SubtractFunction PostEventValue
            VariableReference PostEventValue: VariableName=[Structure].MainStemNodeNo
            VariableReference PostEventValue1: VariableName=[Phenology].NFF.Value
        OnEventFunction FloweringDAS: SetEvent=Flowering; ReSetEvent=never
          Memo
            A function is used to provide flowering date as days after sowing(DAS).
          Constant PreEventValue: Value=0
          VariableReference PostEventValue: VariableName=[Phenology].DaysAfterSowing
        OnEventFunction MaturityDAS: SetEvent=Maturity; ReSetEvent=never
          Memo
            A function is used to provide maturity date as days after sowing(DAS).
          Constant PreEventValue: Value=0
          VariableReference PostEventValue: VariableName=[Phenology].DaysAfterSowing
      Structure: InitialiseStage=Emergence; PrimaryBudNo=0
        VariableReference ThermalTime: VariableName=[Phenology].ThermalTime.Value
        PhaseLookupValue MainStemPrimordiaInitiationRate: Start=Emergence; End=EndFlowering
          Constant Function: Value=20
        Constant DroughtInducedBranchMortality: Value=0
        Constant MainStemFinalNodeNumber: Value=40
        LinearInterpolationFunction Height: XProperty=[Stem].Live.Wt
          XYPairs: X=[0, 300]; Y=[10, 750]
        MultiplyFunction BranchingRate
          LinearInterpolationFunction Potential_Branching_Rate: XProperty=[Structure].MainStemNodeNo
            XYPairs: X=[0, 4, 5, 7, 8]; Y=[0, 0, 1, 1, 0]
          LinearInterpolationFunction Cover_response: XProperty=[leaf].CoverGreen
            XYPairs: X=[0, 0.17, 0.25]; Y=[1, 1, 0]
          LinearInterpolationFunction CHO_response: XProperty=[Stem].Live.NonStructuralWt
            XYPairs: X=[0, 1, 10]; Y=[1, 1, 1]
        Constant ShadeInducedBranchMortality: Value=0
        PhaseLookup MainStemNodeAppearanceRate
          PhaseLookupValue Vegetative: Start=Emergence; End=StartFlowering
            Constant Function: Value=30
          PhaseLookupValue Flowering: Start=StartFlowering; End=EndFlowering
            Constant Function: Value=40
      ReproductiveOrgan Grain
        Constant MaximumPotentialGrainSize: Value=0.4
        PhaseLookup DMDemandFunction
          PhaseLookupValue GrainFilling: Start=StartFlowering; End=EndGrainFill
            FillingRateFunction
              VariableReference NumberFunction: VariableName=[Grain].NumberFunction.Value
              AddFunction FillingDuration
                VariableReference FillingDuration: VariableName=[Phenology].GrainFilling.Target.Value
                VariableReference FillingDuration: VariableName=[Phenology].GrainFilling.Target.Value
              VariableReference ThermalTime: VariableName=[Phenology].ThermalTime.Value
              VariableReference PotentialSizeIncrement: VariableName=[Grain].MaximumPotentialGrainSize.Value
        Biomass Live
        Biomass Dead
        Constant MinimumNConc: Value=0.02
        Constant MaximumNConc: Value=0.03
        Constant WaterContent: Value=0.12
        PhaseLookup NFillingRate
          PhaseLookupValue GrainFilling: Start=StartFlowering; End=EndGrainFill
            FillingRateFunction
              VariableReference NumberFunction: VariableName=[Grain].NumberFunction.Value
              AddFunction FillingDuration
                VariableReference FillingDuration: VariableName=[Phenology].Flowering.Target.Value
                VariableReference FillingDuration: VariableName=[Phenology].GrainFilling.Target.Value
              VariableReference ThermalTime: VariableName=[Phenology].ThermalTime.Value
              MultiplyFunction PotentialSizeIncrement
                Constant MaximumFinalNConc: Value=0.04
                VariableReference MaximumSize: VariableName=[Grain].MaximumPotentialGrainSize.Value
        MultiplyFunction NumberFunction
          Constant PeasPerPod: Value=3
          VariableReference PodNumber: VariableName=[Shell].PodNumber.Value
      Root: InitialDM=0.2; SpecificRootLength=40000; KNO3_yProperty=[0.02, 0.02]; KNO3_xRootLength=[0, 0.003]; KNH4_yProperty=[0, 0]; KNH4_xRootLength=[0, 0.003]; NuptakeSupply=0
        CompositeBiomass Live: Propertys=[[Root].LayerLive]
        CompositeBiomass Dead: Propertys=[[Root].LayerDead]
        LinearInterpolationFunction KLModifier: XProperty=[Leaf].LAI
          XYPairs: X=[0, 3]; Y=[1, 1]
        AirTemperatureFunction TemperatureEffect
          XYPairs: X=[0, 26, 35]; Y=[1, 1, 1]
        Constant MaxDailyNUptake: Value=6
        Constant SenescenceRate: Value=0
        PhaseLookup RootFrontVelocity
          PhaseLookupValue PreEmergence: Start=Germination; End=Emergence
            Constant Function: Value=3
          PhaseLookupValue early: Start=Emergence; End=StartFlowering
            Constant Function: Value=15
          PhaseLookupValue late: Start=StartFlowering; End=Maturity
            Constant Function: Value=17
        PhaseLookup PartitionFraction
          PhaseLookupValue Early: Start=Emergence; End=StartFlowering
            Constant Function: Value=0.1
          PhaseLookupValue Middle: Start=StartFlowering; End=EndFlowering
            Constant Function: Value=0.08
          PhaseLookupValue Late: Start=EndFlowering; End=Maturity
            Constant Function: Value=0
        Constant MaximumNConc: Value=0.01
        Constant MinimumNConc: Value=0.005
        PhaseBasedSwitch NitrogenDemandSwitch: Start=Emergence; End=EndGrainFill
      Nodule
        Biomass Live
        Biomass Dead
        Constant SpecificNitrogenaseActivity: Value=4.5
        Constant FixationMetabolicCost: Value=7
        AirTemperatureFunction FT
          XYPairs: X=[0, 20, 30, 40]; Y=[0, 1, 1, 0]
        LinearInterpolationFunction FW: XProperty=[Leaf].Fw
          XYPairs: X=[0, 1, 1.5]; Y=[0, 1, 1]
        LinearInterpolationFunction FWlog: XProperty=[Leaf].Fw
          XYPairs: X=[0, 1, 1.5]; Y=[1, 1, 1]
        PartitionFractionDemandFunction DMDemandFunction
          PhaseLookup PartitionFraction
            PhaseLookupValue Early: Start=Emergence; End=StartFlowering
              Constant Function: Value=0.03
            PhaseLookupValue Middle: Start=StartFlowering; End=EndFlowering
              Constant Function: Value=0.02
            PhaseLookupValue Late: Start=EndFlowering; End=Maturity
              Constant Function: Value=0
        Constant MaximumNConc: Value=0.02
        Constant MinimumNConc: Value=0.01
        Constant SenescenceRate: Value=0
        PhaseBasedSwitch NitrogenDemandSwitch: Start=Emergence; End=EndGrainFill
      GenericAboveGroundOrgan Shell
        Biomass Live
        Biomass Dead
        Constant NReallocationFactor: Value=0
        Constant NRetranslocationFactor: Value=0.1
        Constant StructuralFraction: Value=0.7
        Constant MaximumNConc: Value=0.03
        Constant MinimumNConc: Value=0.01
        Constant DMRetranslocationFactor: Value=0.1
        PhaseBasedSwitch NitrogenDemandSwitch: Start=Germination; End=Maturity
        PopulationBasedDemandFunction DMDemandFunction
          VariableReference ThermalTime: VariableName=[Phenology].ThermalTime.Value
          VariableReference OrganPopulation: VariableName=[Shell].PodNumber.Value
          Constant ExpansionStress: Value=1
          AddFunction GrowthDuration
            VariableReference FloweringGrowthPeriod: VariableName=[Phenology].Flowering.Target.Value
            Constant PostFloweringGrowthPeriod: Value=60
          Constant StartStage: Value=4
          Constant MaximumOrganWt: Value=0.5
        MultiplyFunction PodNumber
          Constant PodsPerNode: Value=1
          VariableReference StemPopulation: VariableName=[Structure].TotalStemPopn
          PhaseLookupValue FloweringNodes: Start=StartFlowering; End=HarvestRipe
            SubtractFunction FloweringNodes
              VariableReference TotalNodes: VariableName=[Structure].MainStemNodeNo
              VariableReference VegetativeNodes: VariableName=[Phenology].NFF.Value
      Leaf: CurrentExpandingLeaf=0; StartFractionExpanded=0; FractionNextleafExpanded=0; _ExpandedNodeNo=0; DeadNodesYesterday=0; MaxCover=1; PotentialEP=0; KDead=0.3; GsMax=0.03; R50=200; Emissivity=0.96; Albido=0.26; FractionDied=0
        CompositeBiomass Live: Propertys=[[Leaf].CohortLive]
        CompositeBiomass Dead: Propertys=[[Leaf].CohortDead]
        ArrayBiomass CohortArrayLive: Propertys=[[Leaf].Live]; ArraySize=[Leaf].MaxNodeNo
        ArrayBiomass CohortArrayDead: Propertys=[[Leaf].Dead]; ArraySize=[Leaf].MaxNodeNo
        LeafCohort InitialLeaf1: Rank=1; Area=100
        LeafCohort InitialLeaf2: Rank=2; Area=0
        LeafCohort InitialLeaf3: Rank=3; Area=0
        VariableReference ThermalTime: VariableName=[Phenology].ThermalTime.Value
        LeafCohortParameters
          LinearInterpolationFunction GrowthDuration: XProperty=[Phenology].Stage
            XYPairs: X=[1, 4.5, 6]; Y=[90, 90, 40]
          LinearInterpolationFunction MaxArea: XProperty=[Phenology].Stage
            XYPairs: X=[1, 2, 3, 4, 5, 6, 7, 8]; Y=[0, 1000, 2000, 3000, 4000, 2000, 0, 0]
          LinearInterpolationFunction LagDuration: XProperty=[Phenology].Stage
            XYPairs: X=[1, 4.5, 4.75, 5, 6]; Y=[400, 400, 200, 100, 50]
          LinearInterpolationFunction SenescenceDuration: XProperty=[Phenology].Stage
            XYPairs: X=[1, 5, 5.5, 6]; Y=[80, 80, 40, 10]
          Constant DetachmentLagDuration: Value=1000000
          Constant DetachmentDuration: Value=1000000
          LinearInterpolationFunction SpecificLeafAreaMax: XProperty=[Leaf].LAI
            XYPairs: X=[0, 4, 6, 8]; Y=[90000, 40000, 40000, 40000]
          Constant StructuralFraction: Value=0.5
          LinearInterpolationFunction SpecificLeafAreaMin: XProperty=[Leaf].LAI
            XYPairs: X=[0, 4, 6, 8]; Y=[45000, 20000, 20000, 20000]
          LinearInterpolationFunction ExpansionStress: XProperty=[Chickpea].WaterSupplyDemandRatio
            XYPairs: X=[0, 1]; Y=[0, 1]
          Constant MinimumNConc: Value=0.03
          Constant CriticalNConc: Value=0.05
          Constant MaximumNConc: Value=0.08
          Constant NReallocationFactor: Value=1
          Constant NRetranslocationFactor: Value=0
          Constant DMRetranslocationFactor: Value=0.5
          LinearInterpolationFunction ShadeInducedSenescenceRate: XProperty=[Leaf].CohortCurrentRankCoverAbove
            XYPairs: X=[0, 0.9, 0.90001]; Y=[0, 0, 0.2]
          Constant InitialNConc: Value=0
          Constant NonStructuralFraction: Value=0
        LinearInterpolationFunction ExtinctionCoeff: XProperty=[Leaf].LAI
          XYPairs: X=[0, 0.5]; Y=[0.7, 0.7]
        RUEModel Photosynthesis
          Constant RUE: Value=1
          WeightedTemperatureFunction FT: MaximumTemperatureWeighting=0.5
            XYPairs: X=[0, 15, 30, 40]; Y=[0, 1, 1, 0]
          LinearInterpolationFunction FVPD: XProperty=[Leaf].Photosynthesis.VPD
            XYPairs: X=[0, 10, 50]; Y=[1, 1, 1]
          LinearInterpolationFunction FN: XProperty=[Leaf].Fn
            XYPairs: X=[0, 1, 1.5]; Y=[1, 1, 1]
          LinearInterpolationFunction FW: XProperty=[Leaf].Fw
            XYPairs: X=[0, 1, 1.5]; Y=[1, 1, 1]
          RUECO2Function Fco2: PhotosyntheticPathway=C3
          Memo
            Ayaz eta 2004 presented a RUE of 1.6 g/MJ PAR during non-limiting temperature conditions for field pea.  Halving this to make it total radiation gives 0.8 g/MJ and adding 20% to account for root and  nodule production and N fixiation costs gives 1.0 g/MJ
        LinearInterpolationFunction FrostFraction: XProperty=[Weather].MinT
          XYPairs: X=[-1, 0]; Y=[0, 0]
      GenericAboveGroundOrgan Stem
        Biomass Live
        Biomass Dead
        Constant NReallocationFactor: Value=0
        Constant NRetranslocationFactor: Value=0.1
        Constant DMRetranslocationFactor: Value=0.1
        InternodeDemandFunction DMDemandFunction
          Constant InterNodeWt: Value=0.1
        Constant MaximumNConc: Value=0.03
        Constant MinimumNConc: Value=0.01
        PhaseBasedSwitch NitrogenDemandSwitch: Start=Emergence; End=EndGrainFill
        Constant StructuralFraction: Value=0.7
      Summariser
        CompositeBiomass AboveGround
          Propertys=[[Leaf].Live, [Leaf].Dead, [Stem].Live, [Stem].Dead, [Grain].Live, [Grain].Dead, [Shell].Live, [Shell].Dead]
        CompositeBiomass BelowGround: Propertys=[[Root].Live, [Root].Dead, [Nodule].Live, [Nodule].Dead]
        CompositeBiomass Total
          Propertys=[[Leaf].Live, [Leaf].Dead, [Stem].Live, [Stem].Dead, [Grain].Live, [Grain].Dead, [Shell].Live, [Shell].Dead, [Root].Live, [Root].Dead, [Nodule].Live, [Nodule].Dead]
        CompositeBiomass TotalLive
          Propertys=[[Leaf].Live, [Stem].Live, [Grain].Live, [Shell].Live, [Root].Live, [Nodule].Live]
        CompositeBiomass TotalDead
          Propertys=[[Leaf].Dead, [Stem].Dead, [Grain].Dead, [Shell].Dead, [Root].Dead, [Nodule].Dead]
        CompositeBiomass Pod: Propertys=[[Shell].Live, [Shell].Dead, [Grain].Live, [Grain].Dead]
      Cultivar Amethyst
      Memo
        References

        Ayaz S, McKenzie BA, McNeil DL, Hill GD.2004. Light interception and utilization of four grain legumes sown at different plant populations and depths. Journal of Agricultural Science,142: 297-308.

        Ayaz S, McKenzie BA, Hill GD, McNeil DL.2004. Variability in yield of four grain legume species in a subhumid temperate environment. II. Yield components. Journal of Agricultural Science,142: 21-28.

        Ayaz S, McKenzie BA, Hill GD, McNeil DL.2004. Nitrogen distribution in four grain legumes. Journal of Agricultural Science,142: 309-317.

        Wilson DR, Robertson MJ.1996.Pea phenology responses to temperature and photoperiod.  Australian Agronomy Society.
  DataStore
    ExcelInput Observed: FileName=%root%\Prototypes\Chickpea\Observed.xlsx; SheetNames=[ObservedHarvestData]
    PredictedObserved: PredictedTableName=HarvestReport; ObservedTableName=ObservedHarvestData; FieldNameUsedForMatch=Stage
  Folder SE Queensland
    Memo
      A selection of data from Kenya has been included from the work of Keating et al (1992).  These include the trial originally labelled JMW2 by the original authors and was labelled Experiment 6 in Keating et al (1992).  This trial includes maize (cultivar Katumani Composite B) sown at 5 populations (1.1, 2.2, 4.4, 6.6 and 8.8 plants/m2) under low (0 kg N/ha applied) and high (120 kgN/ha) fertiliser conditions during the Long Rains of 1988.  This same experimental design was conducted at two locations, Katumani (1o 35' S, 37o 14' E) and Kiboko (2o 13' S, 37o 43' E). The trial was rainfed at Katumani but fully irrigated at Kiboko.  Yields ranged from 2000 to 5400 kg/ha at Katumani and 1000 to 6000 kg/ha at Kiboko.  There were strong population x nitrogen interactions at both sites.  A second trial refered to as BMW1 or Experiment 1 in Keating et al(1992).  A range of populations (2.0-6.5 plants/m2) and irrigation treatments (6-176 mm) where planted under high (80 kgN/ha) and low (0kgN/ha) fertiliser conditions at Katumani. Individual replicates are modelled separately due to variability in soil (depth to rock), establishment and irrigation application.  Grain yields varied from 1600 to 8000 kg/ha.
    Experiment Lawes1990
      Factors
        Factor Sowing: Specifications=[Sowing]
          Operations 1
            1990-05-20  [Chickpea].Sow(population:100, cultivar:"Amethyst", depth:50, rowSpacing:750);
          Operations 2
            1990-08-06  [Chickpea].Sow(population:100, cultivar:"Amethyst", depth:50, rowSpacing:750);
      Simulation Lawes: Area=0; Slope=0
        Weather: FileName=%root%\Prototypes\Chickpea\cooper.met
        Clock: StartDate=1990-01-01; EndDate=1990-12-31
        Summary summaryfile
        SoilArbitrator Soil Arbitrator
        Zone Field: Area=1; Slope=0
          MicroClimate: air_pressure=1010; soil_emissivity=0.96; sun_angle=15; soil_heat_flux_fraction=0.4; night_interception_fraction=0.5; windspeed_default=3; refheight=2; albedo=0.15; emissivity=0.96; gsmax=0.01; r50=200; a_interception=0; b_interception=1; c_interception=0; d_interception=0; soil_albedo=0.23
          Irrigation
          Fertiliser
          SurfaceOrganicMatter: PoolName=maize; type=maize; mass=500; standing_fraction=0; cnr=65; CriticalResidueWeight=2000; OptimumDecompTemp=20; MaxCumulativeEOS=20; CNRatioDecompCoeff=0.277; CNRatioDecompThreshold=25; TotalLeachRain=25; MinRainToLeach=10; CriticalMinimumOrganicC=0.004; DefaultCPRatio=0; DefaultStandingFraction=0; StandingExtinctCoeff=0.5; FractionFaecesAdded=0.5
            Pools:
              {PoolName=maize, ResidueType=maize, Mass=500, CNRatio=65, StandingFraction=0}
            ResidueTypes ResidueTypesList: LoadFromResource=ResidueTypes
          Operations Sowing
          Operations NRate
            1985-11-08  [Fertiliser].Apply(50, Fertiliser.Types.NH4NO3N, 10);
            1985-11-29  [Fertiliser].Apply(30, Fertiliser.Types.NH4NO3N, 10);
          Arbitrator: ArbitrationMethod=Old; NutrientUptakeMethod=2
          Report: EventNames=[Clock].DoReport
            VariableNames:
              [Clock].Today
              [Soil].SoilWater.SW
              [Soil].SoilWater.Eo
              [Soil].SoilWater.Es
              [Soil].SoilWater.Drainage
              [Soil].SoilWater.Runoff
              [Soil].SoilWater.pond
              sum([Soil].SoilWater.SWmm) as ProfileWater
              [Soil].NO3N
              [MicroClimate].net_radn
              [MicroClimate].peta
              [MicroClimate].petr
          Soil: Latitude=0; Longitude=0
            Water
              Thickness  BD    AirDry  LL15  DUL   SAT
              100        1.35  0.04    0.14  0.25  0.35
              100        1.35  0.14    0.14  0.25  0.35
              100        1.35  0.14    0.14  0.29  0.37
              200        1.4   0.15    0.15  0.29  0.37
              200        1.4   0.16    0.16  0.29  0.38
              200        1.4   0.16    0.16  0.29  0.38
              200        1.4   0.16    0.16  0.29  0.38
              200        1.4   0.16    0.16  0.29  0.38
              400        1.4   0.16    0.16  0.29  0.38
              SoilCrop ChickpeaSoil: LL=[0.14, 0.14, 0.14, 0.15, 0.16, 0.16, 0.16, 0.16, 0.16]; KL=[0.08, 0.08, 0.08, 0.08, 0.06, 0.04, 0.03, 0.02, 0.01]; XF=[1, 1, 1, 1, 1, 1, 1, 1, 1]
            SoilWater: residueinterception=0; SummerDate=1-Nov; SummerU=9; SummerCona=3; WinterDate=1-Apr; WinterU=9; WinterCona=3; DiffusConst=88; DiffusSlope=35.4; Salb=0.13; CN2Bare=50; CNRed=20; CNCov=0.8; max_pond=0; Thickness=[100, 100, 100, 200, 200, 200, 200, 200, 200]; SWCON=[0.5, 0.5, 0.5, 0.5, 0.5, 0.5, 0.5, 0.5, 0.5]
            SoilNitrogen: fom_type=[default, manure, mucuna, lablab, shemp, stable]; fract_carb=[0.2, 0.3, 0.54, 0.57, 0.45, 0]; fract_cell=[0.7, 0.3, 0.37, 0.37, 0.47, 0.1]; fract_lign=[0.1, 0.4, 0.09, 0.06, 0.08, 0.9]; wfpsN2N2O_x=[22, 88]; wfpsN2N2O_y=[0.1, 1]
            SoilOrganicMatter: RootCN=45; RootWt=1000; SoilCN=14.5; EnrACoeff=7.4; EnrBCoeff=0.2; OCUnits=Total
              Thickness  OC    FBiom  FInert
              100        1.2   0.02   0.42
              100        1     0.01   0.5
              100        0.86  0.01   0.58
              200        0.83  0.01   0.55
              200        0.58  0.01   0.86
              200        0.54  0.01   0.9
              200        0.47  0.01   0.95
              200        0.5   0.01   0.95
              200        0.5   0.01   0.95
            Analysis: Thickness=[100, 100, 100, 200, 200, 200, 200, 200, 200]; PH=[6, 6, 6, 6.2, 6.5, 6.7, 6.8, 6.8, 6.8]; PHUnits=Water; BoronUnits=HotWater
            Sample InitialN: NO3Units=ppm; NH4Units=ppm; SWUnits=Volumetric; OCUnits=Total; PHUnits=Water
              Thickness  NO3  NH4
              100        5    1.7
              100        7    1.8
              100        2    1.5
              200        1    1.4
              200        1    1.3
              200        0.8  1.2
              200        0.8  1.1
              200        0.9  1
              200        0.5  1.2
            Sample InitialSW: Thickness=[100, 100, 100, 200, 200, 200, 200, 200, 200]; NO3Units=ppm; NH4Units=ppm; SWUnits=Volumetric; OCUnits=Total; PHUnits=Water
              SW=[0.162, 0.162, 0.17, 0.178, 0.186, 0.186, 0.186, 0.186, 0.222]
          Report HarvestReport: EventNames=[Chickpea].Harvesting
            VariableNames:
              [Clock].Today
              [Chickpea].Phenology.CurrentStageName as Stage
              [Chickpea].Phenology.FloweringDAS.Value as FloweringDAS
              [Chickpea].Phenology.MaturityDAS.Value as MaturityDAS
              [Chickpea].Grain.Live.Wt as GrainWt
          Manager Harvesting
```csharp
using System;
using Models.Core;
using System.Collections.Generic;
using System.Text;
using Models.Soils;
using Models.PMF;
using Models;
using System.Xml.Serialization;
using APSIM.Shared.Utilities;

namespace Models
{
	[Serializable] 
	public class Script : Model
	{      
		[Link] Plant Chickpea;          
		[Link] Zone zone;			
					
        
        [EventSubscribe("Commencing")]
        private void OnSimulationCommencing(object sender, EventArgs e)
        {
		}	   
		
		[EventSubscribe("DoManagement")]
		private void OnDoManagement(object sender, EventArgs e)
		{
        if (Chickpea.Phenology.CurrentPhaseName=="ReadyForHarvesting")
           {
           Chickpea.Harvest();
           Chickpea.EndCrop();
           }
		}
		
		[EventSubscribe("DoManagementCalculations")]
		private void OnDoManagementCalculations(object sender, EventArgs e)
		{
			
		}
	}
}
```
          Plant Chickpea: CropType=Chickpea
    Experiment Lawes1991
      Factors
        Factor Sowing: Specifications=[Sowing]
          Operations 1
            1991-05-29  [Chickpea].Sow(population:100, cultivar:"Amethyst", depth:50, rowSpacing:750);
          Operations 2
            1991-08-08  [Chickpea].Sow(population:100, cultivar:"Amethyst", depth:50, rowSpacing:750);
      Simulation Lawes: Area=0; Slope=0
        Weather: FileName=%root%\Prototypes\Chickpea\cooper.met
        Clock: StartDate=1991-01-01; EndDate=1991-12-31
        Summary summaryfile
        SoilArbitrator Soil Arbitrator
        Zone Field: same as SE Queensland.Lawes1990.Lawes.Field
    Experiment Lawes1993
      Factors
        Factor Sowing: Specifications=[Sowing]
          Operations P1T1
            1993-05-25  [Chickpea].Sow(population:41, cultivar:"Amethyst", depth:50, rowSpacing:700);
          Operations P1T2
            1993-05-25  [Chickpea].Sow(population:35, cultivar:"Amethyst", depth:50, rowSpacing:350);
          Operations P1T3
            1993-05-25  [Chickpea].Sow(population:27, cultivar:"Amethyst", depth:50, rowSpacing:170);
          Operations P1T4
            1993-05-25  [Chickpea].Sow(population:18, cultivar:"Amethyst", depth:50, rowSpacing:350);
          Operations P1T5
            1993-05-25  [Chickpea].Sow(population:33, cultivar:"Amethyst", depth:50, rowSpacing:170);
          Operations P1T6
            1993-05-25  [Chickpea].Sow(population:79, cultivar:"Amethyst", depth:50, rowSpacing:350);
          Operations P1T7
            1993-05-25  [Chickpea].Sow(population:69, cultivar:"Amethyst", depth:50, rowSpacing:700);
          Operations P1T8
            1993-05-25  [Chickpea].Sow(population:17, cultivar:"Amethyst", depth:50, rowSpacing:700);
          Operations P2T1
            1993-07-21  [Chickpea].Sow(population:37, cultivar:"Amethyst", depth:50, rowSpacing:700);
          Operations P2T2
            1993-07-21  [Chickpea].Sow(population:41, cultivar:"Amethyst", depth:50, rowSpacing:350);
          Operations P2T4
            1993-07-21  [Chickpea].Sow(population:18, cultivar:"Amethyst", depth:50, rowSpacing:350);
          Operations P2T5
            1993-07-21  [Chickpea].Sow(population:50, cultivar:"Amethyst", depth:50, rowSpacing:700);
      Simulation Lawes: Area=0; Slope=0
        Weather: FileName=C:\ApsimX\Prototypes\Chickpea\cooper.met
        Clock: StartDate=1993-05-24; EndDate=1993-12-31
        Summary summaryfile
        SoilArbitrator Soil Arbitrator
        Zone Field: same as SE Queensland.Lawes1990.Lawes.Field
  Folder Central Queensland
    Memo: same as SE Queensland.memo
    Experiment Emerald
      Factors
        Factor Sowing: Specifications=[Sowing]
          Operations 1
            1989-03-05  [Chickpea].Sow(population:100, cultivar:"Amethyst", depth:50, rowSpacing:750);
          Operations 2
            1989-04-13  [Chickpea].Sow(population:100, cultivar:"Amethyst", depth:50, rowSpacing:750);
          Operations 3
            1989-05-02  [Chickpea].Sow(population:100, cultivar:"Amethyst", depth:50, rowSpacing:750);
          Operations 4
            1989-07-18  [Chickpea].Sow(population:100, cultivar:"Amethyst", depth:50, rowSpacing:750);
      Simulation Emerald: Area=0; Slope=0
        Weather: FileName=%root%\Prototypes\Chickpea\Emer89.met
        Clock: StartDate=1989-01-01; EndDate=1989-12-31
        Summary summaryfile
        SoilArbitrator Soil Arbitrator
        Zone Field: same as SE Queensland.Lawes1990.Lawes.Field
    Experiment Biloela
      Factors
        Factor Sowing: Specifications=[Sowing]
          Operations 1
            1990-03-12  [Chickpea].Sow(population:100, cultivar:"Amethyst", depth:50, rowSpacing:750);
          Operations 2
            1990-04-26  [Chickpea].Sow(population:100, cultivar:"Amethyst", depth:50, rowSpacing:750);
          Operations 3
            1990-06-18  [Chickpea].Sow(population:100, cultivar:"Amethyst", depth:50, rowSpacing:750);
          Operations 4
            1990-09-13  [Chickpea].Sow(population:100, cultivar:"Amethyst", depth:50, rowSpacing:750);
      Simulation Biloela: Area=0; Slope=0
        Weather: FileName=C:\ApsimX\Prototypes\Chickpea\biloela.met
        Clock: StartDate=1990-01-01; EndDate=1990-12-31
        Summary summaryfile
        SoilArbitrator Soil Arbitrator
        Zone Field: same as SE Queensland.Lawes1990.Lawes.Field
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