Simulations: Version=2
  Replacements
    Plant Chicory: CropType=SCUM
      Memo TitlePage
        # SCUM: the Simple Crop Uptake Model

        _Hamish Brown and Rob Zyskowski, Plant and Food Research, New Zealand_

        This model has been built using the Plant Modelling Framework (PMF) of [brown_plant_2014] to simulate a range of different crops in simulations where water and nitrogen balance are of interest but a fully mechanistic plant model is not needed or is not available. It is a daily time step implementation of the crop model that is used on the Overseer nutrient balance model [Cichota_etal_2010].  It uses simple sigmoidal functions for estimating daily cover and biomass deltas to give realistic water and nitrogen demands. It does not simulate potential yield, this is specified as an input. Yield will be reduced below the specified potential yield if N or water supplies from the soil are insufficient to meet demand. The model has been paramaterised for simulating water and nitrogen balances of cropping rotations in New Zealand (where over 50 different crop types are grown and it is not feasible to produce full crop models for each of these).  Because of this the model is not as generically applicable as full APSIM crop models.   It may be adapted for other purposes and other crop types may be added but the user will need to keep in mind that because it is a simple model the the parameters might need changing for crops in different locations or for crops sown at different times of the year.  Some sensibility testing or validation is recommended before application in different sutuations.

        SCUM has a simple phenology model which divides the crop growth into three main phases; a vegetative phase when the canopy is expanding, a reproductive phase when product is being formed and a senescing phase when the canopy is contracting.  SCUM has 4 organ classes to represent different biomass components and the real biomass components that these classes represent changes from crop to crop:
           1. A Simple leaf class called <b>Stover</b> which represents the unharvested parts of the plant.  Generally, this represents the leaf and stem components of the crop but for crops where stem and leaf are part of the harvested product (e.g forages and leafy vegetables) than stover is the residual fraction of leaf and stem that is not harvested.
           2. A Generic organ class called <b>Product</b> which represents the plant parts that are harvested and removed from the field.  This could represent grain, fruits, tubers, leaf or stem depending on what sort of crop is being represented.
           3. A Root organ which extracts water and nitrogen from the soil for plant growth and returns biomass to the soil on harvest
           4. A Nodule organ which is only activated and fixes nitrogen for the legume crops.
        An Arbitrator is also included which determines the allocation of drymatter and nitrogen biomass between each of these organs.

        ##Inclusion in APSIM simulations
        A scum crop is included in a simulation the same as any other APSIM crop
         * The SCUM object needs to be dragged or copied from the Crop folder in the tool box into the field of your simulation.
         * It is then planted with a sowing rule
        <pre><code class='language-cs'>
        SCUM.Sow(cultivar: Wheat_Autumn, population: 1, depth: 10, rowSpacing: 150);
        </code></pre>
          * Note that SCUM has no notion of population or rowSpacing but these parameters are required by the Sow method so filler values are provided
          * To specify an expected Expected Yield that differs to the defalt value provided, included the following code in a manager script to be executed on the day of sowing.
        <pre><code class='language-cs'>
         zone.Set("[SCUM].Product.ExpectedYield.Value", ResetValue);
        </code></pre>
        * SCUM can be Harvested, Cut, Grazed and Pruned like other crops.  Defalt proportions of the biomass in each organ are removed from the sysem and/or added to the fields residue pools.  Note that defalt removal fraction for product on harvest is 0 (becaue it is represented with a generic organ) so more appropriate removal fractions should be sepcified in a manager script as follows:
        <pre><code class='language-cs'>
        [EventSubscribe("Commencing")]
        private void OnSimulationCommencing(object sender, EventArgs e)
        {
          Remove = new RemovalFractions(SCUM.Organs);
        }
        [EventSubscribe("DoManagement")]
        private void OnDoManagement(object sender, EventArgs e)
        {
          if (Clock.Today.Date == HarvestDate2)
          {
            Remove.SetFractionRemoved("Product", 1.0);
            Remove.SetFractionRemoved("Stover", 0.05);
            Remove.SetFractionToResidue("Stover",0.95)
            SCUM.Harvest(Remove);
            SCUM.EndCrop();
          }
        }
         </code></pre>
        * A Remove class as shown above can be sent with Harvest, Cut, Graze and Prune events to specificy the proportions of removals.
         * Once a crop has been ended the field is open to plant another crop using another APSIM crop model or sowing another SCUM crop.
      Phenology
        AirTemperatureFunction ThermalTime
          Memo Description
            Progression through each of the phenological stages is driven by thermal time.  As temperature increases from zero to 30 degrees, development acelerates and then slows down again above 30 degress
          XYPairs: X=[0, 30, 40]; Y=[0, 30, 0]
        Memo Description1
          As ThermalTime accumulates the crop progresses through the following phases:
        GerminatingPhase Germinating: Start=Sowing; End=Germination
        EmergingPhase Emerging: Start=Germination; End=Emergence; ShootLag=0; ShootRate=0
          VariableReference ThermalTime: VariableName=[Phenology].ThermalTime.Value
          Memo Description
            Currently the duration of the Emergence phase is set to zero because the period of zero cover and biomass production following sowing is accounted for in the cover and biomass accumulation functions.  However this phase is included if parameterisations of other crops in the future wish to give this phase a duration.
        GenericPhase Vegetative: Start=Emergence; End=StartInductive
          Memo Description
            During this phase the plant only partitions biomass to Root and Stover (leaf and stem) Organs
          Constant Target: Value=10; Units=<sup>o</sup>Cd
          AddFunction ThermalTime
            AirTemperatureFunction Vernalisation
              Memo Description
                Progression through each of the phenological stages is driven by thermal time.  As temperature increases from zero to 30 degrees, development acelerates and then slows down again above 30 degress
              XYPairs: X=[0, 4, 5]; Y=[1, 1, 0]
          MaximumFunction Devernalisation
            MultiplyFunction
              VariableReference ThermalTime: VariableName=[Phenology].AccumulatedTT
              Constant: Value=-1
            AirTemperatureFunction Devernalisation
              Memo Description
                Progression through each of the phenological stages is driven by thermal time.  As temperature increases from zero to 30 degrees, development acelerates and then slows down again above 30 degress
              XYPairs: X=[0, 4, 5]; Y=[0, 0, -10]
        GenericPhase Inductive: Start=StartInductive; End=StartReproductive
          Constant Target: Value=500; Units=<sup>o</sup>Cd
          VariableReference ThermalTime: VariableName=[Phenology].ThermalTime.Value
        GenericPhase Reproductive: Start=StartReproductive; End=EndReproductive
          Memo Description
            During this phase the plant is partitioning biomass to Root, Stover and Product organs.
          Constant Target: Value=600; Units=<sup>o</sup>Cd
          VariableReference ThermalTime: VariableName=[Phenology].ThermalTime.Value
            VariableReference ThermalTime: VariableName=[Phenology].ThermalTime.Value
        GotoPhase: Start=EndReproductive; End=EndReproductive; FractionComplete=0; PhaseNameToGoto=Vegetative
      OrganArbitrator Arbitrator: NArbitrationOption=RelativeAllocation; DMArbitrationOption=RelativeAllocation
      SimpleLeaf Leaf: CohortsInitialised=false; Albedo=0.18; Gsmax=0.015; R50=150
        zero: BiomassYesterday, PlantAppearedLeafNo, LAI, Height, FRGR, PotentialEP, K, KDead, DeltaBiomass, LAIDead, WaterAllocation
        Memo Description
          Stover represents any part of the crop that is not removed at harvest (i.e not part of the product).
        Constant InitialDM: Value=0.6
        RUEModel Photosynthesis
          Constant RUE: Value=0.5
          RUECO2Function FCO2: PhotosyntheticPathway=C3
          LinearInterpolationFunction FN: XProperty=[Leaf].Fn
            XYPairs: X=[0, 0.5, 1, 1.5]; Y=[0, 0.2, 1, 1]
          WeightedTemperatureFunction FT: MaximumTemperatureWeighting=0.75
            XYPairs: X=[2, 12, 24, 34]; Y=[0, 1, 1, 0]
          LinearInterpolationFunction FW: XProperty=[Leaf].Fw
            XYPairs: X=[0, 0.8, 1, 1.5]; Y=[0, 1, 1, 1]
          LinearInterpolationFunction FVPD: XProperty=[Leaf].Photosynthesis.VPD
            XYPairs: X=[0, 10, 50]; Y=[1, 1, 1]
          VariableReference RadnInt: VariableName=[Leaf].RadIntTot
        Biomass Live
        Biomass Dead
        DivideFunction FRGRFunction
          VariableReference Photosynthesis: VariableName=[Leaf].Photosynthesis.Value
          MultiplyFunction PotentialPhotosynthesis
            VariableReference PotentialRUE: VariableName=[Leaf].Photosynthesis.RUE.Value
            MaximumFunction Maximum
              VariableReference RadnInt: VariableName=[Leaf].RadIntTot
              Constant MinRadn: Value=1E-05
        PartitionFractionDemandFunction DMDemandFunction
          Memo Description
            DM demand is based on a simple partitioning coefficients.  At harvest the biomass partitioned to the stover = TotalDM * (1 - RootProportion) * (1 - Harvest index).  However the partitioningFraction is more complicated that this as it partitions more biomass to the stover in the CanopyExpanding Phase and less in the Yield increasing phase to give realistic patterns of accumulation of biomass in the Stover and Product over the duration of the crop
          PhaseLookup PartitionFraction
            PhaseLookupValue: Start=Emergence; End=EndReproductive
              Constant: Value=0.7
        Constant ExtinctionCoefficientFunction: Value=0.8
          Memo Description
            The extinction coefficient is used to calculate a LAI value (needed by MicroClimate) from the canopy cover
        AddFunction LAIFunction
          MultiplyFunction LAIFunction
            VariableReference LeafWeight: VariableName=[Leaf].Live.Wt
            Constant SLA: Value=0.02; Units=m^2/g
          Constant: Value=0.1
        LinearInterpolationFunction HeightFunction: XProperty=[Phenology].Stage
          XYPairs: X=[3, 5, 6]; Y=[100, 800, 1200]
        Constant MaximumNConc: Value=0.04
        Constant MinimumNConc: Value=0.02
        PhaseLookupValue NitrogenDemandSwitch: Start=Emergence; End=EndReproductive
          Constant One: Value=1
        Folder BiomassRemovalDefaults
          OrganBiomassRemovalType Harvest: FractionRemoved=0; FractionToResidue=0.3
          OrganBiomassRemovalType Cut: FractionRemoved=0.8; FractionToResidue=0
          OrganBiomassRemovalType Prune: FractionRemoved=0; FractionToResidue=0.6
          OrganBiomassRemovalType Graze: FractionRemoved=0.6; FractionToResidue=0.1
        Constant SenescenceRateFunction: Value=0.01
        Constant DetachmentRateFunction: Value=0
      GenericAboveGroundOrgan Stem
        Memo Description
          It is the biomass that is removed from the crop at harvest and may include grain, root, leaf, stem, pod or any other organ type depending on the type of crop and how it is harvested.
        Biomass Live
        Biomass Dead
        Constant MaximumNConc: Value=0.012
        Constant MinimumNConc: Value=0.008
        PartitionFractionDemandFunction DMDemandFunction
          PhaseLookup PartitionFraction
            PhaseLookupValue YieldIncreasing: Start=StartReproductive; End=EndReproductive
              Constant: Value=0.1
        Constant DryMatterContent: Value=0.4
          Memo Description
            This is the dry matter content of the harvested yield and is used to convert fresh yield into *DryYield* which are subsequently used in determining *Ymax* (total biomass production), daily dry matter production, *HarvestIndex* and the *PartitioningFraction* of each organ
        Folder BiomassRemovalDefaults
          OrganBiomassRemovalType Harvest: FractionRemoved=0.5; FractionToResidue=0.1
          OrganBiomassRemovalType Cut: FractionRemoved=0.8; FractionToResidue=0
          OrganBiomassRemovalType Prune: FractionRemoved=0; FractionToResidue=0.6
          OrganBiomassRemovalType Graze: FractionRemoved=0.6; FractionToResidue=0.2
      Root: NuptakeSupply=0
        Memo Description
          The root organ demands and is partitioned N and DM and its depth increases through time to provide a water uptake supply
        CompositeBiomass Live: Propertys=[[Root].LayerLive]
        CompositeBiomass Dead: Propertys=[[Root].LayerDead]
        Constant SoilWaterEffect: Value=1
        Constant MaxDailyNUptake: Value=12
        Constant SenescenceRate: Value=0
        Constant MaximumNConc: Value=0.009
        Constant MinimumNConc: Value=0.009
        PhaseBasedSwitch NitrogenDemandSwitch: Start=Germination; End=EndReproductive
        Constant TemperatureEffect: Value=1
        Constant MaximumRootDepth: Value=1500
        MultiplyFunction RootFrontVelocity
          Constant RootFrontVelocity: Value=0.1
          VariableReference ThermalTime: VariableName=[Phenology].ThermalTime.Value
        PhaseLookupValue PartitionFraction: Start=Emergence; End=EndReproductive
          Constant RootProportion: Value=0.2
            Memo Description
              This is the proportion of total biomass that is paritioned into the roots and is used to set the partitioning fraction for the roots
        Constant KLModifier: Value=1
        LinearInterpolationFunction KNO3: XProperty=[Root].RootLengthDenisty
          XYPairs: X=[0, 0.003]; Y=[0.02, 0.02]
        LinearInterpolationFunction KNH4: XProperty=[Root].RootLengthDenisty
          XYPairs: X=[0, 0.003]; Y=[0, 0]
        Folder BiomassRemovalDefaults
          OrganBiomassRemovalType Harvest: FractionRemoved=0; FractionToResidue=0.2
          OrganBiomassRemovalType Cut: FractionRemoved=0; FractionToResidue=0.3
          OrganBiomassRemovalType Prune: FractionRemoved=0; FractionToResidue=0.1
          OrganBiomassRemovalType Graze: FractionRemoved=0; FractionToResidue=0.15
        LinearInterpolationFunction NUptakeSWFactor: XProperty=[Root].RWC
          XYPairs: X=[0, 1]; Y=[0, 1]
        Constant InitialDM: Value=0.01; Units=g/plant
        Constant SpecificRootLength: Value=40; Units=m/g
      CompositeBiomass Total
        Propertys=[[Leaf].Live, [Leaf].Dead, [Stem].Live, [Stem].Dead, [Root].Live, [Root].Dead]
      CompositeBiomass AboveGround: Propertys=[[Leaf].Live, [Leaf].Dead, [Stem].Live, [Stem].Dead]
        Memo
          The AboveGround composite biomass object includes Stover and Product organs.
      Cultivar Puna
      Cultivar Choice
    Report: EventNames=[Clock].DoReport
      VariableNames:
        [Clock].Today as Date
        [Clock].Today
        [ExtraVariables].Script.AccumPlantN
        [ExtraVariables].Script.AccumMineralisation
        [ExtraVariables].Script.AccumDenit
        [ExtraVariables].Script.AccumFert
        [ExtraVariables].Script.AccumLeach
        [ExtraVariables].Script.AccumDetach
        [ExtraVariables].Script.DeltaSoilOMN
        [ExtraVariables].Script.DeltaSurfaceOMN
        [ExtraVariables].Script.DeltaSoilMineralN
        [ExtraVariables].Script.SWC
        [ExtraVariables].Script.DUL
        [ExtraVariables].Script.OutFlowLat
        [ExtraVariables].Script.AccumEO
        [ExtraVariables].Script.AccumEP
        [ExtraVariables].Script.AccumES
        [ExtraVariables].Script.AccumDrainage
        [ExtraVariables].Script.AccumRunoff
        [ExtraVariables].Script.AccumRainfall
        [ExtraVariables].Script.AccumIrrigation
        [ExtraVariables].Script.AccumOutflowLat
        [ExtraVariables].Script.SoilWaterDeficit
        [ExtraVariables].Script.SoilNitrogenContent
        [ExtraVariables].Script.FomN
        [ExtraVariables].Script.HumN
        [ExtraVariables].Script.BiomN
        [ExtraVariables].Script.DltNMinRes
        [ExtraVariables].Script.DltNMinTot
        [MicroClimate].net_radn
        [MicroClimate].peta
        [MicroClimate].petr
        [Soil].SoilWater.Drainage
        [Soil].SoilWater.Runoff
        [Soil].SoilWater.Eo
        [Soil].SoilWater.SW
        [Soil].SoilWater.Es
        [Soil].SoilWater.pond
        [Soil].SoilWater.SWmm
        [Soil].NO3N
        [Soil].SoilWater.LL15mm
        sum([Soil].SoilWater.SWmm) as ProfileWater
        ([Soil].SoilWater.SW[1]+[Soil].SoilWater.SW[2]+[Soil].SoilWater.SW[3]) as TopWater
        [Defoliate].Script.LeafWt
        [Defoliate].Script.LeafHarvested
        [Defoliate].Script.StemWt
        [Defoliate].Script.StemHarvested
        [Defoliate].Script.leafToDefoliate
        [Defoliate].Script.stemToDefoliate
        [Chicory].Total.Wt as Total Weight
        [Chicory].ExpectedYield.Value as Expected Yield
        [Chicory].DryYield.Value as Dry Yield
        [Chicory].TotalBiomassAtStartReStemive.Value
        [Chicory].TotalBiomassAtStartSenescence.Value
        [Chicory].Ymax.Value
        [Chicory].Total.N as Total N
        [Chicory].AboveGround.Wt as Above Ground Weight
        [Chicory].Population as Population
        [Chicory].Arbitrator.NDemand
        [Chicory].Arbitrator.NSupply
        [Chicory].Arbitrator.DMSupply
        [Chicory].Arbitrator.DMDemand
        [Chicory].Arbitrator.DMSinkLimitation
        [Chicory].Arbitrator.DMNutrientLimitation
        [Chicory].Arbitrator.FN
        [Chicory].Arbitrator.NSupply
        [Chicory].Leaf.Wt as Leaf Weight
        [Chicory].Leaf.Live.Wt as Leaf Live Weight
        [Chicory].Leaf.Live.N as Leaf Live N
        [Chicory].Leaf.Live.NConc as Leaf Live N Concentration
        [Chicory].Leaf.Transpiration as Leaf Transpiration
        [Chicory].Leaf.WaterDemand as Leaf Water Demand
        [Chicory].Leaf.CoverTotal as Leaf Total Cover
        [Chicory].Leaf.CoverDead as Leaf Dead Cover
        [Chicory].Leaf.LAI as LAI Green
        [Chicory].Leaf.LAIDead as LAI Dead
        [Chicory].Leaf.Height as Leaf Height
        [Chicory].Leaf.PotentialBiomass.Value as Leaf Potential Biomass
        [Chicory].Leaf.Fw
        [Chicory].Leaf.Fn
        [Chicory].Phenology.AccumulatedEmergedTT
        [Chicory].Phenology.ThermalTime.Value
        [Chicory].Phenology.CurrentPhaseName
        [Chicory].Phenology.Stage
        [Chicory].Root.Live.Wt as Root Live Weight
        [Chicory].Root.Live.N as Root Live N
        [Chicory].Root.Live.NConc as Root Live N Concentration
        [Chicory].Root.WaterSupply as Root Water Supply
        [Chicory].Root.WaterUptake as Root Water Uptake
        [Chicory].Root.Depth as Root Depth
        [Chicory].Stem.Live.Wt as Stem Live Weight
        [Chicory].Stem.Live.N as Stem Live N
        [Chicory].Stem.Live.NConc as Stem Live N Concentration
        [Chicory].Stem.LiveFWt
        [AutomaticIrrigation].Script.Top_Refull
        [AutomaticIrrigation].Script.Top_Trigger
        [AutomaticIrrigation].Script.Top_SW
        [AutomaticIrrigation].Script.Top_DUL
        [AutomaticIrrigation].Script.Amount_to_apply
        [AutomaticIrrigation].Script.StartDate
        [AutomaticIrrigation].Script.SeasonIsOpen
        [AutomaticIrrigation].Script.EndDate
        [AutomaticIrrigation].Script.TodayYear
        [Irrigation].IrrigationApplied as Irrigation Applied (mm)
        [Fertiliser].NitrogenApplied as Nitrogen Applied
  Memo TitlePage
    # The APSIM Chicory Model
  DataStore
    ExcelInput Classic: FileName=ClassicObserved.xlsx; SheetNames=[ClassicObserved]
    PredictedObserved POClassic: PredictedTableName=Report; ObservedTableName=ClassicObserved; FieldNameUsedForMatch=Date
    ExcelInput Iversen: FileName=IversenObserved.xlsx; SheetNames=[IversenObserved]
    PredictedObserved POIversen: PredictedTableName=Report; ObservedTableName=IversenObserved; FieldNameUsedForMatch=Date
    ExcelInput C17a: FileName=C17aObserved.xlsx; SheetNames=[C17aObserved]
  Folder Validation
    Simulation C17a: Area=0; Slope=0
      Weather: FileName=Ruakura.met
      Clock: StartDate=2008-07-01; EndDate=2010-05-30
      Summary
      SoilArbitrator Soil Arbitrator
      Zone Field: Area=1; Slope=0
        Soil SoilHorotiu: SoilType=0; Site=Horotiu; State=New Zealand; NaturalVegetation=0; ApsoilNumber=0; Latitude=0; Longitude=0; LocationAccuracy=0; DataSource=published soil profile description (as an example)
          InitialWater Initial water: PercentMethod=EvenlyDistributed; FractionFull=0.5
          Water
            Thickness  BD   AirDry  LL15  DUL   SAT
            100        1.1  0.16    0.26  0.42  0.43
            90         1.1  0.16    0.26  0.42  0.43
            60         1.1  0.15    0.2   0.42  0.51
            110        1.1  0.12    0.16  0.37  0.47
            240        1.1  0.12    0.17  0.34  0.43
            110        1.1  0.12    0.16  0.32  0.39
            290        1.1  0.12    0.17  0.32  0.38
            200        1.1  0.12    0.17  0.32  0.38
            300        1.1  0.12    0.17  0.34  0.4
            SoilCrop ChicorySoil: LL=[0.26, 0.26, 0.2, 0.16, 0.17, 0.16, 0.17, 0.17, 0.17]; KL=[0.06, 0.06, 0.06, 0.04, 0.02, 0.01, 0, 0, 0]; XF=[1, 1, 1, 1, 1, 1, 0, 0, 0]
          SoilWater: residueinterception=0; SummerDate=1-Nov; SummerU=6; SummerCona=3.5; WinterDate=1-apr; WinterU=2; WinterCona=2; DiffusConst=88; DiffusSlope=35; Salb=0.13; CN2Bare=73; CNRed=20; CNCov=0.8; max_pond=0; Thickness=[100, 90, 60, 110, 240, 100, 300, 200, 300]; SWCON=[0.5, 0.5, 0.5, 0.5, 0.8, 0.8, 0.8, 0.9, 0.9]
          SoilNitrogen: fom_type=[default, manure, mucuna, lablab, shemp, stable]; fract_carb=[0.2, 0.3, 0.54, 0.57, 0.45, 0]; fract_cell=[0.7, 0.3, 0.37, 0.37, 0.47, 0.1]; fract_lign=[0.1, 0.4, 0.09, 0.06, 0.08, 0.9]; wfpsN2N2O_x=[22, 88]; wfpsN2N2O_y=[0.1, 1]
          SoilOrganicMatter: RootCN=40; RootWt=800; SoilCN=11.3; EnrACoeff=7.4; EnrBCoeff=0.2; OCUnits=Total
            Thickness  OC   FBiom  FInert
            100        8.2  0.08   0.3
            90         8.2  0.06   0.4
            60         5.5  0.04   0.5
            110        3.3  0.02   0.5
            240        1.7  0.02   0.8
            110        1.7  0.01   0.9
            290        1.2  0.01   1
            200        0.7  0      1
            300        0.1  0      1
          Analysis: Thickness=[100, 200, 300, 300, 300, 300, 300]; PH=[5.9, 6, 6, 6, 6, 6, 6]; PHUnits=Water; BoronUnits=HotWater
          Sample Initial nitrogen: NO3Units=ppm; NH4Units=ppm; SWUnits=Volumetric; OCUnits=Total; PHUnits=Water
            Thickness  NO3      NH4
            100        7.61905  0.132451
            200        7.27008  0.132451
            300        3.87147  0.132451
            300        3.84025  0.132451
            300        3.80952  0.132451
            300        3.77929  0.132451
            300        3.6914   0.132451
        SurfaceOrganicMatter surface organic matter: PondActive=no; ReportAdditions=no; ReportRemovals=no; PoolName=maize; type=maize; mass=500; standing_fraction=0; cnr=65; CriticalResidueWeight=2000; OptimumDecompTemp=20; MaxCumulativeEOS=20; CNRatioDecompCoeff=0.277; CNRatioDecompThreshold=25; TotalLeachRain=25; MinRainToLeach=10; CriticalMinimumOrganicC=0.004; DefaultCPRatio=0; DefaultStandingFraction=0; StandingExtinctCoeff=0.5; FractionFaecesAdded=0.5
          Pools:
            {PoolName=maize, ResidueType=maize, Mass=500, CNRatio=65, StandingFraction=0}
          ResidueTypes: LoadFromResource=ResidueTypes
          TillageTypes TillageTypesList
        Operations Sowing
          2008-10-23  [Chicory].Sow(population:200, cultivar:"Choice", depth:10, rowSpacing:150);
        MicroClimate: a_interception=0; b_interception=1; c_interception=0; d_interception=0; soil_albedo=0.23; air_pressure=1010; soil_emissivity=0.96; sun_angle=15; soil_heat_flux_fraction=0.4; night_interception_fraction=0.5; windspeed_default=3; refheight=2; albedo=0.26; emissivity=0.96; gsmax=0.01; r50=200
        Plant Chicory: ResourceName=SCUM; CropType=SCUM
        Irrigation
        Fertiliser
        Manager ExtraVariables
```csharp
using System;
using Models.Core;
using System.Collections.Generic;
using System.Text;
using Models.Soils;
using Models.PMF;
using Models;
using System.Xml.Serialization;
using APSIM.Shared.Utilities;

namespace Models
{
	[Serializable] 
	public class Script : Model
	{
		[Link] Clock Clock;
		[Link] Soils.Soil Soil;
		[Link] Models.SurfaceOM.SurfaceOrganicMatter SOM;
		[Link] Weather Met;
		[Link] Fertiliser Fert;
		[Link] Irrigation Irrig;
		[Link] Plant Chicory;
		[Link] Zone zone;
					
		[XmlIgnore] public bool InitialDay { get; set; }
		
		[XmlIgnore] public double AccumPlantN { get; set; }
		[XmlIgnore] public double AccumMineralisation { get; set; }
		[XmlIgnore] public double AccumDenit { get; set; }
		[XmlIgnore] public double AccumFert { get; set; }
		[XmlIgnore] public double AccumLeach { get; set; }
		[XmlIgnore] public double AccumDetach { get; set; }
		[XmlIgnore] public double DeltaSoilOMN { get; set; }
		[XmlIgnore] public double DeltaSurfaceOMN { get; set; }
		[XmlIgnore] public double DeltaSoilMineralN { get; set; }
		[XmlIgnore] public double SoilNitrogenContent { get; set; }
		
		[XmlIgnore] public double AccumEO { get; set; }
		[XmlIgnore] public double AccumEP { get; set; }
		[XmlIgnore] public double AccumES { get; set; }
		[XmlIgnore] public double AccumDrainage { get; set; }
		[XmlIgnore] public double AccumRunoff { get; set; }
		[XmlIgnore] public double AccumOutflowLat { get; set; }
		[XmlIgnore] public double AccumIrrigation { get; set; }
		[XmlIgnore] public double AccumRainfall { get; set; }
		[XmlIgnore] public double SoilWaterDeficit { get; set; }
	
		[XmlIgnore] public double  InitialSoilOMN { get; set; }
		[XmlIgnore] public double  InitialSurfaceOMN { get; set; }
		[XmlIgnore] public double  InitialMineralN { get; set; }
		
		[XmlIgnore] public double SWC { get; set; }
		[XmlIgnore] public double DUL { get; set; }
		[XmlIgnore] public double OutFlowLat { get; set; }

		[XmlIgnore] public double FomN { get; set; }
		[XmlIgnore] public double BiomN { get; set; }
		[XmlIgnore] public double HumN { get; set; }
		[XmlIgnore] public double OrganicN { get; set; }
		[XmlIgnore] public double NO3N { get; set; }
		[XmlIgnore] public double NH4N { get; set; }
		[XmlIgnore] public double UreaN { get; set; }
		[XmlIgnore] public double MineralN { get; set; }
		[XmlIgnore] public double DltNMinRes { get; set; }
		[XmlIgnore] public double DltNMinTot { get; set; }
		
		[EventSubscribe("Commencing")]
		private void OnSimulationCommencing(object sender, EventArgs e)
		{
			InitialDay = true;
		}
		
		[EventSubscribe("DoManagement")]
		private void OnDoManagement(object sender, EventArgs e)
		{
			//!!!!!! Nitrogen balance components !!!!!!
			//!!!!!!^^^^^^^^^^^^^^^^^^^^^^^^^^^^^!!!!!!
			FomN = MathUtilities.Sum(Soil.SoilNitrogen.FOMN);
			HumN = MathUtilities.Sum(Soil.SoilNitrogen.HumicN);
			BiomN = MathUtilities.Sum(Soil.SoilNitrogen.MicrobialN);
			OrganicN = FomN + HumN + BiomN;
			NO3N = MathUtilities.Sum(Soil.NO3N);
			NH4N = MathUtilities.Sum(Soil.NH4N);
			UreaN = MathUtilities.Sum(Soil.SoilNitrogen.urea);
			MineralN = NO3N + NH4N + UreaN; 
			DltNMinRes = MathUtilities.Sum(Soil.SoilNitrogen.dlt_n_min_res);
			DltNMinTot = MathUtilities.Sum(Soil.SoilNitrogen.MineralisedN);
			int layers = Soil.Thickness.Length;
			if (InitialDay == true)
			{
				InitialSurfaceOMN = SOM.N;
				InitialSoilOMN = OrganicN;
				InitialMineralN = MineralN;
				InitialDay = false;
			}
			DeltaSurfaceOMN = SOM.N - InitialSurfaceOMN;
			AccumLeach = AccumLeach - Soil.SoilWater.LeachNH4 - Soil.SoilWater.LeachNO3 - Soil.SoilWater.LeachUrea; //Fails
			AccumMineralisation += MathUtilities.Sum(Soil.SoilNitrogen.MineralisedN);
			AccumDenit -= MathUtilities.Sum(Soil.SoilNitrogen.Denitrification);
			AccumPlantN -= (double)zone.Get("Chicory.Root.NUptake");
			DeltaSoilOMN = OrganicN - InitialSoilOMN;
			DeltaSoilMineralN = MineralN - InitialMineralN;
			SoilNitrogenContent = MineralN;
			
			//!!!!!! Water balance components !!!!!!
			//!!!!!!^^^^^^^^^^^^^^^^^^^^^^^^^^!!!!!!

			AccumRainfall += Met.Rain;
			//AccumEP -= (double)zone.Get("[Chicory].Leaf.Transpiration");
			AccumEP -= (double)zone.Get("Chicory.Root.WaterUptake");
			SoilWaterDeficit = (SWC - DUL);
			double OutFlowLat = MathUtilities.Sum(Soil.SoilWater.outflow_lat);
			AccumOutflowLat -= OutFlowLat;
		}
		
		[EventSubscribe("DoManagementCalculations")]
		private void OnDoManagementCalculations(object sender, EventArgs e)
		{
			FomN = MathUtilities.Sum(Soil.SoilNitrogen.FOMN);
			HumN = MathUtilities.Sum(Soil.SoilNitrogen.HumicN);
			BiomN = MathUtilities.Sum(Soil.SoilNitrogen.MicrobialN);
			AccumFert += Fert.NitrogenApplied;
			AccumIrrigation += Irrig.IrrigationApplied;
			
			
			AccumEO -= Soil.SoilWater.Eo;
			AccumES -= Soil.SoilWater.Es; 
			AccumDrainage -= Soil.SoilWater.Drainage;
			AccumRunoff -= Soil.SoilWater.Runoff;
			SWC = MathUtilities.Sum(Soil.SoilWater.SWmm);
			DUL = MathUtilities.Sum(Soil.SoilWater.DULmm);
		}
	}
}
```
        Manager AutomaticIrrigation
          Irrigation_Yes_No = yes
          Season_Start = 1-Oct
          Season_End = 30-Jul
          Season_Allocation = 10000
          Refull_Frac = 0.9
          Trigger_Frac = 0.75
          Return_days = 3
          Maximum_Irrigation_Amount = 30
          Top_Depth = 300
```csharp
using System;
using Models.Core;
using Models.PMF;
using Models.Soils;
using System.Xml.Serialization;
using Models.PMF;
using APSIM.Shared.Utilities;

        
namespace Models
{
	[Serializable] 
	[System.Xml.Serialization.XmlInclude(typeof(Model))]
	public class Script : Model
	{
		//Communication to other modules
		[Link] ISummary summary = null;
		[Link] Irrigation Irrigation;
		[Link] Clock Clock;
		[Link] Soil Soil;
		[Link] Plant SCUM;
	   
		//User inputs from properties tab
		[Description("Irrigation on (yes or no)")]
		public string Irrigation_Yes_No { get; set; }
		[Description("SeasonStart (dd-MMM)")]
		public string Season_Start { get; set; }
		[Description("SeasonEnd (dd-MMM)")]
		public string Season_End { get; set; }
		[Description("Season Allocation (mm)")]
		public double Season_Allocation { get; set; }
		[Description("% PAWC to refill soil to (0-1)")]
		public double Refull_Frac { get; set; }
		[Description("% PAWC to trigger irrigation (0-1)")]
		public double Trigger_Frac { get; set; }
		[Description("Minimum days for irrigation to return")]
		public double Return_days { get; set; }
		[Description("Maximum irrigation application (mm)")]
		public double Maximum_Irrigation_Amount { get; set; }
		[Description("Depth to calculate PAWC (mm)")]
		public double Top_Depth { get; set; }
	   
		//Class members
		[XmlIgnore] private bool IrrigationIsAvailable { get; set; }
		[XmlIgnore] public bool SeasonIsOpen { get; set; }
		[XmlIgnore] private bool CropIsActive { get; set; }
		[XmlIgnore] private bool IrrigatorIsAvailable { get; set; }
		[XmlIgnore] private bool SoilIsDry { get; set; }
		[XmlIgnore] public double Top_DUL { get; set; }
		[XmlIgnore] public double Top_Refull { get; set; }
		[XmlIgnore] public double Top_Trigger { get; set; }
		[XmlIgnore] public double Top_LL { get; set; }
		[XmlIgnore] public double Top_SW { get; set; }
		[XmlIgnore] public double Accumulated_depth { get; set; }
		[XmlIgnore] public double Days_since_irrigation { get; set; }
		[XmlIgnore] public double Amount_to_apply { get; set; }
		[XmlIgnore] public double Season_Application { get; set; }
		
		//Variables for date logic testing
		[XmlIgnore] public string StartString { get; set; }
		[XmlIgnore] public string EndString { get; set; }
		[XmlIgnore] public DateTime StartDate { get; set; }
		[XmlIgnore] public DateTime EndDate { get; set; }
		[XmlIgnore] public int TodayYear { get; set; }
		[XmlIgnore] public int TodayMonth { get; set; }
		[XmlIgnore] public int StartMonth { get; set; }
		[XmlIgnore] public int EndMonth { get; set; }
		[XmlIgnore] public int TodayDay { get; set; }
		[XmlIgnore] public int StartDay { get; set; }
		[XmlIgnore] public int EndDay { get; set; }
	   
	
		//Calculate static soil variables
		[EventSubscribe("StartOfSimulation")]
		private void OnStartOfSimulation(object sender, EventArgs e)
		{   
			//Calculated soil water variables
			Accumulated_depth = 0;
			for (int layer = 0; Accumulated_depth < Top_Depth; layer++)
			{
				Top_LL += Soil.SoilWater.LL15mm[layer];
				Top_DUL += Soil.SoilWater.DULmm[layer];
				Accumulated_depth += Soil.SoilWater.Thickness[layer];
			}
			Top_Refull = Top_LL + (Top_DUL - Top_LL) * Refull_Frac;
		}
	   
	  
		//Determine daily requirement for irrigation
		[EventSubscribe("StartOfDay")]
		private void OnStartOfDay(object sender, EventArgs e)
		{ 
			//Can we irrigate?
			IrrigationIsAvailable = false; 
			if (Irrigation_Yes_No == "yes")
				IrrigationIsAvailable = true; 
	
			//Are we Allowed to Irrigate?
			TodayYear = Clock.Today.Year;
			StartString = Season_Start + "-" + TodayYear.ToString();
			EndString = Season_End + "-" + TodayYear.ToString();
			StartDate = DateTime.Parse(StartString);
			EndDate = DateTime.Parse(EndString);
			TodayMonth = Clock.Today.Month;
			TodayDay = Clock.Today.Day;
			StartDay = StartDate.Day;
			StartMonth = StartDate.Month;
			EndDay = EndDate.Day;
			EndMonth = EndDate.Month;
		  
			SeasonIsOpen = false;
			//if we are in the spring and after the start date then yes
			if ((Clock.Today.Month > 6) && (Clock.Today >= StartDate))
				SeasonIsOpen = true;
			//if we are in the autumn and before the end date then yes
			if ((Clock.Today.Month <= 6) && (Clock.Today <= EndDate))
				SeasonIsOpen = true;
		  
			//Is there a crop in the ground that needs irrigation?
			CropIsActive = false;
			if ((SCUM.Phenology.Stage >= 3.0) && (SCUM.Phenology.Stage < 6.0))
				CropIsActive = true;
	      
			//Is the irrigator available?
			IrrigatorIsAvailable = false;
			Days_since_irrigation += 1;
			if (Days_since_irrigation >= Return_days)
				IrrigatorIsAvailable = true;
	      
			//Is the soil dry enough to require irrigation?
			SoilIsDry = false;
			double CurrentRootDepth = 0;
			double RootDepth = SCUM.Root.Depth;
			CurrentRootDepth = Math.Max(RootDepth, CurrentRootDepth);
	      
			double RelativeRootDepth = Math.Min(1.0, CurrentRootDepth / Top_Depth);
			Top_Trigger = Math.Min(Top_Refull, Top_DUL - (Top_DUL - Top_LL) * RelativeRootDepth * (1 - Trigger_Frac)); 
	      
			Accumulated_depth = 0;
			Top_SW = 0;
			for (int layer = 0; Accumulated_depth < Top_Depth; layer++)
			{
				Top_SW += Soil.SoilWater.SWmm[layer];
				Accumulated_depth += Soil.SoilWater.Thickness[layer];
			}
			if (Top_SW <= Top_Trigger)
				SoilIsDry = true;
	            
			//Lets bloody well irrigate then!!!!
			if ((IrrigationIsAvailable) && (SeasonIsOpen) && (CropIsActive) && (IrrigatorIsAvailable) && (SoilIsDry)) //The conditions are rife for irrigation
			{
				Amount_to_apply = Math.Min(Top_Refull - Top_SW, Maximum_Irrigation_Amount);
				Amount_to_apply = Math.Min(Amount_to_apply, Season_Allocation - Season_Application); 
				Amount_to_apply = Math.Max(Amount_to_apply, 0.0);
				Irrigation.Apply(Amount_to_apply);
				Days_since_irrigation = 0;
				Season_Application += Amount_to_apply;
				summary.WriteMessage(this, "Automatic Irrigation");
            
			}
		}
	}
}
```
        Report: EventNames=[Clock].DoReport
        Manager FertiliseTopupOnCriticalNO3Level
          fertCriteria = 200
          fertCritical = 100
          fertMinDays = 30
```csharp
// Auto fertilise per Lee model in Apsim classic

using System;
using Models.Core;
using Models.PMF;
using Models.Soils;
using APSIM.Shared.Utilities;
namespace Models
{
	[Serializable]
	public class Script : Model
	{
		[Link] Clock Clock;
		[Link] Fertiliser fertiliser;
		[Link] ISummary summary = null;
		[Link] Soil soil;

		private DateTime lastApplicationDate;

		[Description("Maximum Amount of NO3 required in top 3 layers (kg/ha)")]
		public double fertCriteria { get; set; }

		[Description("Critical Amount of NO3 in top 3 layers (kg/ha)")]
		public double fertCritical { get; set; }

		[Description("Minimum period between applications (days)")]
		public double fertMinDays { get; set; }

		
		[EventSubscribe("DoManagement")]
		private void OnDoManagement(object sender, EventArgs e)
		{						
			double NO3_available = soil.SoilNitrogen.NO3[0] + soil.SoilNitrogen.NO3[1] + soil.SoilNitrogen.NO3[2];
						
			double daysSinceLastApplication = (Clock.Today - lastApplicationDate).TotalDays;
			
			if (daysSinceLastApplication >= fertMinDays)
			{			
				if (NO3_available <= fertCritical)
				{
					double nDeficit = fertCriteria - NO3_available;				
					fertiliser.Apply(nDeficit, Fertiliser.Types.UreaN, 50);	// 50mm per LEE
					lastApplicationDate = Clock.Today;
					//summary.WriteMessage(this, "Applied " + nDeficit + " (was " + NO3_available.ToString() + ")");
					
				}
			}
		}
	}
}
```
      Memo Caption
        # SCUM: the Simple Crop Uptake Model

        _Hamish Brown and Rob Zyskowski, Plant and Food Research, New Zealand_

        This model has been built to simulate a range of different crops in simulations where water and nitrogen balance are of interest but a fully mechanistic plant model is not needed. It is a daily time step implementation of the crop model that is used on the Overseer nutrient balance model (Cichota_etal_2010).  It uses simple sigmoidal functions for estimating daily cover and biomass deltas to give realistic water and nitrogen demands. It does not simulate potential yield, this is specified as an input. Yield will be reduced below the specified potential yield if N or water supplies from the soil are insufficient to meet demand. The model has been paramaterised for simulating water and nitrogen balances of cropping rotations in New Zealand (where over 50 different crop types are grown and it is not feasible to produce full crop models for each of these). It may be adapted for other purposes and other crop types may be added but the user will need to keep in mind that it is empirical and the parameters might need changing for crops from different locations.
    Experiment Iversen
      Folder Unused Bits
        Operations FullRep2
          1998-11-27  [Irrigation].Apply(104);
          1996-10-21  [Irrigation].Apply(40);
          1996-12-04  [Irrigation].Apply(40);
          1997-10-31  [Irrigation].Apply(30);
          1997-12-03  [Irrigation].Apply(50);
          1997-12-17  [Irrigation].Apply(40);
          1998-01-16  [Irrigation].Apply(30);
          1998-01-23  [Irrigation].Apply(26);
          1998-02-19  [Irrigation].Apply(62);
          1998-03-06  [Irrigation].Apply(23);
          1998-03-31  [Irrigation].Apply(31);
          1998-09-12  [Irrigation].Apply(90);
          1998-11-16  [Irrigation].Apply(150);
          1999-01-23  [Irrigation].Apply(127);
          1999-02-27  [Irrigation].Apply(70);
          1999-12-12  [Irrigation].Apply(30);
          2000-01-23  [Irrigation].Apply(50);
          2000-12-29  [Irrigation].Apply(75);
          2001-02-03  [Irrigation].Apply(95);
          2001-03-21  [Irrigation].Apply(65);
          2001-04-27  [Irrigation].Apply(45);
          2001-12-21  [Irrigation].Apply(65);
        Operations FullRep3: same as Validation.Iversen.Unused Bits.FullRep2
        Operations NilRep1
          1998-09-15  [Irrigation].Apply(150);
        Operations NilRep2
          1998-09-15  [Irrigation].Apply(150);
        Operations NilRep3
          1998-09-15  [Irrigation].Apply(150);
        Manager Defoliate
          removeAmountType = ResidualDM
          cutPasture_StartDate = 2012-06-10
          cutPasture_EndDate = 2013-06-10
          interval2Cut = 21
          duration = 3
          defoliationType = Graze
          herbageAmount = 200
          fracResidue = 0.05
          fracN2Remove = 0.15
          urineDepth = 300
          fracN2Dung = 0.4
          fracPopDecline = 0.2
          phenStageReset = 3.5
```csharp
// Defoliates on a regular cycle or one-off via a schedule
// currenty defoliates by the amount specified spread evenly over the specified period

using System;
using Models.Core;
using System.Collections.Generic;
using System.Text;
using Models.Soils;
using Models.PMF;
using Models;
using System.Xml.Serialization;
using APSIM.Shared.Utilities;

namespace Models
{


	public class Defoliation
	{
		public DateTime startDate { set; get; }
		public DateTime endDate { set; get; }
		public double herbageAmount { set; get; }
	}
	

	[Serializable] 
	public class Script : Model
	{
		[Link] Plant Chicory;
		[Link] Zone zone;
		[Link] ISummary summary = null;
		[Link] Clock Clock;
		
		List<Defoliation> defoliations = new List<Defoliation>();

		//defoliations = new List<Defoliation>();
		
		//Outputs
		[XmlIgnore] private RemovalFractions removalFractions { get; set; }
		[XmlIgnore] public double LeafWt { get; set; }
		
		//Whether today is a harvesting day
		[XmlIgnore] public string Can_Cut{ get; set; }
		//Whether today's harvest was done
		[XmlIgnore] public string Has_Cut{ get; set; }
		//Pasture DM harvested today (kg/ha)
		[XmlIgnore] public double harvested_dm{ get; set; }
		//N harvested today
		[XmlIgnore] public double harvested_n{ get; set; }
		//DM removed from the paddock
		[XmlIgnore] public double removed_dm{ get; set; }
		//N removed from the paddock
		[XmlIgnore] public double removed_n{ get; set; }
		//DM returned to the paddock
		[XmlIgnore] public double returned_dm{ get; set; }
		//N returned to the paddock
		[XmlIgnore] public double returned_n{ get; set; }
		//N returned as dung (SurfaceOM)
		[XmlIgnore] public double NReturnedInDung{ get; set; }
		//N returned as urine (urea)
		[XmlIgnore] public double NReturnedInUrine{ get; set; }
		//Average growth rate for this cut
		[XmlIgnore] public double GrowthRateCalc{ get; set; }
		//Number of days after last harvest
		[XmlIgnore] public int DaysAfterCut{ get; set; }
		//Total standing DM (Leaf + Stem/Sheath) before cut
		[XmlIgnore] public double PreHarvestDM{ get; set; }
		//Total standing DM (Leaf + Stem/Sheath) after cut
		[XmlIgnore] public double PostHarvestDM{ get; set; }
		
		
		//Internal variables
		//The fraction of DM to be removed from the simulation (0-1)
		private double FracDM2Remove;
		//Whether cutting are allowed
		private bool CutIsAllowed;
		//The fraction of urine to be applied in each layer
		private double[] FracLayer;
		
		
		public enum removeAmountTypes
		{
			/// <summary>Setting DM amount to remove</summary>
			DMToRemove,
			/// <summary>Setting residual DM amount</summary>
			ResidualDM
		}


		public enum defoliationTypes
		{
			/// <summary>Cut</summary>
			Cut,
			/// <summary>Graze</summary>
			Graze
		}

		[Description("Choose what amount is being defined:")]
		public removeAmountTypes removeAmountType { get; set; }
		
		[Description("Enter the date to start the rotation (dd/mm/yyyy):")]
		public DateTime cutPasture_StartDate { get; set; }

		[Description("Enter the date to end the rotation (dd/mm/yyyy):")]
		public DateTime cutPasture_EndDate { get; set; }

		[Description("Enter the interval between harvests (days):")]
		public int interval2Cut { get; set; }

		[Description("Enter the number of days to defoliate over (days):")]
		public int duration { get; set; }

		[Description("Enter type of defoliation:")]
		public defoliationTypes defoliationType { get; set; }

		[Description("Enter the herbage amount to defoliate (kgDM/ha):")]
		public double herbageAmount { get; set; }

		[Description("Enter fraction returned as residue(0-1):")]
		public double fracResidue { get; set; }

		[Description("Enter fraction of N that is removed from the field (0-1):")]
		public double fracN2Remove { get; set; }

		[Description("Enter the depth down to which urine will applied (mm):")]
		public double urineDepth { get; set; }

		[Description("Enter the proportion of N returned in dung (0-1):")]
		public double fracN2Dung { get; set; }

		[Description("Enter the fraction of population decline due to defoliation (0-1):")]
		public double fracPopDecline { get; set; }
					  
		[Description("Enter the phenology stage that defoliating sets crop to (0=no change, or 1.0-7.0):")]
		public double phenStageReset { get; set; }

		private void defoliate(int listNumber)
		{
		
			summary.WriteMessage(this, "Defoliating (" + listNumber + ")");
			
			LeafWt = (double)zone.Get("Chicory.Leaf.Wt");
			
			double numDays = (defoliations[listNumber].endDate - defoliations[listNumber].startDate).TotalDays;
			double amountToDefoliate = defoliations[listNumber].herbageAmount / numDays;
						
			if (amountToDefoliate > LeafWt * 0.9)
			{
				amountToDefoliate = LeafWt * 0.9; 
			}			
			
			double amountToResidue = amountToDefoliate * fracResidue;
			double fractionToDefoliate = (amountToDefoliate - amountToResidue) / LeafWt;
			double fractionToResidue = amountToResidue / LeafWt;
			
			removalFractions.SetFractionRemoved("Leaf", fractionToDefoliate);
			removalFractions.SetFractionToResidue("Leaf", fractionToResidue);
			
			removalFractions.SetFractionRemoved("Root", 0.0);
			removalFractions.SetFractionToResidue("Root", 0.0);
			removalFractions.SetFractionRemoved("Stem", 0.0);
			removalFractions.SetFractionToResidue("Stem", 0.0);  
			
			if (phenStageReset > 0)
			{
				removalFractions.SetPhenologyStage = phenStageReset;
			}
			
			if (defoliationType == defoliationTypes.Cut)
			{			
				Chicory.RemoveBiomass("Cut", removalFractions);  
			}
			else
			{
				Chicory.RemoveBiomass("Graze", removalFractions);  
			}
														
			double popDeclineToday = fracPopDecline / numDays;
			Chicory.Population = Chicory.Population * (1 - popDeclineToday);						
		
		}

		public void addDefoliation(int numDays, double amount)
		{			
			
			Defoliation defoliation = new Defoliation();
			defoliation.startDate = Clock.Today;
			defoliation.endDate = Clock.Today.AddDays(numDays);
			defoliation.herbageAmount = amount;
			
			defoliations.Add(defoliation);
			
			summary.WriteMessage(this, "Added defoliation for " + numDays + " days");
			
			
			/*

			
			
			// Reduce population			
			if ((Clock.Today > popStartDate) && (Clock.Today < popEndDate))
			{
				Chicory.Population = Chicory.Population * (1 - popDecline);
			}			 */
			
			//StoverWt = (double)zone.Get("Chicory.Stover.Wt");
			//summary.WriteMessage(this, StoverWt.ToString());

			
		}

					  
		[EventSubscribe("Commencing")]
		private void OnSimulationCommencing(object sender, EventArgs e)
		{
			removalFractions = new RemovalFractions();
		}
		
		[EventSubscribe("DoManagement")]
		private void OnDoManagement(object sender, EventArgs e)
		{			
			// Add any regular defoliations to the defoliation list if they begin today
			if ((Clock.Today >= cutPasture_StartDate) && (Clock.Today <= cutPasture_EndDate))
			{
				double daysSinceStart = (Clock.Today - cutPasture_StartDate).TotalDays;
				if (daysSinceStart % interval2Cut == 0)
				{
					summary.WriteMessage(this, "Added regular defoliation starting at " + Clock.Today.ToString());
					addDefoliation(duration, herbageAmount);
				}
			}
			
			// Check the list of defoliations to see if any need running
			for (var i = defoliations.Count - 1; i >= 0; i--)
			{
				if ((defoliations[i].startDate <= Clock.Today) && (defoliations[i].endDate > Clock.Today))
				{									
					defoliate(i);
				}
			}
		}
								
		
		[EventSubscribe("DoManagementCalculations")]
		private void OnDoManagementCalculations(object sender, EventArgs e)
		{
			
		}
	}
}
```
        Operations DefoliationSchedule
          1997-02-21  [Defoliate].Script.addDefoliation(1,200)
      Factors
        Factor Irrigation: Specifications=[IrrigationSchedule]
          Operations Full: same as Validation.Iversen.Unused Bits.FullRep2
          Operations Nil
            1998-09-15  [Irrigation].Apply(150);
      Simulation Iversen: Area=0; Slope=0
        Memo
          Iversen data from Brown, H. E. (2004). Understanding yield and water use of dryland forage crops in New Zealand. Lincoln, NZ, Lincoln University. PhD: 288.
        Weather: FileName=Ruakura.met
        Clock: StartDate=1996-09-20; EndDate=1999-06-24
        Summary summaryfile
        SoilArbitrator Soil Arbitrator
        Zone Field: Area=1; Slope=0
          MicroClimate: a_interception=0; b_interception=1; c_interception=0; d_interception=0; soil_albedo=0.23; air_pressure=1010; soil_emissivity=0.96; sun_angle=15; soil_heat_flux_fraction=0.4; night_interception_fraction=0.5; windspeed_default=3; refheight=2; albedo=0.15; emissivity=0.96; gsmax=0.01; r50=200
          Irrigation
          Fertiliser
          SurfaceOrganicMatter: PoolName=maize; type=maize; mass=500; standing_fraction=0; cnr=65; CriticalResidueWeight=2000; OptimumDecompTemp=20; MaxCumulativeEOS=20; CNRatioDecompCoeff=0.277; CNRatioDecompThreshold=25; TotalLeachRain=25; MinRainToLeach=10; CriticalMinimumOrganicC=0.004; DefaultCPRatio=0; DefaultStandingFraction=0; StandingExtinctCoeff=0.5; FractionFaecesAdded=0.5
            Pools:
              {PoolName=maize, ResidueType=maize, Mass=500, CNRatio=65, StandingFraction=0}
            ResidueTypes ResidueTypesList: LoadFromResource=ResidueTypes
          Operations Sowing
            1996-11-01  [Chicory].Sow(population:200, cultivar:"Puna", depth:10, rowSpacing:150);
          Manager ExtraVariables
```csharp
using System;
using Models.Core;
using System.Collections.Generic;
using System.Text;
using Models.Soils;
using Models.PMF;
using Models;
using System.Xml.Serialization;
using APSIM.Shared.Utilities;

namespace Models
{
	[Serializable] 
	public class Script : Model
	{
		[Link] Clock Clock;
		[Link] Soils.Soil Soil;
		[Link] Models.SurfaceOM.SurfaceOrganicMatter SOM;
		[Link] Weather Met;
		[Link] Fertiliser Fert;
		[Link] Irrigation Irrig;
		[Link] Plant Chicory;
		[Link] Zone zone;
					
		[XmlIgnore] public bool InitialDay { get; set; }
		
		[XmlIgnore] public double AccumPlantN { get; set; }
		[XmlIgnore] public double AccumMineralisation { get; set; }
		[XmlIgnore] public double AccumDenit { get; set; }
		[XmlIgnore] public double AccumFert { get; set; }
		[XmlIgnore] public double AccumLeach { get; set; }
		[XmlIgnore] public double AccumDetach { get; set; }
		[XmlIgnore] public double DeltaSoilOMN { get; set; }
		[XmlIgnore] public double DeltaSurfaceOMN { get; set; }
		[XmlIgnore] public double DeltaSoilMineralN { get; set; }
		[XmlIgnore] public double SoilNitrogenContent { get; set; }
		
		[XmlIgnore] public double AccumEO { get; set; }
		[XmlIgnore] public double AccumEP { get; set; }
		[XmlIgnore] public double AccumES { get; set; }
		[XmlIgnore] public double AccumDrainage { get; set; }
		[XmlIgnore] public double AccumRunoff { get; set; }
		[XmlIgnore] public double AccumOutflowLat { get; set; }
		[XmlIgnore] public double AccumIrrigation { get; set; }
		[XmlIgnore] public double AccumRainfall { get; set; }
		[XmlIgnore] public double SoilWaterDeficit { get; set; }
	
		[XmlIgnore] public double  InitialSoilOMN { get; set; }
		[XmlIgnore] public double  InitialSurfaceOMN { get; set; }
		[XmlIgnore] public double  InitialMineralN { get; set; }
		
		[XmlIgnore] public double SWC { get; set; }
		[XmlIgnore] public double DUL { get; set; }
		[XmlIgnore] public double OutFlowLat { get; set; }

		[XmlIgnore] public double FomN { get; set; }
		[XmlIgnore] public double BiomN { get; set; }
		[XmlIgnore] public double HumN { get; set; }
		[XmlIgnore] public double OrganicN { get; set; }
		[XmlIgnore] public double NO3N { get; set; }
		[XmlIgnore] public double NH4N { get; set; }
		[XmlIgnore] public double UreaN { get; set; }
		[XmlIgnore] public double MineralN { get; set; }
		[XmlIgnore] public double DltNMinRes { get; set; }
		[XmlIgnore] public double DltNMinTot { get; set; }
		
		[EventSubscribe("Commencing")]
		private void OnSimulationCommencing(object sender, EventArgs e)
		{
			InitialDay = true;
		}
		
		[EventSubscribe("DoManagement")]
		private void OnDoManagement(object sender, EventArgs e)
		{
			//!!!!!! Nitrogen balance components !!!!!!
			//!!!!!!^^^^^^^^^^^^^^^^^^^^^^^^^^^^^!!!!!!
			FomN = MathUtilities.Sum(Soil.SoilNitrogen.FOMN);
			HumN = MathUtilities.Sum(Soil.SoilNitrogen.HumicN);
			BiomN = MathUtilities.Sum(Soil.SoilNitrogen.MicrobialN);
			OrganicN = FomN + HumN + BiomN;
			NO3N = MathUtilities.Sum(Soil.NO3N);
			NH4N = MathUtilities.Sum(Soil.NH4N);
			UreaN = MathUtilities.Sum(Soil.SoilNitrogen.urea);
			MineralN = NO3N + NH4N + UreaN; 
			DltNMinRes = MathUtilities.Sum(Soil.SoilNitrogen.dlt_n_min_res);
			DltNMinTot = MathUtilities.Sum(Soil.SoilNitrogen.MineralisedN);
			int layers = Soil.Thickness.Length;
			if (InitialDay == true)
			{
				InitialSurfaceOMN = SOM.N;
				InitialSoilOMN = OrganicN;
				InitialMineralN = MineralN;
				InitialDay = false;
			}
			DeltaSurfaceOMN = SOM.N - InitialSurfaceOMN;
			AccumLeach = AccumLeach - Soil.SoilWater.LeachNH4 - Soil.SoilWater.LeachNO3 - Soil.SoilWater.LeachUrea; //Fails
			AccumMineralisation += MathUtilities.Sum(Soil.SoilNitrogen.MineralisedN);
			AccumDenit -= MathUtilities.Sum(Soil.SoilNitrogen.Denitrification);
			AccumPlantN -= (double)zone.Get("Chicory.Root.NUptake");
			DeltaSoilOMN = OrganicN - InitialSoilOMN;
			DeltaSoilMineralN = MineralN - InitialMineralN;
			SoilNitrogenContent = MineralN;
			
			//!!!!!! Water balance components !!!!!!
			//!!!!!!^^^^^^^^^^^^^^^^^^^^^^^^^^!!!!!!

			AccumRainfall += Met.Rain;
			//AccumEP -= (double)zone.Get("[Chicory].Stover.Transpiration");
			AccumEP -= (double)zone.Get("Chicory.Root.WaterUptake");
			SoilWaterDeficit = (SWC - DUL);
			double OutFlowLat = MathUtilities.Sum(Soil.SoilWater.outflow_lat);
			AccumOutflowLat -= OutFlowLat;
		}
		
		[EventSubscribe("DoManagementCalculations")]
		private void OnDoManagementCalculations(object sender, EventArgs e)
		{
			FomN = MathUtilities.Sum(Soil.SoilNitrogen.FOMN);
			HumN = MathUtilities.Sum(Soil.SoilNitrogen.HumicN);
			BiomN = MathUtilities.Sum(Soil.SoilNitrogen.MicrobialN);
			AccumFert += Fert.NitrogenApplied;
			AccumIrrigation += Irrig.IrrigationApplied;
			
			
			AccumEO -= Soil.SoilWater.Eo;
			AccumES -= Soil.SoilWater.Es; 
			AccumDrainage -= Soil.SoilWater.Drainage;
			AccumRunoff -= Soil.SoilWater.Runoff;
			SWC = MathUtilities.Sum(Soil.SoilWater.SWmm);
			DUL = MathUtilities.Sum(Soil.SoilWater.DULmm);
		}
	}
}
```
          Report: EventNames=[Clock].DoReport
          Plant Chicory: ResourceName=SCUM; CropType=SCUM
          Operations IrrigationSchedule
          Soil SoilHorotiu: SoilType=0; Site=Horotiu; State=New Zealand; NaturalVegetation=0; ApsoilNumber=0; Latitude=0; Longitude=0; LocationAccuracy=0; DataSource=published soil profile description (as an example)
            InitialWater Initial water: PercentMethod=EvenlyDistributed; FractionFull=0.5
            Water
              Thickness  BD   AirDry  LL15  DUL   SAT
              100        1.1  0.16    0.26  0.42  0.43
              90         1.1  0.16    0.26  0.42  0.43
              60         1.1  0.15    0.2   0.42  0.51
              110        1.1  0.12    0.16  0.37  0.47
              240        1.1  0.12    0.17  0.34  0.43
              110        1.1  0.12    0.16  0.32  0.39
              290        1.1  0.12    0.17  0.32  0.38
              200        1.1  0.12    0.17  0.32  0.38
              300        1.1  0.12    0.17  0.34  0.4
              SoilCrop chicorySoil: LL=[0.26, 0.26, 0.2, 0.16, 0.17, 0.16, 0.17, 0.17, 0.17]; KL=[0.06, 0.06, 0.06, 0.04, 0.02, 0.01, 0, 0, 0]; XF=[1, 1, 1, 1, 1, 1, 0, 0, 0]
            SoilWater: same as Validation.C17a.Field.SoilHorotiu.SoilWater
            SoilNitrogen: fom_type=[default, manure, mucuna, lablab, shemp, stable]; fract_carb=[0.2, 0.3, 0.54, 0.57, 0.45, 0]; fract_cell=[0.7, 0.3, 0.37, 0.37, 0.47, 0.1]; fract_lign=[0.1, 0.4, 0.09, 0.06, 0.08, 0.9]; wfpsN2N2O_x=[22, 88]; wfpsN2N2O_y=[0.1, 1]
            SoilOrganicMatter: same as Validation.C17a.Field.SoilHorotiu.SoilOrganicMatter
            Analysis: Thickness=[100, 200, 300, 300, 300, 300, 300]; PH=[5.9, 6, 6, 6, 6, 6, 6]; PHUnits=Water; BoronUnits=HotWater
            Sample Initial nitrogen: same as Validation.C17a.Field.SoilHorotiu.Initial nitrogen
          Operations DefoliationSchedule
            1997-02-21  [Defoliate].Script.addDefoliation(9,112)
            1997-06-05  [Defoliate].Script.addDefoliation(5,95)
            1997-10-06  [Defoliate].Script.addDefoliation(7,118)
            1997-11-19  [Defoliate].Script.addDefoliation(5,37)
            1997-12-23  [Defoliate].Script.addDefoliation(7,29)
            1998-02-03  [Defoliate].Script.addDefoliation(14,35)
            1998-03-12  [Defoliate].Script.addDefoliation(3,23)
            1998-05-29  [Defoliate].Script.addDefoliation(7,75)
            1998-09-29  [Defoliate].Script.addDefoliation(10,116)
            1998-11-11  [Defoliate].Script.addDefoliation(5,33)
            1998-12-15  [Defoliate].Script.addDefoliation(7,29)
            1999-01-11  [Defoliate].Script.addDefoliation(0,20)
            1999-02-17  [Defoliate].Script.addDefoliation(7,37)
            1999-04-09  [Defoliate].Script.addDefoliation(13,44)
            1999-06-24  [Defoliate].Script.addDefoliation(3,63)
            1999-09-29  [Defoliate].Script.addDefoliation(7,94)
            1999-11-09  [Defoliate].Script.addDefoliation(8,34)
            1999-12-20  [Defoliate].Script.addDefoliation(6,33)
            2000-01-21  [Defoliate].Script.addDefoliation(5,26)
            2000-03-13  [Defoliate].Script.addDefoliation(5,47)
            2000-05-25  [Defoliate].Script.addDefoliation(4,68)
            2000-09-22  [Defoliate].Script.addDefoliation(9,116)
            2000-11-10  [Defoliate].Script.addDefoliation(6,40)
            2000-12-19  [Defoliate].Script.addDefoliation(8,33)
            2001-01-24  [Defoliate].Script.addDefoliation(6,28)
            2001-03-11  [Defoliate].Script.addDefoliation(6,40)
            2001-05-02  [Defoliate].Script.addDefoliation(4,46)
            2001-06-24  [Defoliate].Script.addDefoliation(10,49)
            2001-10-03  [Defoliate].Script.addDefoliation(7,91)
            2001-11-21  [Defoliate].Script.addDefoliation(5,42)
            2001-12-22  [Defoliate].Script.addDefoliation(8,26)
            2002-02-06  [Defoliate].Script.addDefoliation(9,38)
            2002-04-03  [Defoliate].Script.addDefoliation(14,47)
            2002-06-24  [Defoliate].Script.addDefoliation(11,68)
          Manager Defoliate
            removeAmountType = ResidualDM
            cutPasture_StartDate = 2012-06-10
            cutPasture_EndDate = 2013-06-10
            interval2Cut = 21
            duration = 3
            defoliationType = Graze
            herbageAmount = 112
            leafResidueFrac = 0.05
            stemResidueFrac = 0.5
            fracN2Remove = 0.15
            urineDepth = 300
            fracN2Dung = 0.4
            fracPopDecline = 0.2
```csharp
// Defoliates on a regular cycle or one-off via a schedule
// currenty defoliates by the amount specified spread evenly over the specified period

using System;
using Models.Core;
using System.Collections.Generic;
using System.Text;
using Models.Soils;
using Models.PMF;
using Models;
using System.Xml.Serialization;
using APSIM.Shared.Utilities;

namespace Models
{


	public class Defoliation
	{
		public DateTime startDate { set; get; }
		public DateTime endDate { set; get; }
		public double herbageAmount { set; get; }
	}
	

	[Serializable] 
	public class Script : Model
	{
		[Link] Plant Chicory;
		[Link] Zone zone;
		[Link] ISummary summary = null;
		[Link] Clock Clock;
		
		List<Defoliation> defoliations = new List<Defoliation>();

		//defoliations = new List<Defoliation>();
		
		//Outputs
		[XmlIgnore] private RemovalFractions removalFractions { get; set; }
		[XmlIgnore] public double leafWt { get; set; }
		[XmlIgnore] public double stemWt { get; set; }
		
		
		[XmlIgnore] public double leafToDefoliate { get; set; }
		[XmlIgnore] public double stemToDefoliate { get; set; }

		
		//Whether today is a harvesting day
		[XmlIgnore] public string Can_Cut{ get; set; }
		//Whether today's harvest was done
		[XmlIgnore] public string Has_Cut{ get; set; }
		//Pasture DM harvested today (kg/ha)
		[XmlIgnore] public double harvested_dm{ get; set; }
		//N harvested today
		[XmlIgnore] public double harvested_n{ get; set; }
		//DM removed from the paddock
		[XmlIgnore] public double removed_dm{ get; set; }
		//N removed from the paddock
		[XmlIgnore] public double removed_n{ get; set; }
		//DM returned to the paddock
		[XmlIgnore] public double returned_dm{ get; set; }
		//N returned to the paddock
		[XmlIgnore] public double returned_n{ get; set; }
		//N returned as dung (SurfaceOM)
		[XmlIgnore] public double NReturnedInDung{ get; set; }
		//N returned as urine (urea)
		[XmlIgnore] public double NReturnedInUrine{ get; set; }
		//Average growth rate for this cut
		[XmlIgnore] public double GrowthRateCalc{ get; set; }
		//Number of days after last harvest
		[XmlIgnore] public int DaysAfterCut{ get; set; }
		//Total standing DM (Leaf + Stem/Sheath) before cut
		[XmlIgnore] public double PreHarvestDM{ get; set; }
		//Total standing DM (Leaf + Stem/Sheath) after cut
		[XmlIgnore] public double PostHarvestDM{ get; set; }
		
		
		//Internal variables
		//The fraction of DM to be removed from the simulation (0-1)
		private double FracDM2Remove;
		//Whether cutting are allowed
		private bool CutIsAllowed;
		//The fraction of urine to be applied in each layer
		private double[] FracLayer;
		
		
		public enum removeAmountTypes
		{
			/// <summary>Setting DM amount to remove</summary>
			DMToRemove,
			/// <summary>Setting residual DM amount</summary>
			ResidualDM
		}


		public enum defoliationTypes
		{
			/// <summary>Cut</summary>
			Cut,
			/// <summary>Graze</summary>
			Graze
		}

		[Description("Choose what amount is being defined:")]
		public removeAmountTypes removeAmountType { get; set; }
		
		[Description("Enter the date to start the rotation (dd/mm/yyyy):")]
		public DateTime cutPasture_StartDate { get; set; }

		[Description("Enter the date to end the rotation (dd/mm/yyyy):")]
		public DateTime cutPasture_EndDate { get; set; }

		[Description("Enter the interval between harvests (days):")]
		public int interval2Cut { get; set; }

		[Description("Enter the number of days to defoliate over (days):")]
		public int duration { get; set; }

		[Description("Select type of defoliation:")]
		public defoliationTypes defoliationType { get; set; }

		[Description("Enter amount to defoliate (kgDM/ha):")]
		public double herbageAmount { get; set; }

		[Description("Enter fraction of leaf returned as residue(0-1):")]
		public double leafResidueFrac { get; set; }

		[Description("Enter fraction of stem returned as residue(0-1):")]
		public double stemResidueFrac { get; set; }

		[Description("Enter fraction of N that is removed from the field (0-1):")]
		public double fracN2Remove { get; set; }

		[Description("Enter the depth down to which urine will applied (mm):")]
		public double urineDepth { get; set; }

		[Description("Enter the proportion of N returned in dung (0-1):")]
		public double fracN2Dung { get; set; }

		[Description("Enter the fraction of population decline due to defoliation (0-1):")]
		public double fracPopDecline { get; set; }

		private void defoliate(int listNumber)
		{
			double numDays = (defoliations[listNumber].endDate - defoliations[listNumber].startDate).TotalDays;
			
			summary.WriteMessage(this, "Defoliating (" + listNumber + "). " + defoliations[listNumber].herbageAmount + "kg/ha over " + numDays + " days");
			
			leafWt = (double)zone.Get("Chicory.Leaf.Wt");
			stemWt = (double)zone.Get("Chicory.Stem.Wt");
			
			
			if (leafWt + stemWt > 0)
			{
			
				double herbageToRemove = (defoliations[listNumber].herbageAmount / 10) / numDays; // total herbage to remove in g/m2 per day
				
				
				
				if (herbageToRemove > (leafWt + stemWt) * 0.9) // limit to 90% of existing herbage
				{
					herbageToRemove = (leafWt + stemWt) * 0.9;
				}			
							
				leafToDefoliate = herbageToRemove * leafWt / (leafWt + stemWt);			
				stemToDefoliate = herbageToRemove * stemWt / (leafWt + stemWt);

				summary.WriteMessage(this, "Current herbage (g/m2): leaf=" + leafWt + ",stem=" + stemWt);
				summary.WriteMessage(this, "Herbage to remove today (g/m2): " + herbageToRemove + " (leaf=" + leafToDefoliate + ",stem=" + stemToDefoliate + ")");


				double leafFracToRemove = leafToDefoliate / (leafWt + stemWt);
				double stemFracToRemove = stemToDefoliate / (leafWt + stemWt);				

				// calculate residue				
				double leafFracToResidue = leafResidueFrac * leafFracToRemove;
				double stemFracToResidue = stemResidueFrac * stemFracToRemove;
				
				// subtract residue from amount to remove
				leafFracToRemove = leafFracToRemove - leafFracToResidue;
				stemFracToRemove = stemFracToRemove - stemFracToResidue;
				
				removalFractions.SetFractionRemoved("Leaf", leafFracToRemove);
				removalFractions.SetFractionToResidue("Leaf", leafFracToResidue);
				removalFractions.SetFractionRemoved("Stem", stemFracToRemove);
				removalFractions.SetFractionToResidue("Stem", stemFracToResidue);  
				
				removalFractions.SetFractionRemoved("Root", 0.0);
				removalFractions.SetFractionToResidue("Root", 0.0);
				
			
				if (defoliationType == defoliationTypes.Cut)
				{			
					Chicory.RemoveBiomass("Cut", removalFractions);  
				}
				else
				{
					Chicory.RemoveBiomass("Graze", removalFractions);  
				}
															
				double popDeclineToday = fracPopDecline / numDays;
				Chicory.Population = Chicory.Population * (1.0 - popDeclineToday);						

			
			}

			
/*			if (phenStageReset > 0)
			{
				//removalFractions.SetPhenologyStage = 3.5; //phenStageReset;

//				Chicory.Phenology.ReSetToStage(3.5); // same ERROR
//				Chicory.Phenology.Stage = 3.5; // nada

			} */
			
			
		
		
		}

		public void addDefoliation(int numDays, double amount)
		{			
			
			Defoliation defoliation = new Defoliation();
			defoliation.startDate = Clock.Today;
			defoliation.endDate = Clock.Today.AddDays(numDays);
			defoliation.herbageAmount = amount;
			
			defoliations.Add(defoliation);
			
			summary.WriteMessage(this, "Added defoliation for " + numDays + " days");
			
			
			/*

			
			
			// Reduce population			
			if ((Clock.Today > popStartDate) && (Clock.Today < popEndDate))
			{
				Chicory.Population = Chicory.Population * (1 - popDecline);
			}			 */
			
			//StoverWt = (double)zone.Get("Chicory.Stover.Wt");
			//summary.WriteMessage(this, StoverWt.ToString());

			
		}

					  
		[EventSubscribe("Commencing")]
		private void OnSimulationCommencing(object sender, EventArgs e)
		{
			removalFractions = new RemovalFractions();
		}
		
		[EventSubscribe("DoManagement")]
		private void OnDoManagement(object sender, EventArgs e)
		{			
			// Add any regular defoliations to the defoliation list if they begin today
			if ((Clock.Today >= cutPasture_StartDate) && (Clock.Today <= cutPasture_EndDate))
			{
				double daysSinceStart = (Clock.Today - cutPasture_StartDate).TotalDays;
				if (daysSinceStart % interval2Cut == 0)
				{
					summary.WriteMessage(this, "Added regular defoliation starting at " + Clock.Today.ToString());
					addDefoliation(duration, herbageAmount);
				}
			}
			
			// Check the list of defoliations to see if any need running
			for (var i = defoliations.Count - 1; i >= 0; i--)
			{
				if ((defoliations[i].startDate <= Clock.Today) && (defoliations[i].endDate > Clock.Today))
				{									
					defoliate(i);
				}
			}
		}
								
		
		[EventSubscribe("DoManagementCalculations")]
		private void OnDoManagementCalculations(object sender, EventArgs e)
		{
			
		}
	}
}
```
    Simulation Classic: Area=0; Slope=0
      Weather: FileName=Ruakura.met
      Clock: StartDate=2008-07-01; EndDate=2010-05-30
      Summary
      SoilArbitrator Soil Arbitrator
      Zone Field: Area=1; Slope=0
        SurfaceOrganicMatter surface organic matter: same as Validation.C17a.Field.surface organic matter
        Operations Sowing
          2008-10-23  [Chicory].Sow(population:200, cultivar:"Puna", depth:10, rowSpacing:150);
        MicroClimate: same as Validation.C17a.Field.MicroClimate
        Plant Chicory: ResourceName=SCUM; CropType=SCUM
        Irrigation
        Fertiliser
        Manager ExtraVariables: same as Validation.Iversen.Iversen.Field.ExtraVariables
        Manager FertiliseTopupOnCriticalNO3Level
          fertCriteria = 200
          fertCritical = 100
          fertMinDays = 0
          script: same as in Validation.C17a.Field.FertiliseTopupOnCriticalNO3Level
        Report: EventNames=[Clock].DoReport
        Operations DefoliationSchedule
          2009-01-19  [Defoliate].Script.Defoliate();
          2009-02-23  [Defoliate].Script.Defoliate();
          2009-04-01  [Defoliate].Script.Defoliate();
          2009-05-08  [Defoliate].Script.Defoliate();
          2009-09-14  [Defoliate].Script.Defoliate();
          2009-10-22  [Defoliate].Script.Defoliate();
          2009-11-25  [Defoliate].Script.Defoliate();
          2009-12-21  [Defoliate].Script.Defoliate();
          2010-01-15  [Defoliate].Script.Defoliate();
          2010-02-12  [Defoliate].Script.Defoliate();
          2010-03-22  [Defoliate].Script.Defoliate();
        Manager Defoliate
          LeafRemoved = 0.95
          LeafResidue = 0.01
          StemRemoved = 0.5
          StemResidue = 0.05
          popDecline = 0.2
          popStartDate = 2009-02-01
          popEndDate = 2010-04-01
```csharp
// This script is only intended to duplicate the management in the Ruakura Chicory trial by Frank Lee

using System;
using Models.Core;
using System.Collections.Generic;
using System.Text;
using Models.Soils;
using Models.PMF;
using Models;
using System.Xml.Serialization;
using APSIM.Shared.Utilities;

namespace Models
{
	[Serializable] 
	public class Script : Model
	{
		[Link] Plant Chicory;
		[Link] Zone zone;
		[Link] ISummary summary = null;
		[Link] Clock Clock;

		[Description("Fraction of leaves removed by defoliation (0-1)")]
		public double LeafRemoved { get; set; }

		[Description("Fraction of leaves to residue (0-1)")]
		public double LeafResidue { get; set; }


		[Description("Fraction of stem removed by defoliation (0-1)")]
		public double StemRemoved { get; set; }

		[Description("Fraction of stem to residue (0-1)")]
		public double StemResidue { get; set; }


		[Description("Population decline due to defoliation (0-1)")]
		public double popDecline { get; set; }

		[Description("Population decline starting date (d/mm/yyyy)")]
		public DateTime popStartDate { get; set; }

		[Description("Population decline ending date (d/mm/yyyy)")]
		public DateTime popEndDate { get; set; }

		[XmlIgnore] private RemovalFractions removalFractions { get; set; }
		[XmlIgnore] public double LeafWt { get; set; }
		[XmlIgnore] public double LeafHarvested { get; set; }
		[XmlIgnore] public double StemWt { get; set; }
		[XmlIgnore] public double StemHarvested { get; set; }
					        
		[EventSubscribe("Commencing")]
		private void OnSimulationCommencing(object sender, EventArgs e)
		{
			removalFractions = new RemovalFractions();
		}
		
		[EventSubscribe("DoManagement")]
		private void OnDoManagement(object sender, EventArgs e)
		{
		
		}
		
		public void Defoliate()
		{			
			
			
			//removalFractions.SetPhenologyStage = 3.5;
			
			LeafWt = (double)zone.Get("Chicory.Leaf.Wt");
			StemWt = (double)zone.Get("Chicory.Stem.Wt");
			
			LeafHarvested = LeafWt * LeafRemoved;
			StemHarvested = StemWt * StemRemoved;

			removalFractions.SetFractionRemoved("Leaf", LeafRemoved);
			removalFractions.SetFractionToResidue("Leaf", LeafResidue);

			removalFractions.SetFractionRemoved("Stem", StemRemoved);
			removalFractions.SetFractionToResidue("Stem", StemResidue);  
			
			removalFractions.SetFractionRemoved("Root", 0.0);
			removalFractions.SetFractionToResidue("Root", 0.0);
			
			Chicory.RemoveBiomass("Cut", removalFractions);
						
			
			
			// Reduce population
			if ((Clock.Today > popStartDate) && (Clock.Today < popEndDate))
			{
				Chicory.Population = Chicory.Population * (1 - popDecline);
			}			
		}
		
		[EventSubscribe("DoManagementCalculations")]
		private void OnDoManagementCalculations(object sender, EventArgs e)
		{
			
		}
	}
}
```
        Soil SoilHorotiu: same as Validation.C17a.Field.SoilHorotiu
        Operations IrrigationSchedule
          2010-04-07  [Irrigation].Apply(13.59)
          2010-03-30  [Irrigation].Apply(14.259)
          2010-03-18  [Irrigation].Apply(14.819)
          2010-03-13  [Irrigation].Apply(13.709)
          2010-03-09  [Irrigation].Apply(17.081)
          2010-03-05  [Irrigation].Apply(13.666)
          2010-03-01  [Irrigation].Apply(15.381)
          2010-02-23  [Irrigation].Apply(13.578)
          2010-02-20  [Irrigation].Apply(14.767)
          2010-02-11  [Irrigation].Apply(16.424)
          2010-02-06  [Irrigation].Apply(15.428)
          2010-01-16  [Irrigation].Apply(15.533)
          2010-01-13  [Irrigation].Apply(13.834)
          2010-01-08  [Irrigation].Apply(16.152)
          2010-01-03  [Irrigation].Apply(13.616)
          2009-12-31  [Irrigation].Apply(14.804)
          2009-12-26  [Irrigation].Apply(14.012)
          2009-12-22  [Irrigation].Apply(13.626)
          2009-12-19  [Irrigation].Apply(16.333)
          2009-12-11  [Irrigation].Apply(16.976)
          2009-11-26  [Irrigation].Apply(14.886)
          2009-11-15  [Irrigation].Apply(14.86)
          2009-11-09  [Irrigation].Apply(14.768)
          2009-04-17  [Irrigation].Apply(15.455)
          2009-04-03  [Irrigation].Apply(15.5)
          2009-03-29  [Irrigation].Apply(14.707)
          2009-03-25  [Irrigation].Apply(15.091)
          2009-03-21  [Irrigation].Apply(15.491)
          2009-03-15  [Irrigation].Apply(13.734)
          2009-02-09  [Irrigation].Apply(15.271)
          2009-02-06  [Irrigation].Apply(14.836)
          2009-02-03  [Irrigation].Apply(15.199)
          2009-01-31  [Irrigation].Apply(15.181)
          2009-01-28  [Irrigation].Apply(15.497)
          2009-01-25  [Irrigation].Apply(15.809)
          2009-01-22  [Irrigation].Apply(14.565)
          2009-01-16  [Irrigation].Apply(15.158)
          2009-01-09  [Irrigation].Apply(14.99)
          2009-01-06  [Irrigation].Apply(14.389)
          2008-12-29  [Irrigation].Apply(15.256)
          2008-12-15  [Irrigation].Apply(15.229)
          2008-12-07  [Irrigation].Apply(16.41)
          2008-11-29  [Irrigation].Apply(14.072)
          2008-11-24  [Irrigation].Apply(14.055)
          2008-11-21  [Irrigation].Apply(13.848)
          2008-11-15  [Irrigation].Apply(14.109)
          2008-07-10  [Irrigation].Apply(15.441)
          2008-07-01  [Irrigation].Apply(27.05)
      Memo Caption: same as Validation.C17a.Caption
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