Simulations: Version=170
  DataStore
  Folder Replacements
    Report ReportBoth: EventNames=[Clock].DoReport
      VariableNames:
        [Clock].Today
        [Deropapy].Phenology.Stage
        [Deropapy].Phenology.CurrentStageName
        [Deropapy].Phenology.CurrentPhaseName
    Plant DEROPAPY: PlantType=DEROPAPY
      Memo TitlePage
        # DEROPAPY

        This model has been built using the Plant Modelling Framework (PMF) of [brown_plant_2014] to provide a simple representation of perennial tree and vine crops.  Its scope is intended for use in water and nitrogen balance studies where the focus is on soil processes and a very simple crop is adequate.  The model has simple functions for estimating the growht and nitrogen uptake of different organs and anohter simple function for predicting canopy size so water uptake can be predicted.

        The model has currently been parameterised and tested for 4 genotpes; Apple, Kiwifruit, Grape and Peach.

        DEROPAPY has a simple phenology model that breaks the annual growth cycle into 4 phases:

           1. The <b>Dormancy</b> phase when the tree is a bare trunk, using no water, growing no biomass and taking up no Nitrogen
           2. The <b>CanopyExpansion</b> phase which occurs in the spring when the bulk of biomass assimilation is partitioned to the new leaves with smaller proportions going to trunk and root growth
           3. The <b>FruitGrowth</b> phase where the bulk of biomass assimilation is partitioned to the growing fruit with smaller proportions going to leaf, trunk and root growth
           4. The <b>LeafFall</b> phase where any further biomass assimilated is partitioned to the trunk and roots.

        As infered above the DEROPAPY consists of 4 organs:

           1. <b>Leaf</b> which ls represented with the Simpleleaf class and provides estimates of:
            - Leaf area index that the MicroClimate model uses to estimate the radiation of the tree canopy and the grass in the underlying alley
            - Water uptake demand that the soil arbitrator uses to estimate soil water extraction
            - Photosynthesis estimates (Using radiation use efficiency) to drive tree biomass production
            - Biomass demand that is used to grow leaf biomass and determine N demand for leaf growth
           2. <b>Fruit</b> which represents the biomass and nitrogen that may be removed from the orchard each year as harvested product
           3. <b>Trunk</b> which represents the perennial biomass of the trees and will grow a small amount each year but is mostly pruned out at the end of the year and may be returned to the soil surface.
           4. <b>Root</b> which extracts water and nitrogen from the soil for plant growth, grows a small amount of biomass each year and senesesses a proportion of this to the soil.

        #Inclusion in APSIM simulations
        A DEROPAPY crop is included in a simulation the same as any other APSIM crop

         * The DEROPAPY object needs to be dragged or copied from the Crop folder in the tool box into the field of your simulation.
         * It is then planted with a sowing rule
        ~~~
        DEROPAPY.Sow(cultivar: StaticCrop, population: 1, depth: 10, rowSpacing: 150);
        ~~~

          * Note that the SimpleTreeModel has no notion of population or rowSpacing but these parameters are required by the Sow method so filler values are provided
          * `depth` in the Sow arguement is the depth that the crop is sown at.  In most cases the Sow argument is used to initialise an established tree crop so sow depth arguement is used to set the root depth of the trees.  This depth should be set to the rooting depth that is expected as roots will not grow during the simulation.

        #Representing and Orchard System
         * While the DEROPAPY model will run as a stand alone model, in most cases fruit trees and vines are grown in rows with a grass or herb ley growing in the alleys.  As such it is important to set up a simulation with two rectangular zones, one with the fruit tree established within and another with the pasture or herb ley established.  In most cases a SPRUM is adequate to represent the energy, water and nitrogen balance of the alleys.
         * As part of the development of this crop model the Microclimate radiation arbitration was improved to be suitable for fruit crop set ups.  This involved modifying the strip crop radiation interception code to allow:
           1. The entire depth of the tallest (tree) canopy to be taller than the grass growing in the alleys
           2. The width of the canopy of the trees to exceed the width of the zone that the trees are planted in so they may intercept more radiation that would be possible if they were kept within the spatial confines of the row zone
        ![Schematic of radiation interception scheme as modeled for tree row crops](RadInt.jpg)

        #Further development requirements
        The greatest effort has been spent on getting the models water balance predictions working to an adequate standard.  This included running an optimisation procedure against the validation data set to obtain the most suitalbe parameters for water extraction parameters (kl pattern through the soil) and water demand parameters (max canopy conductance and conductance response to light) as well as weather the roots of the alley should be allowed to grow sideways into the row.
        The model has been set up to predict biomass accumulation and N uptake but the parameters for this functionality have not be determined from observed or published data so further work is required here.  The rates of senescence of the FruitTree root system and the contribution of the mown grass in the alley to the N and C balance have not yet been established correctly.
        Kl patterns are currently parameterised in a manager script (so they could be optimised) this needs to be moved into model set up.
        Optimisation was not able to give good fits for both row and alley zones for grape suggesting the kl patterns differ between alley and row.  Further investigation is required to better determine spatial water extraction parameters.
      BiomassArbitrator Arbitrator
        Memo
          The partitioning of biomass to fodder beet organs follows a "Relative Allocation" routine (see Arbitrator module documentation) guided by coefficients derived from the October sowing date data of the test dataset
        PlantNutrientsDelta Carbon
        PlantNutrientsDelta Nitrogen
      RootUptakesArbitrator
      Phenology
        Memo Description
          As ThermalTime accumulates the crop progresses through the following phases:
        WeightedTemperatureFunction ThermalTime: MaximumTemperatureWeighting=0.5
          XYPairs: X=[0, 30, 40]; Y=[0, 30, 0]
        GenericPhase Dormant: Start=Dormancy; End=Waiting; IsEmerged=false
          Memo Description
            Grain filling is nearly complete
          VariableReference Progression: VariableName=[Phenology].ThermalTime
          LinearInterpolationFunction Target
            XYPairs: X=[0, 0]; Y=[0, 0]
              Memo Param value set at establishment
                SCRUM calculates this parameter value during run-time when the crop is established from parameter values set in the relevent SCRUMcrop and SCRUMmanagement objects
            VariableReference XValue: VariableName=[DEROPAPY].Phenology.Chill
        StartGrowthPhase Waiting: Start=Waiting; End=StartGrowth; IsEmerged=true; DOYtoProgress=0; TemptoProgress=0
          MovingAverageFunction MovingAverageTemp: NumberOfDays=14; StageToStartMovingAverage=Waiting
            VariableReference: VariableName=[Weather].MeanT
        GenericPhase Vegetative: Start=StartGrowth; End=FullCanopy; IsEmerged=true
          Memo Description
            The phase that runs from emergence until the seedlings are established (later that emergence)
          Constant Target: FixedValue=0; Units=<sup>o</sup>Cd
            Memo Param value set at establishment
              SCRUM calculates this parameter value during run-time when the crop is established from parameter values set in the relevent SCRUMcrop and SCRUMmanagement objects
          VariableReference Progression: VariableName=[Phenology].ThermalTime
        GotoPhase DefoliateOrDevelop: Start=FullCanopy; IsEmerged=true
          Memo Param value set at establishment
            For a pasture crop the PhaseToGoTo is set to "Graize" so phenology will jump over all later phases to grazing which will remove biomass and wind phenology back to "Vegetative".  For other crops PhaseToGoTo is set to "Flowering" so phenology and growth carries on uninterupted
        GrazeAndRewind Graze: Start=ReadyToGraze; IsEmerged=true; PhaseNameToGoto=Waiting
        GenericPhase Reproductive: Start=FullCanopy; End=StartSenescence; IsEmerged=true
          Memo Description
            During the early reproductive stage the crop will be flowering
          VariableReference Progression: VariableName=[Phenology].ThermalTime
          LinearInterpolationFunction Target
            XYPairs: X=[0, 0]; Y=[0, 0]
              Memo Param value set at establishment
                SCRUM calculates this parameter value during run-time when the crop is established from parameter values set in the relevent SCRUMcrop and SCRUMmanagement objects
            VariableReference XValue: VariableName=[DEROPAPY].Phenology.PhotoPeriod
        GenericPhase Senescent: Start=StartSenescence; End=Maturity; IsEmerged=true
          Memo Description
            During this phase the crop is completing grain filling
          VariableReference Progression: VariableName=[Phenology].ThermalTime
          Constant Target: FixedValue=0; Units=<sup>o</sup>Cd
            Memo Param value set at establishment
              SCRUM calculates this parameter value during run-time when the crop is established from parameter values set in the relevent SCRUMcrop and SCRUMmanagement objects
        GenericPhase Mature: Start=Maturity; End=ReStart; IsEmerged=true
          Memo Description
            Grain filling is nearly complete
          Constant Target: FixedValue=0; Units=<sup>o</sup>Cd
            Memo Param value set at establishment
              SCRUM calculates this parameter value during run-time when the crop is established from parameter values set in the relevent SCRUMcrop and SCRUMmanagement objects
          VariableReference Progression: VariableName=[Phenology].ThermalTime
        GotoPhase Reset: Start=ReStart; IsEmerged=false; PhaseNameToGoto=Dormant
        Age
        AddFunction AgeDecimal
          VariableReference AgeInt: VariableName=[Phenology].Age
          DivideFunction Decimal
            VariableReference DOY: VariableName=[Weather].DaysSinceWinterSolstice
            Constant DaysInAYear: FixedValue=365
        AccumulateFunction Chill: StartStageName=Dormancy; EndStageName=Waiting; ResetStageName=FullCanopy; FractionRemovedOnCut=0; FractionRemovedOnHarvest=0; FractionRemovedOnGraze=0; FractionRemovedOnPrune=0
          LinearInterpolationFunction DailyChill
            XYPairs: X=[-5, 0, 8, 12]; Y=[0, 0, 0, 0]
            VariableReference XValue: VariableName=[DEROPAPY].Phenology.ThermalTime
        PhotoperiodFunction Photoperiod: Twilight=-6; DayLength=0
      Organ Leaf: Cconc=0.4; IsAboveGround=true
        Constant InitialWt: FixedValue=1; Units=g/m2
        Respiration
          Constant MaintenanceRespirationFunction: FixedValue=0; Units=0-1
          NutrientFunctions AssimilationCostFunctions
            Constant C: FixedValue=0; Units=0-1
            Constant N: FixedValue=0; Units=0-1
            Constant P: FixedValue=0; Units=0-1
            Constant K: FixedValue=0; Units=0-1
          NutrientFunctions MobilisationCostFunctions: same as Replacements.DEROPAPY.Leaf.Respiration.AssimilationCostFunctions
        PhaseLookup SenescenceRateFunction
          PhaseLookupValue LeafFall: Start=StartSenescence; End=Maturity
            Constant: FixedValue=0
        Constant DetachmentRateFunction: FixedValue=0; Units=/d
        OrganNutrientDelta Carbon: MaxCDelta=0
          OrganNutrientSupplies Supplies: Fixation=0; Uptake=0
            NutrientPoolsState ReAllocation
            NutrientPoolsState ReTranslocation
          NutrientDemandFunctions DemandFunctions
            VariableReference Structural: VariableName=[Deropapy].Leaf.TotalDMDemand
            Constant Metabolic: FixedValue=0
            Constant Storage: FixedValue=0
            Constant QStructuralPriority: FixedValue=1
            Constant QMetabolicPriority: FixedValue=0
            Constant QStoragePriority: FixedValue=0
          NutrientSupplyFunctions SupplyFunctions
            MultiplyFunction Fixation
              VariableReference Fixation: VariableName=[Leaf].Photosynthesis
              VariableReference Cconc: VariableName=[Leaf].Cconc
            Constant Uptake: FixedValue=0
            NutrientPoolFunctions ReAllocation
              Constant Structural: FixedValue=0
              Constant Metabolic: FixedValue=0
              Constant Storage: FixedValue=0
            NutrientPoolFunctions ReTranslocation: same as Replacements.DEROPAPY.Leaf.Carbon.SupplyFunctions.ReAllocation
          NutrientProportionFunctions PoolFractions
            Constant Structural: FixedValue=1
            Constant Metabolic: FixedValue=0
            Constant Storage: FixedValue=0
        OrganNutrientDelta Nitrogen: MaxCDelta=0
          OrganNutrientSupplies Supplies: Fixation=0; Uptake=0
            NutrientPoolsState ReAllocation
            NutrientPoolsState ReTranslocation
          NutrientDemandFunctions DemandFunctions
            DeficitDemandFunction Structural
            DeficitDemandFunction Metabolic
            DeficitDemandFunction Storage
            Constant QStructuralPriority: FixedValue=56.642
            Constant QMetabolicPriority: FixedValue=56.642
            Constant QStoragePriority: FixedValue=20.4379
          NutrientSupplyFunctions SupplyFunctions
            Constant Fixation: FixedValue=0
            Constant Uptake: FixedValue=0
            NutrientPoolFunctions ReAllocation
              Constant Structural: FixedValue=0
              MobilisationSupplyFunction Metabolic
                Constant Multiplier: FixedValue=1
              MobilisationSupplyFunction Storage
                Constant Multiplier: FixedValue=1
            NutrientPoolFunctions ReTranslocation
              Constant Structural: FixedValue=0
              MobilisationSupplyFunction Metabolic
                Constant Multiplier: FixedValue=0
              MobilisationSupplyFunction Storage
                Constant Multiplier: FixedValue=0.5
          NutrientConcentrationFunctions ConcFunctions
            LinearInterpolationFunction Maximum
              XYPairs: X=[3, 4, 6, 7]; Y=[0.045, 0.045, 0.035, 0.035]
              VariableReference XValue: VariableName=[Deropapy].Phenology.Stage
              Memo
                These values have been fitted to the available data. The fitted values are within the observed maximum and minimum values obtained in the FACTS soybean experiments ([ARCHONTOULIS2020721]).
            MinimumFunction Critical
              Constant MaxNConc: FixedValue=0.035
              MultiplyFunction CritNConc
                VariableReference MinNConc: VariableName=[Leaf].Nitrogen.ConcFunctions.Minimum
                Constant CritNFactor: FixedValue=1.57072
            Constant Minimum: FixedValue=0.0135454
        EnergyBalance Canopy: Albedo=0.2; Gsmax350=0.0103149; R50=59.6895; fRadnAllZones=0; KDead=0; LAIDead=0
          MinimumFunction FRGRer
            VariableReference RUE_FT: VariableName=[Leaf].Photosynthesis.FT
            MinimumFunction Others
              VariableReference RUE_FN: VariableName=[Leaf].Photosynthesis.FN
              VariableReference RUE_FVPD: VariableName=[Leaf].Photosynthesis.FVPD
          StomatalConductanceCO2Modifier
            VariableReference PhotosynthesisCO2Modifier: VariableName=[Leaf].Carbon.Photosynthesis.FCO2
          VariableReference Tallness: VariableName=[Deropapy].Height
          SubtractFunction Deepness
            VariableReference Tallness: VariableName=[Deropapy].Height
            VariableReference CanopyBase: VariableName=[Deropapy].Height.CanopyBaseHeight
          AccumulateFunction GreenAreaExpansion: StartStageName=StartGrowth; EndStageName=FullCanopy; ResetStageName=ReStart; FractionRemovedOnCut=0; FractionRemovedOnHarvest=0; FractionRemovedOnGraze=0; FractionRemovedOnPrune=0
            MultiplyFunction Expansion
              DeltaFunction Delta: StartStageName=StartGrowth
                MultiplyFunction Integral
                  Constant LAIMax: FixedValue=5
                  LinearInterpolationFunction GrowthPattern
                    XYPairs: X=[3, 3.2, 4]; Y=[0, 0.1, 1]
                    VariableReference XValue: VariableName=[Deropapy].Phenology.Stage
              LinearInterpolationFunction WaterStressFactor
                XYPairs: X=[0.5, 1]; Y=[1, 1]
                VariableReference XValue: VariableName=[Leaf].Canopy.Fw
          PhaseLookupValue DeadAreaIndex: Start=StartSenescence; End=ReStart
            MultiplyFunction Integral
              HoldFunction LAIMax: WhenToHold=StartSenescence
                VariableReference ValueToHold: VariableName=[Leaf].Canopy.GreenAreaExpansion
              MinimumFunction
                Constant One: FixedValue=1
                SubtractFunction ProportionLost
                  DivideFunction ProportionRemaining
                    SubtractFunction TTSenesce
                      VariableReference AccumulatedThermalTime: VariableName=[Phenology].AccumulatedEmergedTT
                      HoldFunction ThermalTimeAtStartSenescence: WhenToHold=StartSenescence
                        VariableReference ValueToHold: VariableName=[Phenology].AccumulatedEmergedTT
                    VariableReference SenescencePhaseDuration: VariableName=[Phenology].Senescent.Target
          AddFunction GreenAreaIndex
            Constant Initial: FixedValue=0
            VariableReference GreenAreaExpansion: VariableName=[Deropapy].Leaf.Canopy.GreenAreaExpansion
            MultiplyFunction DeadAreaIndex
              VariableReference DeadAreaIndex: VariableName=[Deropapy].Leaf.Canopy.DeadAreaIndex
              Constant invert: FixedValue=-1
          MultiplyFunction GreenExtinctionCoefficient
            Constant PotentialExtinctionCoeff: FixedValue=0.95
              Memo
                The extinction coefficient value of 0.74 ([Chakwizira_etal_2016a]) was used.
            LinearInterpolationFunction WaterStress
              XYPairs: X=[0.4, 1]; Y=[0.2, 1]
              VariableReference XValue: VariableName=[DEROPAPY].Leaf.Canopy.Fw
          Constant Wideness: FixedValue=0
          Constant DeadExtinctionCoefficient: FixedValue=0.2
        RUEModel Photosynthesis
          Constant RUE: FixedValue=1.8
          Constant FNconst: FixedValue=1
          Constant FVPD: FixedValue=1
          LinearInterpolationFunction FW
            XYPairs: X=[0, 0.554282, 1]; Y=[0, 1, 1]
            VariableReference XValue: VariableName=[Leaf].Canopy.Fw
          WeightedTemperatureFunction FT: MaximumTemperatureWeighting=0.75
            XYPairs: X=[0, 14.1007, 30, 45]; Y=[0, 1, 1, 0]
          RUECO2Function FCO2: PhotosyntheticPathway=C3
          VariableReference RadnInt: VariableName=[Leaf].Canopy.RadiationIntercepted
          LinearInterpolationFunction FN
            XYPairs: X=[0, 1, 1.5]; Y=[0, 1, 1]
            VariableReference XValue: VariableName=[Leaf].FNmetabolic
        PartitionFractionDemandFunction TotalDMDemand
          Constant PartitionFraction: FixedValue=0.2
        PhaseLookup DeltaLAI
          Memo
            DeltaLAI describes the LAI variation over the cycle and is calculated using the Area of Largest Leaf, relative leaf area, plant number, branch number and leaf appearance rate (thermal time/phyllochron).
          PhaseLookupValue Vegetative: Start=StartGrowth; End=FullCanopy
            MultiplyFunction DeltaLAI
              DivideFunction Rate
                Constant MaxLAI: FixedValue=0
                VariableReference LeafExpansionDuration: VariableName=[Deropapy].Phenology.Vegetative.Target
              VariableReference ThermalTime: VariableName=[Phenology].ThermalTime
          PhaseLookupValue Reproductive: Start=FullCanopy; End=StartSenescence
            Constant: FixedValue=0
        Constant SpecificArea: FixedValue=0.015
        BiomassRemoval BiomassRemovalDefaults: HarvestFractionLiveToRemove=0; HarvestFractionDeadToRemove=0; HarvestFractionLiveToResidue=1; HarvestFractionDeadToResidue=1
        LinearInterpolationFunction FrostFraction
          XYPairs: X=[-4, 4]; Y=[0, 0]
          VariableReference XValue: VariableName=[Weather].MinT
        MovingAverageFunction AccumulatedWaterStressEffect: NumberOfDays=30; StageToStartMovingAverage=StartGrowth
          VariableReference FW: VariableName=[Leaf].Canopy.Fw
      Organ Root: Cconc=0.4; IsAboveGround=false
        Constant InitialWt: FixedValue=0.5; Units=g/m2
        Respiration: same as Replacements.DEROPAPY.Leaf.Respiration
        VariableReference SenescenceRateFunction: VariableName=[Leaf].SenescenceRate
        Constant DetachmentRateFunction: FixedValue=0; Units=/d
        OrganNutrientDelta Carbon: MaxCDelta=0
          OrganNutrientSupplies Supplies: Fixation=0; Uptake=0
            NutrientPoolsState ReAllocation
            NutrientPoolsState ReTranslocation
          NutrientDemandFunctions DemandFunctions
            VariableReference Structural: VariableName=[Deropapy].Root.TotalDMDemand
            Constant Metabolic: FixedValue=0
            Constant Storage: FixedValue=0
            Constant QStructuralPriority: FixedValue=1
            Constant QMetabolicPriority: FixedValue=0
            Constant QStoragePriority: FixedValue=0
          NutrientSupplyFunctions SupplyFunctions: same as Replacements.DEROPAPY.Leaf.Carbon.SupplyFunctions
          NutrientProportionFunctions PoolFractions: same as Replacements.DEROPAPY.Leaf.Carbon.PoolFractions
        OrganNutrientDelta Nitrogen: MaxCDelta=0
          OrganNutrientSupplies Supplies: Fixation=0; Uptake=0
            NutrientPoolsState ReAllocation
            NutrientPoolsState ReTranslocation
          NutrientDemandFunctions DemandFunctions
            DeficitDemandFunction Structural
            DeficitDemandFunction Storage
            DeficitDemandFunction Metabolic
            Constant QStructuralPriority: FixedValue=1
            Constant QMetabolicPriority: FixedValue=1
            Constant QStoragePriority: FixedValue=0
          NutrientSupplyFunctions SupplyFunctions
            Constant Fixation: FixedValue=0
            Constant Uptake: FixedValue=0
            NutrientPoolFunctions ReAllocation: same as Replacements.DEROPAPY.Leaf.Nitrogen.SupplyFunctions.ReAllocation
            NutrientPoolFunctions ReTranslocation
              Constant Structural: FixedValue=0
              MobilisationSupplyFunction Metabolic
                Constant Multiplier: FixedValue=0
              MobilisationSupplyFunction Storage
                Constant Multiplier: FixedValue=0
          NutrientConcentrationFunctions ConcFunctions
            Constant Maximum: FixedValue=0.01
            Constant Critical: FixedValue=0.009
            Constant Minimum: FixedValue=0.0045
        RootNetwork Network
          RootShapeCylinder RootShape
          LinearInterpolationFunction KLModifier
            XYPairs: X=[0, 1]; Y=[1, 1]
            VariableReference XValue: VariableName=[Root].Network.LengthDensity
          Constant SoilWaterEffect: FixedValue=1
          Constant MaximumRootDepth: FixedValue=1400
          PhaseLookup RootFrontVelocity
            PhaseLookupValue Vegetative: Start=StartGrowth; End=StartSenescence
              MultiplyFunction Velocity
                Constant RFVmax: FixedValue=10; Units=mm/d
                VariableReference RUEstress: VariableName=[Leaf].Photosynthesis.FT
          Constant KNO3: FixedValue=0.02; Units=g/plant
          Constant KNH4: FixedValue=0.01; Units=g/plant
          LinearInterpolationFunction NUptakeSWFactor
            XYPairs: X=[0, 0.5, 1]; Y=[0, 0.2758, 1]
            VariableReference XValue: VariableName=[Root].Network.RWC
          Constant SpecificRootLength: FixedValue=40; Units=m/g
          LinearInterpolationFunction MaxDailyNUptake
            XYPairs: X=[0, 1000]; Y=[0, 100]
            Memo
              Early growth N uptake is assumed to be 0.1 kg N/ha/day, and this increases with root growth reaching a maximumof 5.8 kg N/ha/day. The maximum N uptake per day is assumed from sugar beet data (Armstrong et al., 1986).
            VariableReference XValue: VariableName=[Root].Wt
          Constant RootDepthStressFactor: FixedValue=1
        PartitionFractionDemandFunction TotalDMDemand
          Constant PartitionFraction: FixedValue=0.2
        BiomassRemoval BiomassRemovalDefaults: HarvestFractionLiveToRemove=0; HarvestFractionDeadToRemove=0; HarvestFractionLiveToResidue=1; HarvestFractionDeadToResidue=1
      Organ Stem: Cconc=0.4; IsAboveGround=true
        Constant InitialWt: FixedValue=1; Units=g/m2
        Respiration: same as Replacements.DEROPAPY.Leaf.Respiration
        VariableReference SenescenceRateFunction: VariableName=[Leaf].senescenceRate
        Constant DetachmentRateFunction: FixedValue=0; Units=/d
        OrganNutrientDelta Carbon: MaxCDelta=0
          OrganNutrientSupplies Supplies: Fixation=0; Uptake=0
            NutrientPoolsState ReAllocation
            NutrientPoolsState ReTranslocation
          NutrientDemandFunctions DemandFunctions
            VariableReference Structural: VariableName=[Deropapy].Stem.TotalDMDemand
            Constant Metabolic: FixedValue=0
            Constant Storage: FixedValue=0
            Constant QStructuralPriority: FixedValue=1
            Constant QMetabolicPriority: FixedValue=0
            Constant QStoragePriority: FixedValue=0
          NutrientSupplyFunctions SupplyFunctions: same as Replacements.DEROPAPY.Leaf.Carbon.SupplyFunctions
          NutrientProportionFunctions PoolFractions: same as Replacements.DEROPAPY.Leaf.Carbon.PoolFractions
        OrganNutrientDelta Nitrogen: MaxCDelta=0
          OrganNutrientSupplies Supplies: Fixation=0; Uptake=0
            NutrientPoolsState ReAllocation
            NutrientPoolsState ReTranslocation
          NutrientDemandFunctions DemandFunctions
            DeficitDemandFunction Structural
            DeficitDemandFunction Metabolic
            DeficitDemandFunction Storage
            Constant QStructuralPriority: FixedValue=0
            Constant QMetabolicPriority: FixedValue=0
            Constant QStoragePriority: FixedValue=100
          NutrientSupplyFunctions SupplyFunctions: same as Replacements.DEROPAPY.Leaf.Nitrogen.SupplyFunctions
          NutrientConcentrationFunctions ConcFunctions
            LinearInterpolationFunction Maximum
              XYPairs: X=[3, 4, 6]; Y=[0.03, 0.02, 0.02]
              VariableReference XValue: VariableName=[Deropapy].Phenology.Stage
              Memo
                These values have been fitted to the available data. The fitted values are within the observed maximum and minimum values obtained in the FACTS soybean experiments ([ARCHONTOULIS2020721]).
            MinimumFunction Critical
              Constant MaxNConc: FixedValue=0.02
              MultiplyFunction CritNConc
                VariableReference MinNConc: VariableName=[Stem].Nitrogen.ConcFunctions.Minimum
                Constant CritNFactor: FixedValue=1.5
            Constant Minimum: FixedValue=0.01
        BiomassRemoval BiomassRemovalDefaults: HarvestFractionLiveToRemove=0; HarvestFractionDeadToRemove=0; HarvestFractionLiveToResidue=1; HarvestFractionDeadToResidue=1
        PartitionFractionDemandFunction TotalDMDemand
          Constant PartitionFraction: FixedValue=0.2
      Organ Product: Cconc=0.4; IsAboveGround=true
        Constant InitialWt: FixedValue=1; Units=g/m2
        Respiration: same as Replacements.DEROPAPY.Leaf.Respiration
        VariableReference SenescenceRateFunction: VariableName=[Leaf].senescenceRate
        Constant DetachmentRateFunction: FixedValue=0; Units=/d
        OrganNutrientDelta Carbon: MaxCDelta=0
          OrganNutrientSupplies Supplies: Fixation=0; Uptake=0
            NutrientPoolsState ReAllocation
            NutrientPoolsState ReTranslocation
          NutrientDemandFunctions DemandFunctions
            VariableReference Structural: VariableName=[Deropapy].Product.TotalDMDemand
            Constant Metabolic: FixedValue=0
            Constant Storage: FixedValue=0
            Constant QStructuralPriority: FixedValue=1
            Constant QMetabolicPriority: FixedValue=0
            Constant QStoragePriority: FixedValue=0
          NutrientSupplyFunctions SupplyFunctions: same as Replacements.DEROPAPY.Leaf.Carbon.SupplyFunctions
          NutrientProportionFunctions PoolFractions: same as Replacements.DEROPAPY.Leaf.Carbon.PoolFractions
        OrganNutrientDelta Nitrogen: MaxCDelta=0
          OrganNutrientSupplies Supplies: Fixation=0; Uptake=0
            NutrientPoolsState ReAllocation
            NutrientPoolsState ReTranslocation
          NutrientDemandFunctions DemandFunctions: same as Replacements.DEROPAPY.Stem.Nitrogen.DemandFunctions
          NutrientSupplyFunctions SupplyFunctions: same as Replacements.DEROPAPY.Leaf.Nitrogen.SupplyFunctions
          NutrientConcentrationFunctions ConcFunctions
            LinearInterpolationFunction Maximum: same as Replacements.DEROPAPY.Stem.Nitrogen.ConcFunctions.Maximum
            MinimumFunction Critical
              Constant MaxNConc: FixedValue=0.02
              MultiplyFunction CritNConc
                VariableReference MinNConc: VariableName=[Product].Nitrogen.ConcFunctions.Minimum
                Constant CritNFactor: FixedValue=1.5
            Constant Minimum: FixedValue=0.01
        BiomassRemoval BiomassRemovalDefaults: HarvestFractionLiveToRemove=0; HarvestFractionDeadToRemove=0; HarvestFractionLiveToResidue=1; HarvestFractionDeadToResidue=1
        PartitionFractionDemandFunction TotalDMDemand
          Constant PartitionFraction: FixedValue=0.4
      CompositeStates AboveGround
        Propertys=[[Leaf].Live, [Leaf].Dead, [Product].Live, [Product].Dead, [Stem].Live, [Stem].Dead]
      CompositeStates AboveGroundDead: Propertys=[[Leaf].Dead, [Product].Dead, [Stem].Dead]
      CompositeStates BelowGround: Propertys=[[Root].Live, [Root].Dead]
      CompositeStates Total
        Propertys=[[Leaf].Live, [Leaf].Dead, [Product].Live, [Product].Dead, [Stem].Live, [Stem].Dead, [Root].Live, [Root].Dead]
      CompositeStates TotalLive: Propertys=[[Leaf].Live, [Product].Live, [Stem].Live, [Root].Live]
      CompositeStates TotalDead: Propertys=[[Leaf].Dead, [Product].Dead, [Stem].Dead, [Root].Dead]
      Constant SeedMortalityRate: FixedValue=0
      Constant MaxPrunedHeight: FixedValue=0
      AddFunction Height
        MultiplyFunction CanopyBaseHeight
          Constant Maximum: FixedValue=0
          VariableReference Age pattern: VariableName=[DEROPAPY].RelativeAnnualDimension
        MultiplyFunction PrunedCanopyDepth
          SubtractFunction Maximum
            Constant MaxPrunedHeight: FixedValue=0
            VariableReference MaxBaseHeight: VariableName=[DEROPAPY].Height.CanopyBaseHeight.Maximum
          VariableReference Age pattern: VariableName=[DEROPAPY].RelativeAnnualDimension
        MultiplyFunction SeasonalGrowth
          SubtractFunction Maximum
            Constant MaxHeight: FixedValue=0
            VariableReference MaxPurnedHeight: VariableName=[DEROPAPY].Height.PrunedCanopyDepth.Maximum.MaxPrunedHeight
          VariableReference Seasonal pattern: VariableName=[DEROPAPY].RelativeSeasonalDimension
          VariableReference Age pattern: VariableName=[DEROPAPY].RelativeAnnualDimension
      AddFunction Width
        MultiplyFunction PrunedWidth
          VariableReference Age pattern: VariableName=[DEROPAPY].RelativeAnnualDimension
          Constant Maximum: FixedValue=500; Units=mm
        MultiplyFunction SeasonalGrowth
          VariableReference Seasonal pattern: VariableName=[DEROPAPY].RelativeSeasonalDimension
          VariableReference Age pattern: VariableName=[DEROPAPY].RelativeAnnualDimension
          SubtractFunction Maximum
            Constant MaxWidth: FixedValue=0
            VariableReference MaxPurnedWidth: VariableName=[DEROPAPY].Width.PrunedWidth.Maximum
      LinearInterpolationFunction RelativeAnnualDimension
        XYPairs: X=[0, 6]; Y=[0.3, 1]
        VariableReference XValue: VariableName=[Phenology].Age.YearDecimal
      LinearInterpolationFunction RelativeSeasonalDimension
        XYPairs: X=[3, 4, 6, 7]; Y=[0, 1, 1, 1]
        VariableReference XValue: VariableName=[Phenology].Stage
      Constant MortalityRate: FixedValue=0
  Simulation PatternsTest
    Clock: Start=2000-07-21; End=2011-07-01
    Summary SummaryFile
    Weather: FileName=Whakatu.met
    MicroClimate: a_interception=0; b_interception=1; c_interception=0; d_interception=0; SoilHeatFluxFraction=0.4; MinimumHeightDiffForNewLayer=0; NightInterceptionFraction=0.5; ReferenceHeight=2
    SoilArbitrator Soil Arbitrator
    Manager AutoIrrigationDeficitBased
      AllowIrrigation = True
      depthPAWC = 1000
      triggerDeficit = 80
      irrigateAmount = 15
      returndays = 3
      IrrigateAlley = True
```csharp
using Newtonsoft.Json;
using APSIM.Shared.Utilities;
using System.Xml.Serialization;
using Models.Soils;
using Models.PMF;
using Models.Core;
using System;
using Models.Interfaces;

        
namespace Models
{
    [Serializable] 
    [System.Xml.Serialization.XmlInclude(typeof(Model))]
    public class Script : Model
    {
        [Link] private Clock Clock;
        [Link] private Zone patch;
        [Link] private ISummary summary;
        //[Link] private Irrigation Irrigation;
        [Link] private Soil Soil;
        [Link(IsOptional = true)] private IPlant existingCrop;
        [Link] private IPhysical soilPhysical;
        [Link] private ISoilWater waterBalance;
        [Link(Type = LinkType.Scoped, ByName = true)] private Zone Row;
        [Link(Type = LinkType.Scoped, ByName = true)] private Zone Alley;
       
        // Parameters from user interface
        [Separator("Manager for controlling automatic irrigation")]
        [Description(" Allow this manager to control irrigation?")]
        public bool AllowIrrigation { get; set; }
      
        [Separator(" Parameters for the irrigation system")]
        [Description(" Depth to calculate PAWC and deficit (mm)")]
        public double depthPAWC { get; set; }
        [Description(" Deficit to trigger irrigations (% PAWC)")]
        public double triggerDeficit { get; set; }
        [Description(" Irrigation amount to apply each event (mm)")]
        public double irrigateAmount { get; set; }
        [Description(" Minimum days for irrigation to return")]
        public double returndays { get; set; }
        
        [Description("Is the Alley zone irrigated?")]
        public bool IrrigateAlley {get; set;}

        //Class members
        [JsonIgnore] public double IrrigLayerSWDeficit { get; set; }
        [JsonIgnore] public double TopSWC { get; set; }
        [JsonIgnore] public double DaysSinceIrrigation { get; set; }
        [JsonIgnore] public double AmountToApply { get; set; }
        [JsonIgnore] public double SeasonAppliedAmount { get; set; }
        
        private bool IrrigationIsAllowed { get; set; }
        private bool CropIsActive { get; set; }
        private bool IrrigatorIsAvailable { get; set; }
        private bool SoilIsDry { get; set; }
        private double TopDUL;
        private double TopLL;
        private int nLayers;

    
        //Calculate static soil variables
        [EventSubscribe("StartOfSimulation")]
        private void OnStartOfSimulation(object sender, EventArgs e)
        {
            
            //Can we irrigate at all?
            IrrigationIsAllowed = false; 
            if (AllowIrrigation)
                IrrigationIsAllowed = true; 

            //Calculate soil water variables
            double depthFromSurface = 0.0;
            double fracLayer = 0.0;
            nLayers = soilPhysical.Thickness.Length;
            for (int layer = 0; layer < nLayers; layer++)
            {
                fracLayer = Math.Min(1.0, (depthPAWC - depthFromSurface) / soilPhysical.Thickness[layer]);
                TopLL += soilPhysical.LL15mm[layer] * fracLayer;
                TopDUL += soilPhysical.DULmm[layer] * fracLayer;
                depthFromSurface += soilPhysical.Thickness[layer];
                if (depthFromSurface >= depthPAWC)
                    layer = nLayers;
            }
        }
             
        //Determine daily requirement for irrigation
        [EventSubscribe("StartOfDay")]
        private void OnStartOfDay(object sender, EventArgs e)
        {
            AmountToApply = 0.0;
            DaysSinceIrrigation += 1;

            //Is the row crop actively growing?
            CropIsActive = false;
            double StageCode = (double)Row.Get("DEROPAPY.Phenology.Stage");
            if ((StageCode > 3.0) && (StageCode<5.0))
            {
                CropIsActive = true;
            }
          
            //Is the irrigator available?
            IrrigatorIsAvailable = false;
            if (DaysSinceIrrigation >= returndays)
                IrrigatorIsAvailable = true;
          
            //Is the soil dry enough to require irrigation?
            SoilIsDry = false;
            double depthFromSurface = 0.0;
            double fracLayer = 0.0;
            TopSWC = 0.0;
            for (int layer = 0; layer < nLayers; layer++)
            //for (int layer = 0; depthFromSurface < depthPAWC + soilPhysical.Thickness[layer]; layer++)
            {
                fracLayer = Math.Min(1.0, (depthPAWC - depthFromSurface) / soilPhysical.Thickness[layer]);
                TopSWC += waterBalance.SWmm[layer] * fracLayer;
                depthFromSurface += soilPhysical.Thickness[layer];
                if (depthFromSurface >= depthPAWC)
                    layer = nLayers;
            }
            
            IrrigLayerSWDeficit = TopSWC - TopDUL;
            if (Math.Max(0.0, -IrrigLayerSWDeficit) >= (TopDUL - TopLL) * (100 - triggerDeficit) / 100)
                SoilIsDry = true;

            //Are all the conditions ratifying irrigation
            if (IrrigationIsAllowed && CropIsActive && IrrigatorIsAvailable && SoilIsDry)
            {
                //Lets irrigate well !!!!
                Irrigation irrigRow = (Irrigation)Row.Get("Irrigation");
                irrigRow.Apply(irrigateAmount, depth: 0);
                DaysSinceIrrigation = 0;
                if (IrrigateAlley)
                {
                   Irrigation irrigAlley = (Irrigation)Alley.Get("Irrigation");
                   irrigAlley.Apply(irrigateAmount , depth: 0);           
                }
            }
        }
    }
}
```
    Manager AutomaticFertiliser
      AllowFertiliser = yes
      Depth2SoilN = 1500
      CriticalSoilN = 30
      FertNAmount = 50
      FertType = UreaN
      FertApplicationDepth = 10
      FertMinimumDays = 15
```csharp
using Newtonsoft.Json;
using Models.Soils.Nutrients;
using Models.Interfaces;
using System.Xml.Serialization;
using APSIM.Shared.Utilities;
using Models.Soils;
using Models.PMF;
using Models.Core;
using System;

namespace Models
{
    [Serializable]
    public class Script : Model
    {
        [Link] private Clock Clock;
        [Link] private Fertiliser fertiliser;
        [Link] private ISummary summary;
        [Link] private Soil Soil;
        [Link(Type = LinkType.Scoped, ByName = true)] private Zone Row;
        private DateTime lastApplicationDate;
        private bool fertiliserIsAllowed;
        private int nLayers;
        [Link(ByName = true)]
        private ISolute NO3;
        [Link(ByName = true)]
        private ISolute NH4;
        [Link(ByName = true)]
        private ISolute Urea;
        [Link]
        private IPhysical soilPhysical;

        //User inputs from properties tab
        [Description("Turn fertiliser applications on? ")]
        public yesnoType AllowFertiliser { get; set; }
        
        [Description("Depth to calculate available soil N (mm): ")]
        public double Depth2SoilN { get; set; }

        [Description("Minimum available N, triggers an application (kgN/ha): ")]
        public double CriticalSoilN { get; set; }

        [Description("Amount of N fertiliser for each application (kgN/ha): ")]
        public double FertNAmount { get; set; }

        [Description("Type of N fertiliser to apply: ")]
        public Fertiliser.Types FertType { get; set; }

        [Description("Depth at which to apply the fertiliser (mm): ")]
        public double FertApplicationDepth { get; set; }
       
        [Description("Minimum period between applications (days): ")]
        public double FertMinimumDays { get; set; }
       
        public enum yesnoType
        {
            /// <summary>a positive answer</summary>
            yes,
            /// <summary>a negative answer</summary>
            no
        }

        [JsonIgnore] public double TopMineralN { get; set; }
        private bool CropIsActive { get; set; }
        

        [EventSubscribe("StartOfSimulation")]
        private void OnStartOfSimulation(object sender, EventArgs e)
        {
            fertiliserIsAllowed = (AllowFertiliser == yesnoType.yes);
            nLayers = soilPhysical.Thickness.Length;
        }

        [EventSubscribe("DoManagement")]
        private void OnDoManagement(object sender, EventArgs e)
        {
            double daysSinceLastApplication = (Clock.Today - lastApplicationDate).TotalDays;
            
            //Is the row crop actively growing?
            CropIsActive = false;
            double StageCode = (double)Row.Get("DEROPAPY.Phenology.Stage");
            if ((StageCode > 3.0) && (StageCode<5.0))
            {
                CropIsActive = true;
            }
            
            // get the N stored in the soil
            double depthFromSurface = 0.0;
            double fracLayer = 0.0;
            TopMineralN = 0.0;
            for (int layer = 0; layer < nLayers; layer++)
            {
                fracLayer = Math.Min(1.0, (Depth2SoilN - depthFromSurface) / soilPhysical.Thickness[layer]);
                TopMineralN += (NO3.kgha[layer]
                + NH4.kgha[layer]
                + Urea.kgha[layer])
                * fracLayer;
                depthFromSurface += soilPhysical.Thickness[layer];
                if (depthFromSurface >= Depth2SoilN)
                    layer = nLayers;
            }

            if (fertiliserIsAllowed && CropIsActive && (daysSinceLastApplication >= FertMinimumDays) && (TopMineralN <= CriticalSoilN))
            {
                fertiliser.Apply(FertNAmount, FertType, FertApplicationDepth);
                lastApplicationDate = Clock.Today;
            }
        }
    }
}
```
    RectangularZone Row: Length=100; Width=1.3; Slope=0; AspectAngle=0; Altitude=50
      Report RowZoneReport: EventNames=[Clock].DoReport
      Report ReportBoth: EventNames=[Clock].DoReport
      Soil: Latitude=0; Longitude=0
        LayerStructure: Thickness=[200, 200, 200, 200, 200, 200, 300, 300, 400, 800]
        Chemical: Thickness=[100, 200, 300, 300, 300, 300]; PH=[6.6, 6.2, 5.7, 5.5, 5.5, 5.5]; PHUnits=Water
        Water: Thickness=[300, 300, 300, 300, 300, 300, 1200]; InitialValues=[0.42, 0.41, 0.5, 0.46, 0.45, 0.43, 0.43]; InitialPAWmm=702; RelativeTo=LL15; FilledFromTop=false
        WaterBalance SoilWater: SummerDate=1-Nov; SummerU=9; SummerCona=4.4; WinterDate=1-Apr; WinterU=9; WinterCona=4.4; DiffusConst=88; DiffusSlope=35.4; Salb=0.3; CN2Bare=68; CNRed=20; CNCov=0.8; DischargeWidth=0; CatchmentArea=0; PSIDul=-100
          Thickness  SWCON  KLAT
          300        0.55   0
          300        0.55   0
          300        0.55   0
          300        0.55   0
          300        0.1    0
          300        0.02   0
          400        0.02   0
          800        0      0
        Organic: FOMCNRatio=30; CarbonUnits=Total
          Thickness  Carbon  SoilCNRatio  FBiom  FInert  FOM
          100        1.82    11.5         0.025  0.3     1243.931
          200        1.47    11.5         0.025  0.4     833.832
          300        1.2     11.5         0.015  0.75    457.617
          300        1.03    11.5         0.01   0.9     251.145
          300        0.47    11.5         0.01   0.96    137.831
          300        0.47    11.5         0.01   0.96    75.644
        CERESSoilTemperature Temperature
        OutputLayers: Thickness=[300, 300, 300, 300, 300, 300]
        Solute NO3: Thickness=[100, 200, 300, 300, 300, 300]; InitialValues=[217, 15, 1.66667, 1.66667, 0, 0]; InitialValuesUnits=ppm; WaterTableConcentration=0; D0=0; DepthConstant=0; MaxDepthSoluteAccessible=0; RunoffEffectivenessAtMovingSolute=0; MaxEffectiveRunoff=0
        Solute NH4: Thickness=[100, 200, 300, 300, 300, 300]; InitialValues=[0, 0, 0, 0, 0, 0]; InitialValuesUnits=ppm; WaterTableConcentration=0; D0=0; DepthConstant=0; MaxDepthSoluteAccessible=0; RunoffEffectivenessAtMovingSolute=0; MaxEffectiveRunoff=0
        Solute Urea: Thickness=[100, 200, 300, 300, 300, 300]; InitialValues=[0, 0, 0, 0, 0, 0]; InitialValuesUnits=kg/ha; WaterTableConcentration=0; D0=0; DepthConstant=0; MaxDepthSoluteAccessible=0; RunoffEffectivenessAtMovingSolute=0; MaxEffectiveRunoff=0
        Physical
          Thickness  BD  AirDry  LL15  DUL   SAT   KS
          300        1   0.2     0.2   0.4   0.5   100
          300        1   0.2     0.2   0.4   0.5   100
          300        1   0.25    0.25  0.4   0.5   50
          300        1   0.2     0.2   0.46  0.5   40
          300        1   0.2     0.2   0.45  0.5   40
          300        1   0.2     0.2   0.43  0.53  40
          1200       1   0.2     0.2   0.43  0.53  40
          SoilCrop DEROPAPYSoil: LL=[0.2, 0.2, 0.2, 0.2, 0.2, 0.2, 0.2]; KL=[1, 1, 1, 1, 1, 1, 1]; XF=[1, 1, 1, 1, 1, 1, 1]
        Nutrient
      SurfaceOrganicMatter: InitialResidueName=wheat_stubble; InitialResidueType=wheat; InitialResidueMass=500; InitialStandingFraction=0; InitialCPR=0; InitialCNR=100
      Plant DEROPAPY
      Fertiliser
      Manager AgrgateZoneVariables
```csharp
using Models.Climate;
using System;
using Models.Core;
using Models.PMF;
using System.Collections.Generic;
using Models.Soils;
using APSIM.Shared.Utilities;
using Models.Zones;
using Models.PMF.Organs;

namespace Models
{
    [Serializable]
    public class Script : Model
    {
        
    }
}
```
      Irrigation
      BiomassRemovalEvents Pick (disabled): RemovalType=2
        BiomassRemovals:
          PlantName  OrganName  TypeString  LiveToRemove  DeadToRemove  LiveToResidue  DeadToResidue
          DEROPAPY   Root       Harvesting  0             0             0              0
          DEROPAPY   Leaf       Harvesting  0             0             0              0
          DEROPAPY   Trunk      Harvesting  0             0             0              0
          DEROPAPY   Fruit      Harvesting  0.8           0             0.1            0.5
        Plant PlantToRemoveFrom: PlantType=DEROPAPY
          Memo TitlePage: same as Replacements.DEROPAPY.TitlePage
          OrganArbitrator Arbitrator
            BiomassTypeArbitrator DMArbitration
              Folder PotentialPartitioningMethods
                ReallocationMethod
                AllocateFixationMethod
                RetranslocationMethod
                SendPotentialDMAllocationsMethod
              Folder AllocationMethods
                NutrientConstrainedAllocationMethod
                DryMatterAllocationsMethod
              RelativeAllocation ArbitrationMethod
            BiomassTypeArbitrator NArbitration
              Folder PotentialPartitioningMethods
                ReallocationMethod
              Folder ActualPartitioningMethods
                AllocateFixationMethod
                RetranslocationMethod
              Folder AllocationMethods
                NitrogenAllocationsMethod
              RelativeAllocation ArbitrationMethod
              AllocateUptakesMethod
            WaterUptakeMethod
            NitrogenUptakeMethod
          Phenology
            Memo Description
              As ThermalTime accumulates the crop progresses through the following phases:
            WeightedTemperatureFunction ThermalTime: same as Replacements.DEROPAPY.Phenology.ThermalTime
            GenericPhase Vegetative: same as Replacements.DEROPAPY.Phenology.Vegetative
            GotoPhase DefoliateOrDevelop: Start=FullCanopy; IsEmerged=true; PhaseNameToGoto=Vegetative
              Memo Param value set at establishment
                For a pasture crop the PhaseToGoTo is set to "Graize" so phenology will jump over all later phases to grazing which will remove biomass and wind phenology back to "Vegetative".  For other crops PhaseToGoTo is set to "Flowering" so phenology and growth carries on uninterupted
            GenericPhase Reproductive: same as Replacements.DEROPAPY.Phenology.Reproductive
            GenericPhase Senescant: Start=StartSenescence; End=Maturity; IsEmerged=true
              Memo Description
                During this phase the crop is completing grain filling
              VariableReference Progression: VariableName=[Phenology].ThermalTime
              LinearInterpolationFunction Target
                XYPairs: X=[0, 200]; Y=[200, 200]
                  Memo Param value set at establishment
                    SCRUM calculates this parameter value during run-time when the crop is established from parameter values set in the relevent SCRUMcrop and SCRUMmanagement objects
                VariableReference XValue: VariableName=[DEROPAPY].Phenology.PhotoPeriod
            GenericPhase Mature: Start=Maturity; End=Dormancy; IsEmerged=true
              Memo Description
                Grain filling is nearly complete
              Constant Target: FixedValue=0; Units=<sup>o</sup>Cd
                Memo Param value set at establishment
                  SCRUM calculates this parameter value during run-time when the crop is established from parameter values set in the relevent SCRUMcrop and SCRUMmanagement objects
              VariableReference Progression: VariableName=[Phenology].ThermalTime
            GenericPhase Dormant: Start=Dormancy; End=Waiting; IsEmerged=true
              Memo Description
                Grain filling is nearly complete
              VariableReference Progression: VariableName=[Phenology].ThermalTime
              LinearInterpolationFunction Target: same as Replacements.DEROPAPY.Phenology.Dormant.Target
            DAWSPhase Waiting: Start=Waiting; End=DoneWaiting; IsEmerged=true; DAWStoProgress=0
            GotoPhase Reset: Start=DoneWaiting; IsEmerged=true; PhaseNameToGoto=Vegetative
            GrazeAndRewind Graze: Start=ReadyToGraze; IsEmerged=true; PhaseNameToGoto=Vegetative
            EndPhase ReadyForHarvesting: Start=Ripe; End=Unused; IsEmerged=true
              VariableReference ThermalTime: VariableName=[Phenology].ThermalTime
            Age
            AddFunction AgeDecimal: same as Replacements.DEROPAPY.Phenology.AgeDecimal
            AccumulateFunction Chill: StartStageName=Maturity; EndStageName=Waiting; ResetStageName=DoneWaiting; FractionRemovedOnCut=0; FractionRemovedOnHarvest=0; FractionRemovedOnGraze=0; FractionRemovedOnPrune=0
              LinearInterpolationFunction DailyChill
                XYPairs: X=[-5, 0, 8, 12]; Y=[0, 0, 0, 0]
                VariableReference XValue: VariableName=[DEROPAPY].Phenology.ThermalTime
            PhotoperiodFunction Photoperiod: Twilight=-6; DayLength=0
          Constant SeedMortalityRate: FixedValue=0
          Constant MaxPrunedHeight: FixedValue=0
          AddFunction Height (disabled)
            MultiplyFunction CanopyBaseHeight
              Constant Maximum: FixedValue=0
              VariableReference Age pattern: VariableName=[DEROPAPY].RelativeAnnualDimension
            MultiplyFunction PrunedCanopyDepth
              SubtractFunction Maximum
                VariableReference MaxPrunedHeight: VariableName=[DEROPAPY].MaxPrunedHeight
                VariableReference MaxBaseHeight: VariableName=[DEROPAPY].Height.CanopyBaseHeight.Maximum
              VariableReference Age pattern: VariableName=[DEROPAPY].RelativeAnnualDimension
            MultiplyFunction SeasonalGrowth
              VariableReference Seasonal pattern: VariableName=[DEROPAPY].RelativeSeasonalDimension
              Constant Maximum: FixedValue=100; Units=mm
              VariableReference Age pattern: VariableName=[DEROPAPY].RelativeAnnualDimension
          AddFunction Width (disabled)
            MultiplyFunction PrunedWidth
              VariableReference Age pattern: VariableName=[DEROPAPY].RelativeAnnualDimension
              Constant Maximum: FixedValue=500; Units=mm
            MultiplyFunction SeasonalGrowth
              VariableReference Seasonal pattern: VariableName=[DEROPAPY].RelativeSeasonalDimension
              Constant Maximum: FixedValue=500; Units=mm
          LinearInterpolationFunction RelativeAnnualDimension (disabled)
            XYPairs: X=[0, 6]; Y=[0.4, 1]
            VariableReference XValue: VariableName=[Phenology].Age.YearDecimal
          StageBasedInterpolation RelativeSeasonalDimension (disabled): Values=[0, 0, 0, 0, 0.6, 1, 1, 1]; Proportional=true
          Constant MortalityRate: FixedValue=0
          Root: GrowthRespiration=0; MaintenanceRespiration=0
            RootShapeCylinder RootShape
            DivideFunction RootFrontVelocity
              VariableReference MaxRootDepth: VariableName=[Root].MaximumRootDepth
              MultiplyFunction RootGrowthDuration
                Constant YearsToMaxDepth: FixedValue=0; Units=years
                  Memo Param value set at establishment
                    STRUM calculates this parameter value during run-time when the crop is established from parameter values set in the relevent STRUMtree object
                Constant DaysInAYear: FixedValue=365
            Constant MaxDailyNUptake: FixedValue=10; Units=g/m2
            Constant DMConversionEfficiency: FixedValue=1; Units=g/m2
            Constant RemobilisationCost: FixedValue=0
            Constant MaximumRootDepth: FixedValue=3000; Units=mm
            Constant NitrogenDemandSwitch: FixedValue=1; Units=0-1
            KLModiferVsDepthFunction klModifier
              VariableReference LayerDepth: VariableName=[Physical].DepthMidPoints
              VariableReference MaximumRootDepth: VariableName=[Root].MaximumRootDepth
            MultiplyFunction SenescenceRate
              ExponentialFunction: A=0; B=1; C=1
                DivideFunction
                  SubtractFunction
                    SoilTemperatureDepthFunction: Depth=100
                    Constant: FixedValue=20
                  Constant: FixedValue=10
              Constant Coefficient: FixedValue=0.015
            Constant SpecificRootLength: FixedValue=105; Units=m/g
            LinearInterpolationFunction KNO3
              XYPairs: X=[0, 0.003]; Y=[0.02, 0.02]
              VariableReference XValue: VariableName=[Root].LengthDensity
            LinearInterpolationFunction KNH4
              XYPairs: X=[0, 0.003]; Y=[0, 0]
              VariableReference XValue: VariableName=[Root].LengthDensity
            BiomassRemoval BiomassRemovalDefaults: HarvestFractionLiveToRemove=0; HarvestFractionDeadToRemove=0; HarvestFractionLiveToResidue=0; HarvestFractionDeadToResidue=0
            LinearInterpolationFunction NUptakeSWFactor
              XYPairs: X=[0, 1]; Y=[0, 1]
              VariableReference XValue: VariableName=[Root].RWC
            Constant CarbonConcentration: FixedValue=0.4
            Constant MaintenanceRespirationFunction: FixedValue=0
            NutrientDemandFunctions DMDemands
              MultiplyFunction Structural
                PartitionFractionDemandFunction DMDemandFunction
                  PhaseLookup PartitionFraction
                    PhaseLookupValue AcitveGrowth: Start=StartGrowth; End=Dormancy
                      Constant: FixedValue=0.2
                Constant StructuralFraction: FixedValue=1
              Constant Metabolic: FixedValue=0
              Constant Storage: FixedValue=0
              Constant QStructuralPriority: FixedValue=1
              Constant QMetabolicPriority: FixedValue=1
              Constant QStoragePriority: FixedValue=1
            NutrientDemandFunctions NDemands
              MultiplyFunction Structural
                VariableReference MinNconc: VariableName=[Root].minimumNconc
                VariableReference PotentialDMAllocation: VariableName=[Root].potentialDMAllocation.Structural
              Constant Metabolic: FixedValue=0
              Constant Storage: FixedValue=0
              Constant QStructuralPriority: FixedValue=1
              Constant QMetabolicPriority: FixedValue=1
              Constant QStoragePriority: FixedValue=1
            NutrientPoolFunctions InitialWt
              Constant Structural: FixedValue=0; Units=g/plant
                Memo Param value set at establishment
                  STRUM calculates this parameter value during run-time when the crop is established from parameter values set in the relevent STRUMtree object
              Constant Metabolic: FixedValue=0
              Constant Storage: FixedValue=0
            Constant RootDepthStressFactor: FixedValue=1
            Constant MaximumNConc: FixedValue=0
              Memo Param value set at establishment
                STRUM calculates this parameter value during run-time when the crop is established from parameter values set in the relevent STRUMtree object
            VariableReference CriticalNConc: VariableName=[Root].MaximumNConc
            VariableReference MinimumNConc: VariableName=[Root].MaximumNConc
      BiomassRemovalEvents Prune (disabled): RemovalType=3
        BiomassRemovals:
          PlantName  OrganName  TypeString  LiveToRemove  DeadToRemove  LiveToResidue  DeadToResidue
          DEROPAPY   Root       Pruning     0             0             0              0
          DEROPAPY   Leaf       Pruning     0             0             1              1
          DEROPAPY   Trunk      Pruning     0             0             0.3            0.9
          DEROPAPY   Fruit      Pruning     0             0             1              1
        Plant PlantToRemoveFrom: same as PatternsTest.Row.Pick.PlantToRemoveFrom
      DEROPAPY ThisDero: CoeffientFile=Test.csv; CropName=Maize
    RectangularZone Alley: Length=100; Width=2.2; Slope=0; AspectAngle=0; Altitude=50
      Report AlleyZoneReport: EventNames=[Clock].DoReport
      Report ReportBoth: EventNames=[Clock].DoReport
        VariableNames=([Row].Irrigation.IrrigationApplied*[Row].Width + [Alley].Irrigation.IrrigationApplied*[Alley].Width)/([Row].Width + [Alley].Width) as WeightedAverage_IrrigationApplied
      Soil: Latitude=0; Longitude=0
        LayerStructure: Thickness=[200, 200, 200, 200, 200, 200, 300, 300, 400, 800]
        Chemical: Thickness=[100, 200, 300, 300, 300, 300]; PH=[6.6, 6.2, 5.7, 5.5, 5.5, 5.5]; PHUnits=Water
        Water: Thickness=[300, 300, 300, 300, 300, 300, 1200]; InitialValues=[0.4, 0.4, 0.4, 0.46, 0.45, 0.43, 0.43]; InitialPAWmm=663; RelativeTo=LL15; FilledFromTop=false
        WaterBalance SoilWater: same as PatternsTest.Row.Soil.SoilWater
        Organic: FOMCNRatio=30; CarbonUnits=Total
          Thickness  Carbon  SoilCNRatio  FBiom  FInert  FOM
          100        1.82    11.5         0.025  0.3     1243.93
          200        1.47    11.5         0.025  0.4     833.832
          300        1.2     11.5         0.015  0.75    457.617
          300        1.03    11.5         0.01   0.9     251.145
          300        0.47    11.5         0.01   0.96    137.831
          300        0.47    11.5         0.01   0.96    75.6435
        CERESSoilTemperature Temperature
        OutputLayers: Thickness=[300, 300, 300, 300, 300, 300]
        Solute NO3: same as PatternsTest.Row.Soil.NO3
        Solute NH4: same as PatternsTest.Row.Soil.NH4
        Solute Urea: same as PatternsTest.Row.Soil.Urea
        Physical: same as PatternsTest.Row.Soil.Physical
        Nutrient
      SurfaceOrganicMatter: InitialResidueName=wheat_stubble; InitialResidueType=wheat; InitialResidueMass=500; InitialStandingFraction=0; InitialCPR=0; InitialCNR=100
      Fertiliser
      Manager AgrgateZoneVariables
        script: same as in PatternsTest.Row.AgrgateZoneVariables
      Irrigation
      Plant DEROPAPY
      BiomassRemovalEvents Mow (disabled): RemovalType=0
        BiomassRemovals:
          PlantName  OrganName  TypeString  LiveToRemove  DeadToRemove  LiveToResidue  DeadToResidue
          DEROPAPY   Root       Cutting     0             0             0              0
          DEROPAPY   Leaf       Cutting     0             0             0              0
          DEROPAPY   Trunk      Cutting     0             0             0              0
          DEROPAPY   Fruit      Cutting     0             0             0              0
        Plant PlantToRemoveFrom: same as PatternsTest.Row.Pick.PlantToRemoveFrom
      DEROPAPY ThisDero: CoeffientFile=Test.csv; CropName=RyeGrass
  Experiment TypeTest
    Factors
      Permutation
        Factor Crop: Specification=[ThisDero].CropName = Maize, Apple, RyeGrass
        Factor Location
          Specification=[Weather].FileName  = VCS_Brightwater.met, VCS_Cromwell.met,VCS_Jervoistown.met
    Simulation DEROtest
      Weather: FileName=%root%\Tests\WeatherFiles\lincoln.met
      Clock: Start=1998-07-01; End=2001-06-30
      Summary
      SoilArbitrator Soil Arbitrator
      RectangularZone Row: Length=100; Width=1.3; Slope=0; AspectAngle=0; Altitude=50
        Soil: same as PatternsTest.Row.Soil
        SurfaceOrganicMatter: InitialResidueName=wheat_stubble; InitialResidueType=wheat; InitialResidueMass=500; InitialStandingFraction=0; InitialCPR=0; InitialCNR=100
        Plant DEROPAPY
        Fertiliser
        Manager AgrgateZoneVariables
          script: same as in PatternsTest.Row.AgrgateZoneVariables
        Irrigation
        DEROPAPY ThisDero: CoeffientFile=Test.csv; CropName=Maize
        Report: EventNames=[Clock].DoReport
          VariableNames:
            [Clock].Today
            [Deropapy].Phenology.Stage
            [Deropapy].Phenology.CurrentStageName
            [Deropapy].Phenology.CurrentPhaseName
            [Deropapy].Phenology.AccumulatedEmergedTT
            [DeroPapy].Phenology.Emerged
            [Deropapy].Height
            [Deropapy].Width
            [Deropapy].CoverGreen
            [Deropapy].Leaf.Canopy.LAI
            [Deropapy].Leaf.Canopy.LAITotal
            [Deropapy].Leaf.Canopy.CoverGreen
            [Deropapy].Leaf.Canopy.CoverTotal
            [Deropapy].Leaf.Canopy.LAIDead
            [Deropapy].Leaf.Canopy.CoverDead
            [Deropapy].Leaf.Wt
            [Deropapy].Stem.Wt
            [Deropapy].Root.Wt
            [Deropapy].Product.Wt
            [Deropapy].Total.Wt
            [Deropapy].Leaf.Photosynthesis
        BiomassRemovalEvents Cut: RemovalType=0
          BiomassRemovals:
            PlantName  OrganName  TypeString  LiveToRemove  DeadToRemove  LiveToResidue  DeadToResidue
            DEROPAPY   Leaf       Cutting     0.9           0             0.1            1
            DEROPAPY   Root       Cutting     0             0             0              0
            DEROPAPY   Stem       Cutting     0.5           0             0.5            1
            DEROPAPY   Product    Cutting     0             0             0              0
          Plant PlantToRemoveFrom: PlantType=DEROPAPY
            Memo TitlePage: same as Replacements.DEROPAPY.TitlePage
            BiomassArbitrator Arbitrator
              Memo
                The partitioning of biomass to fodder beet organs follows a "Relative Allocation" routine (see Arbitrator module documentation) guided by coefficients derived from the October sowing date data of the test dataset
              PlantPartitionFractions
                Constant ProductFraction: FixedValue=1
                Constant LeafFraction: FixedValue=0
                Constant StemFraction: FixedValue=0
                Constant RootFraction: FixedValue=0
              PlantNutrientsDelta Carbon
              PlantNutrientsDelta Nitrogen
            RootUptakesArbitrator
            Phenology: same as Replacements.DEROPAPY.Phenology
            Organ Leaf: Cconc=0.4; IsAboveGround=true
              Constant InitialWt: FixedValue=1; Units=g/m2
              Respiration: same as Replacements.DEROPAPY.Leaf.Respiration
              PhaseLookup SenescenceRateFunction
                PhaseLookupValue LeafFall: Start=StartSenescence; End=Maturity
                  Constant: FixedValue=0
              Constant DetachmentRateFunction: FixedValue=0; Units=/d
              OrganNutrientDelta Carbon: MaxCDelta=0
                OrganNutrientSupplies Supplies: Fixation=0; Uptake=0
                  NutrientPoolsState ReAllocation
                  NutrientPoolsState ReTranslocation
                NutrientDemandFunctions DemandFunctions
                  DeficitDemandFunction Structural
                  DeficitDemandFunction Metabolic
                  DeficitDemandFunction Storage
                  Constant QStructuralPriority: FixedValue=100
                  Constant QMetabolicPriority: FixedValue=100
                  Constant QStoragePriority: FixedValue=0
                NutrientSupplyFunctions SupplyFunctions
                  MultiplyFunction Fixation
                    VariableReference Fixation: VariableName=[Leaf].Photosynthesis
                    VariableReference Cconc: VariableName=[Leaf].Cconc
                  Constant Uptake: FixedValue=0
                  NutrientPoolFunctions ReAllocation: same as Replacements.DEROPAPY.Leaf.Nitrogen.SupplyFunctions.ReAllocation
                  NutrientPoolFunctions ReTranslocation: same as Replacements.DEROPAPY.Leaf.Nitrogen.SupplyFunctions.ReTranslocation
                NutrientProportionFunctions PoolFractions
                  CalculateCarbonFractionFromNConc Structural
                  CalculateCarbonFractionFromNConc Metabolic
                  CalculateCarbonFractionFromNConc Storage
              OrganNutrientDelta Nitrogen: same as Replacements.DEROPAPY.Leaf.Nitrogen
              EnergyBalance Canopy: Albedo=0.2; Gsmax350=0.0103149; R50=59.6895; fRadnAllZones=0; KDead=0; LAIDead=0
                MinimumFunction FRGRer: same as Replacements.DEROPAPY.Leaf.Canopy.FRGRer
                StomatalConductanceCO2Modifier
                  VariableReference PhotosynthesisCO2Modifier: VariableName=[Leaf].Carbon.Photosynthesis.FCO2
                VariableReference Tallness: VariableName=[Deropapy].Height
                SubtractFunction Deepness
                  VariableReference Tallness: VariableName=[Deropapy].Height
                  VariableReference CanopyBase: VariableName=[Deropapy].Height.CanopyBaseHeight
                AccumulateFunction GreenAreaExpansion: StartStageName=StartGrowth; EndStageName=FullCanopy; ResetStageName=ReStart; FractionRemovedOnCut=0; FractionRemovedOnHarvest=0; FractionRemovedOnGraze=0; FractionRemovedOnPrune=0
                  MultiplyFunction Expansion
                    DeltaFunction Delta: StartStageName=StartGrowth
                      MultiplyFunction Integral
                        Constant MaxGAI: FixedValue=5
                        LinearInterpolationFunction GrowthPattern
                          XYPairs: X=[3, 3.2, 4]; Y=[0, 0.1, 1]
                          VariableReference XValue: VariableName=[Deropapy].Phenology.Stage
                    LinearInterpolationFunction WaterStressFactor
                      XYPairs: X=[0.5, 1]; Y=[0, 1]
                      VariableReference XValue: VariableName=[Leaf].Canopy.Fw
                PhaseLookupValue DeadAreaIndex: Start=StartSenescence; End=ReStart
                  MultiplyFunction Integral
                    HoldFunction MaxGAI: WhenToHold=StartSenescence
                      VariableReference ValueToHold: VariableName=[Leaf].Canopy.GreenAreaExpansion
                    SubtractFunction ProportionLost
                      Constant One: FixedValue=1
                      DivideFunction ProportionRemaining
                        SubtractFunction TTSenesce
                          VariableReference AccumulatedThermalTime: VariableName=[Phenology].AccumulatedEmergedTT
                          AddFunction ThermalTimeAtStartSenescence
                            VariableReference Vegetative: VariableName=[Phenology].Vegetative.Target
                            VariableReference Reproductive: VariableName=[Phenology].Reproductive.Target
                        VariableReference SenescencePhaseDuration: VariableName=[Phenology].Senescent.Target
                AddFunction GreenAreaIndex: same as Replacements.DEROPAPY.Leaf.Canopy.GreenAreaIndex
                MultiplyFunction GreenExtinctionCoefficient
                  Constant PotentialExtinctionCoeff: FixedValue=0.95
                    Memo
                      The extinction coefficient value of 0.74 ([Chakwizira_etal_2016a]) was used.
                  LinearInterpolationFunction WaterStress
                    XYPairs: X=[0, 0.641792, 1]; Y=[0.5, 1, 1]
                    VariableReference XValue: VariableName=[DEROPAPY].Leaf.Canopy.Fw
                Constant Wideness: FixedValue=0
                Constant DeadExtinctionCoefficient: FixedValue=0.578136
              RUEModel Photosynthesis: same as Replacements.DEROPAPY.Leaf.Photosynthesis
              DivideFunction TotalDMDemand
                VariableReference DeltaLAI: VariableName=[Leaf].DeltaLAI
                VariableReference SLA: VariableName=[Leaf].SpecificArea
                Memo
                  Growth in leaf area is used to calculate the leaf dry matter demand. The same was assumed in the original crop models in APSIM. Further model development can be taken once new experimental data for metabolic, structural and storage forms are provided.
                Memo Memo1
                  DeltaLAI describes the LAI variation over the cycle and is calculated using the Area of Largest Leaf, relative leaf area, plant number, branch number and leaf appearance rate (thermal time/phyllochron).
              PhaseLookup DeltaLAI: same as Replacements.DEROPAPY.Leaf.DeltaLAI
              Constant SpecificArea: FixedValue=0.015
              BiomassRemoval BiomassRemovalDefaults: HarvestFractionLiveToRemove=0; HarvestFractionDeadToRemove=0; HarvestFractionLiveToResidue=1; HarvestFractionDeadToResidue=1
              LinearInterpolationFunction FrostFraction: same as Replacements.DEROPAPY.Leaf.FrostFraction
              MovingAverageFunction AccumulatedWaterStressEffect: NumberOfDays=30; StageToStartMovingAverage=StartGrowth
                VariableReference FW: VariableName=[Leaf].Canopy.Fw
            Organ Root: Cconc=0.4; IsAboveGround=false
              Constant InitialWt: FixedValue=0.5; Units=g/m2
              Respiration: same as Replacements.DEROPAPY.Leaf.Respiration
              VariableReference SenescenceRateFunction: VariableName=[Leaf].SenescenceRate
              Constant DetachmentRateFunction: FixedValue=0; Units=/d
              OrganNutrientDelta Carbon: MaxCDelta=0
                OrganNutrientSupplies Supplies: Fixation=0; Uptake=0
                  NutrientPoolsState ReAllocation
                  NutrientPoolsState ReTranslocation
                NutrientDemandFunctions DemandFunctions
                  DeficitDemandFunction Structural
                  DeficitDemandFunction Metabolic
                  DeficitDemandFunction Storage
                  Constant QStructuralPriority: FixedValue=0
                  Constant QMetabolicPriority: FixedValue=0
                  Constant QStoragePriority: FixedValue=0
                NutrientSupplyFunctions SupplyFunctions: same as Replacements.DEROPAPY.Root.Nitrogen.SupplyFunctions
                NutrientProportionFunctions PoolFractions: same as TypeTest.DEROtest.Row.Cut.PlantToRemoveFrom.Leaf.Carbon.PoolFractions
              OrganNutrientDelta Nitrogen: same as Replacements.DEROPAPY.Root.Nitrogen
              RootNetwork Network: same as Replacements.DEROPAPY.Root.Network
              AllometricDemandFunction TotalDMDemand: Const=1; Power=1
                VariableReference XValue: VariableName=[Leaf].Live.Wt
                VariableReference YValue: VariableName=[Root].Live.Wt
              BiomassRemoval BiomassRemovalDefaults: HarvestFractionLiveToRemove=0; HarvestFractionDeadToRemove=0; HarvestFractionLiveToResidue=1; HarvestFractionDeadToResidue=1
            Organ Stem: Cconc=0.4; IsAboveGround=true
              Constant InitialWt: FixedValue=1; Units=g/m2
              Respiration: same as Replacements.DEROPAPY.Leaf.Respiration
              VariableReference SenescenceRateFunction: VariableName=[Leaf].senescenceRate
              Constant DetachmentRateFunction: FixedValue=0; Units=/d
              OrganNutrientDelta Carbon: MaxCDelta=0
                OrganNutrientSupplies Supplies: Fixation=0; Uptake=0
                  NutrientPoolsState ReAllocation
                  NutrientPoolsState ReTranslocation
                NutrientDemandFunctions DemandFunctions
                  DeficitDemandFunction Structural
                  DeficitDemandFunction Metabolic
                  DeficitDemandFunction Storage
                  Constant QStructuralPriority: FixedValue=0
                  Constant QMetabolicPriority: FixedValue=0
                  Constant QStoragePriority: FixedValue=2.93089
                NutrientSupplyFunctions SupplyFunctions
                  Constant Fixation: FixedValue=0
                  Constant Uptake: FixedValue=0
                  NutrientPoolFunctions ReAllocation: same as Replacements.DEROPAPY.Leaf.Nitrogen.SupplyFunctions.ReAllocation
                  NutrientPoolFunctions ReTranslocation
                    Constant Structural: FixedValue=0
                    MobilisationSupplyFunction Metabolic
                      Constant Multiplier: FixedValue=0
                    MobilisationSupplyFunction Storage
                      Constant Multiplier: FixedValue=0.222186
                NutrientProportionFunctions PoolFractions: same as TypeTest.DEROtest.Row.Cut.PlantToRemoveFrom.Leaf.Carbon.PoolFractions
              OrganNutrientDelta Nitrogen: same as Replacements.DEROPAPY.Stem.Nitrogen
              AllometricDemandFunction TotalDMDemand: Const=0.1; Power=1.5
                VariableReference XValue: VariableName=[Leaf].Live.Wt
                VariableReference YValue: VariableName=[Stem].Live.Wt
              BiomassRemoval BiomassRemovalDefaults: HarvestFractionLiveToRemove=0; HarvestFractionDeadToRemove=0; HarvestFractionLiveToResidue=1; HarvestFractionDeadToResidue=1
            Organ Product: Cconc=0.4; IsAboveGround=true
              Constant InitialWt: FixedValue=1; Units=g/m2
              Respiration: same as Replacements.DEROPAPY.Leaf.Respiration
              VariableReference SenescenceRateFunction: VariableName=[Leaf].senescenceRate
              Constant DetachmentRateFunction: FixedValue=0; Units=/d
              OrganNutrientDelta Carbon: same as TypeTest.DEROtest.Row.Cut.PlantToRemoveFrom.Stem.Carbon
              OrganNutrientDelta Nitrogen: same as Replacements.DEROPAPY.Product.Nitrogen
              AllometricDemandFunction TotalDMDemand: Const=0.1; Power=1.5
                VariableReference XValue: VariableName=[Leaf].Live.Wt
                VariableReference YValue: VariableName=[Product].Live.Wt
              BiomassRemoval BiomassRemovalDefaults: HarvestFractionLiveToRemove=0; HarvestFractionDeadToRemove=0; HarvestFractionLiveToResidue=1; HarvestFractionDeadToResidue=1
            Constant SeedMortalityRate: FixedValue=0
            Constant MaxPrunedHeight: FixedValue=0
            AddFunction Height: same as Replacements.DEROPAPY.Height
            AddFunction Width: same as Replacements.DEROPAPY.Width
            LinearInterpolationFunction RelativeAnnualDimension
              XYPairs: X=[0, 6]; Y=[0.3, 1]
              VariableReference XValue: VariableName=[Phenology].Age.YearDecimal
            LinearInterpolationFunction RelativeSeasonalDimension
              XYPairs: X=[3, 4, 6, 7]; Y=[0, 1, 1, 1]
              VariableReference XValue: VariableName=[Phenology].Stage
            Constant MortalityRate: FixedValue=0
  Experiment TypeTest1
    Factors
      Permutation
        Factor Crop: Specification=[ThisDero].CropName = Maize, Apple, RyeGrass
        Factor Location: Specification=[Weather].FileName  = 10731_238_39.met
    Simulation DEROtest1
      Weather: FileName=%root%\Tests\WeatherFiles\lincoln.met
      Clock: Start=1998-07-01; End=2001-06-30
      Summary
      SoilArbitrator Soil Arbitrator
      RectangularZone Row: Length=100; Width=1.3; Slope=0; AspectAngle=0; Altitude=50
        Soil: same as PatternsTest.Row.Soil
        SurfaceOrganicMatter: InitialResidueName=wheat_stubble; InitialResidueType=wheat; InitialResidueMass=500; InitialStandingFraction=0; InitialCPR=0; InitialCNR=100
        Plant DEROPAPY
        Fertiliser
        Manager AgrgateZoneVariables
          script: same as in PatternsTest.Row.AgrgateZoneVariables
        Irrigation
        BiomassRemovalEvents Pick (disabled): same as PatternsTest.Row.Pick
        BiomassRemovalEvents Prune (disabled): same as PatternsTest.Row.Prune
        DEROPAPY ThisDero: CoeffientFile=Test.csv; CropName=Maize
        Report: EventNames=[Clock].DoReport
          VariableNames:
            [Clock].Today
            [Deropapy].Phenology.Stage
            [Deropapy].Phenology.CurrentStageName
            [Deropapy].Phenology.CurrentPhaseName
            [Deropapy].Phenology.AccumulatedEmergedTT
            [DeroPapy].Phenology.Emerged
            [Deropapy].Height
            [Deropapy].Width
            [Deropapy].CoverGreen
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