Simulations: Version=6
  Replacements
    Nutrient
      Memo TitlePage
        # The APSIM Soil Nutrient Model

        The APSIM soil nutrient model has been developed to simulate soil organic matter pools and the flows and losses of soil nutrients.  This model captures the functionality previously provided in the APSIM SoilN model ([probert_apsims_1998]).

        The model consists of:

        * a series of pools to capture soil organic matter types
        * pools for mineral N including nitrate, ammonium and urea.
      NutrientPool Inert
        Memo
          The inert pool captures organic matter that either does not decompose, or decomposes at a rate slow enough to be of little importance to simulations.  Such as approach was also captured in the APSIM SoilN model ([probert_apsims_1998]).
        ExpressionFunction InitialCarbon
          Expression=[SoilOrganicMatter].FInert*[SoilOrganicMatter].OC * 100 * [Soil].BD * [Soil].Thickness
        ExpressionFunction InitialNitrogen: Expression=[Inert].C / [Soil].SoilOrganicMatter.SoilCN
      NutrientPool SurfaceResidue
        Constant InitialCarbon: FixedValue=0
        Constant InitialNitrogen: FixedValue=0
        CarbonFlow Decomposition: destinationNames=[Biomass, Humic]; destinationFraction=[0.9, 0.1]
          Constant Rate: FixedValue=1
          Constant CO2Efficiency: FixedValue=0.4
      Solute Urea
        NFlow Hydrolysis: sourceName=Urea; destinationName=NH4
          Constant NLoss: FixedValue=0
          MultiplyFunction Rate
            BoundFunction PotentialRate
              Constant Upper: FixedValue=1
              Constant Lower: FixedValue=0.25
              ExpressionFunction Rate
                Expression=-1.12 + 1.31 * [Soil].OC + 0.203 * [Soil].PH - 0.155 * [Soil].OC * [Soil].PH
            MinimumFunction PNI
              BoundFunction WF
                Constant Upper: FixedValue=1
                Constant Lower: FixedValue=0
                ExpressionFunction Wfactor: Expression=[WaterFactorForMineralisation]+0.2
              BoundFunction TF
                Constant Upper: FixedValue=1
                Constant Lower: FixedValue=0
                ExpressionFunction Tfactor: Expression=([Soil].Temperature/40)+0.2
      Solute NO3
        NFlow Denitrification: sourceName=NO3
          Memo
            References:

            Rolston DE, Rao PSC, Davidson JM, Jessup RE (1984). "Simulation of denitrification losses of Nitrate fertiliser applied to uncropped, cropped, and manure-amended field plots". Soil Science Vol 137, No 4, pp 270-278.

            Reference for Carbon availability factor: Reddy KR, Khaleel R, Overcash MR (). "Carbon transformations in land areas receiving organic wastes in relation to nonpoint source pollution: A conceptual model".  J.Environ. Qual. 9:434-442.
          Constant NLoss: FixedValue=1
          MultiplyFunction Rate
            Constant: FixedValue=0.0006
            ExpressionFunction ActiveC: Expression=0.0031 * [TotalCppm] + 24.5
              ExpressionFunction TotalCppm
                Expression=([Humic].C+[Inert].C+[FOMCarbohydrate].C+[FOMCellulose].C+[FOMLignin].C)/[ppm2kgha]
            BoundFunction TF
              Constant Upper: FixedValue=1
              Constant Lower: FixedValue=0
              ExpressionFunction Tfactor: Expression=0.1 * Exp(0.046 * [Soil].Temperature)
            LinearInterpolationFunction WF: XProperty=[SoilWaterScale]
              SoilWaterScale
              XYPairs: X=[0, 1, 2]; Y=[0, 0, 1]
      NutrientPool Biomass
        ExpressionFunction InitialCarbon
          Expression=(([SoilOrganicMatter].OC * 100 * [Soil].BD * [Soil].Thickness -[Inert].C) * [SoilOrganicMatter].FBiom) / (1 + [SoilOrganicMatter].FBiom)
        ExpressionFunction InitialNitrogen: Expression=[Biomass].C /  [CNRatio]
        Constant CNRatio: FixedValue=8
        CarbonFlow Decomposition: destinationNames=[Biomass, Humic]; destinationFraction=[0.6, 0.4]
          MultiplyFunction Rate
            Constant PotentialRate: FixedValue=0.0081
            VariableReference TF: VariableName=[TemperatureFactorForMineralisation]
            VariableReference WF: VariableName=[WaterFactorForMineralisation]
          Constant CO2Efficiency: FixedValue=0.4
      NutrientPool Humic
        ExpressionFunction InitialCarbon
          Expression=(1-[SoilOrganicMatter].FInert)*[SoilOrganicMatter].OC * 100 * [Soil].BD * [Soil].Thickness - [Biomass].C
        ExpressionFunction InitialNitrogen: Expression=[Humic].C / [Soil].SoilOrganicMatter.SoilCN
        CarbonFlow Decomposition: destinationNames=[Biomass]; destinationFraction=[1]
          MultiplyFunction Rate
            Constant PotentialRate: FixedValue=0.00015
            VariableReference TF: VariableName=[TemperatureFactorForMineralisation]
            VariableReference WF: VariableName=[WaterFactorForMineralisation]
          Constant CO2Efficiency: FixedValue=0.4
      NutrientPool FOMLignin
        Constant InitialCarbon: FixedValue=0
        Constant InitialNitrogen: FixedValue=0
        CarbonFlow Decomposition: destinationNames=[Biomass, Humic]; destinationFraction=[0.9, 0.1]
          MultiplyFunction Rate
            Constant PotentialRate: FixedValue=0.0095
            VariableReference TF: VariableName=[TemperatureFactorForMineralisation]
            VariableReference WF: VariableName=[WaterFactorForMineralisation]
            VariableReference CNRF: VariableName=[CNRatioFactorForMineralisation]
          Constant CO2Efficiency: FixedValue=0.4
      NutrientPool FOMCellulose
        Constant InitialCarbon: FixedValue=0
        Constant InitialNitrogen: FixedValue=0
        CarbonFlow Decomposition: destinationNames=[Biomass, Humic]; destinationFraction=[0.9, 0.1]
          MultiplyFunction Rate
            Constant PotentialRate: FixedValue=0.05
            VariableReference TF: VariableName=[TemperatureFactorForMineralisation]
            VariableReference WF: VariableName=[WaterFactorForMineralisation]
            VariableReference CNRF: VariableName=[CNRatioFactorForMineralisation]
          Constant CO2Efficiency: FixedValue=0.4
      NutrientPool FOMCarbohydrate
        Constant InitialCarbon: FixedValue=0
        Constant InitialNitrogen: FixedValue=0
        CarbonFlow Decomposition: destinationNames=[Biomass, Humic]; destinationFraction=[0.9, 0.1]
          MultiplyFunction Rate
            Constant PotentialRate: FixedValue=0.2
            VariableReference TF: VariableName=[TemperatureFactorForMineralisation]
            VariableReference WF: VariableName=[WaterFactorForMineralisation]
            VariableReference CNRF: VariableName=[CNRatioFactorForMineralisation]
          Constant CO2Efficiency: FixedValue=0.4
      Solute NH4
        NFlow Nitrification: sourceName=NH4; destinationName=NO3
          Constant NLoss: FixedValue=0
          MultiplyFunction Rate
            ExpressionFunction MichaelisMenton: Expression=40/([Soil].Nutrient.NH4.ppm+90)
            MinimumFunction PNI
              LinearInterpolationFunction WF: XProperty=[SoilWaterScale]
                SoilWaterScale
                XYPairs: X=[0, 0.25, 1, 2]; Y=[0, 1, 1, 0]
              VariableReference TF: VariableName=[TemperatureFactorForMineralisation]
              LinearInterpolationFunction pHF: XProperty=[Soil].PH
                XYPairs: X=[4.5, 6, 8, 9]; Y=[0, 1, 1, 0]
      NutrientPool Biochar
        Constant InitialCarbon: FixedValue=0
        Constant InitialNitrogen: FixedValue=0
      MinimumFunction TemperatureFactorForMineralisation
        ExpressionFunction TF: Expression=([AbsT]^2)/([Topt]^2)
          Constant Topt: FixedValue=32
          MaximumFunction AbsT
            Constant Zero: FixedValue=0
            VariableReference: VariableName=[Soil].Temperature
        Constant One: FixedValue=1
      MinimumFunction WaterFactorForMineralisation
        Constant One: FixedValue=1
        LinearInterpolationFunction WF: XProperty=[SoilWaterScale]
          SoilWaterScale
          XYPairs: X=[0, 0.5, 1, 2]; Y=[0, 1, 1, 0.5]
      MinimumFunction CNRatioFactorForMineralisation
        Constant One: FixedValue=1
        ExpressionFunction CNRF: Expression=Exp(-0.693*([Nutrient].FOMCNR-25)/25)
      ExpressionFunction ppm2kgha: Expression=([Soil].BD*[Soil].Thickness)/100
      ExpressionFunction FOMCx: Expression=[FOMLignin].C+[FOMCellulose].C+[FOMCarbohydrate].C
      ExpressionFunction FOMNx: Expression=[FOMLignin].N+[FOMCellulose].N+[FOMCarbohydrate].N
  DataStore
    ExcelInput Observed: FileName=observed.xlsx; SheetNames=[ObsCrop, ObsSoil]
    PredictedObserved: PredictedTableName=HarvestReport; ObservedTableName=ObsCrop; FieldNameUsedForMatch=Clock.Today.Year
    PredictedObserved PredictedObservedSoil: PredictedTableName=Report; ObservedTableName=ObsSoil; FieldNameUsedForMatch=Clock.Today
      Tests: POName=PredictedObservedSoil
        AcceptedStats:
          Name        n    Slope     Intercept  SEslope    SEintercept  R2        RMSE     NSE        ME         MAE      RSR
          N           144  1         0          0          0            1         0        1          0          0        0
          TOC0_10cm   117  0.499267  7707.89    0.108682   1536.57      0.155054  1960.13  -0.819021  665.902    1457.12  1.34293
          TOC0_30cm   171  0.804645  8157.01    0.0259639  953.296      0.850367  3092.17  0.824434   1130.69    2339.32  0.417779
          TOC10_30cm  117  0.179195  15271.2    0.0263181  467.33       0.287307  2578.88  0.147915   877.748    2081.71  0.919131
          TOC30_60cm  171  0.866721  3975.1     0.0292223  644.904      0.838847  3466.2   0.814304   1236.11    2756.26  0.429662
          TON0_30cm   54   0.910642  317.339    0.0543008  193.569      0.843958  117.301  0.838689   -0.131613  96.3789  0.397899
          TON30_60cm  54   0.781142  317.393    0.0740051  210.461      0.681788  314.922  -3.99117   -304.245   304.245  2.21331
        AcceptedStatsName=Name n Slope Intercept SEslope SEintercept R2 RMSE NSE ME MAE RSR
  Folder Validation
    Memo Introduction
      The Soil Nutrient model has been tested on a variety of datasets studying the impact of management (tillage, cropping rotation, nitrogen management) on soil carbon, nitrogen and crop productivity for a range of soil types and environments.
    Folder Australia
      Memo
        Insert text here to document the Australian datasets
      Folder Tarlee
        Experiment Tarlee
          Memo
            Insert text here to document the Tarlee dataset
          Factors
            Factor Rotation: Specifications=[operations]
              Operations WW
                1978-07-18  [Wheat].Sow(cultivar:hartog, depth:30, population:100, rowSpacing:300);
                1979-06-21  [Wheat].Sow(cultivar:hartog, depth:30, population:100, rowSpacing:300);
                1980-07-16  [Wheat].Sow(cultivar:hartog, depth:30, population:100, rowSpacing:300);
                1981-07-16  [Wheat].Sow(cultivar:hartog, depth:30, population:100, rowSpacing:300);
                1982-06-07  [Wheat].Sow(cultivar:hartog, depth:30, population:100, rowSpacing:300);
                1983-06-04  [Wheat].Sow(cultivar:hartog, depth:30, population:100, rowSpacing:300);
                1984-06-26  [Wheat].Sow(cultivar:hartog, depth:30, population:100, rowSpacing:300);
                1985-06-11  [Wheat].Sow(cultivar:hartog, depth:30, population:100, rowSpacing:300);
                1986-07-21  [Wheat].Sow(cultivar:hartog, depth:30, population:100, rowSpacing:300);
                1987-06-02  [Wheat].Sow(cultivar:hartog, depth:30, population:100, rowSpacing:300);
                1988-06-23  [Wheat].Sow(cultivar:hartog, depth:30, population:100, rowSpacing:300);
                1989-06-06  [Wheat].Sow(cultivar:hartog, depth:30, population:100, rowSpacing:300);
                1990-07-23  [Wheat].Sow(cultivar:hartog, depth:30, population:100, rowSpacing:300);
                1991-06-26  [Wheat].Sow(cultivar:hartog, depth:30, population:100, rowSpacing:300);
                1992-06-01  [Wheat].Sow(cultivar:hartog, depth:30, population:100, rowSpacing:300);
                1993-06-24  [Wheat].Sow(cultivar:hartog, depth:30, population:100, rowSpacing:300);
                1994-06-24  [Wheat].Sow(cultivar:hartog, depth:30, population:100, rowSpacing:300);
                1995-06-24  [Wheat].Sow(cultivar:hartog, depth:30, population:100, rowSpacing:300);
                1996-06-23  [Wheat].Sow(cultivar:hartog, depth:30, population:100, rowSpacing:300);
              Operations WF
                1979-06-21  [Wheat].Sow(cultivar:hartog, depth:30, population:100, rowSpacing:300);
                1981-07-16  [Wheat].Sow(cultivar:hartog, depth:30, population:100, rowSpacing:300);
                1983-06-04  [Wheat].Sow(cultivar:hartog, depth:30, population:100, rowSpacing:300);
                1985-06-11  [Wheat].Sow(cultivar:hartog, depth:30, population:100, rowSpacing:300);
                1987-06-02  [Wheat].Sow(cultivar:hartog, depth:30, population:100, rowSpacing:300);
                1989-06-06  [Wheat].Sow(cultivar:hartog, depth:30, population:100, rowSpacing:300);
                1991-06-26  [Wheat].Sow(cultivar:hartog, depth:30, population:100, rowSpacing:300);
                1993-06-24  [Wheat].Sow(cultivar:hartog, depth:30, population:100, rowSpacing:300);
                1995-06-24  [Wheat].Sow(cultivar:hartog, depth:30, population:100, rowSpacing:300);
            Factor Stubble: Specifications=[stubbleoperations]
              Operations Burnt
                1978-12-31  [SurfaceOrganicMatter].Incorporate(fraction: 0.90, depth: 0)
                1979-12-31  [SurfaceOrganicMatter].Incorporate(fraction: 0.90, depth: 0)
                1980-12-31  [SurfaceOrganicMatter].Incorporate(fraction: 0.90, depth: 0)
                1981-12-31  [SurfaceOrganicMatter].Incorporate(fraction: 0.90, depth: 0)
                1982-12-31  [SurfaceOrganicMatter].Incorporate(fraction: 0.90, depth: 0)
                1983-12-31  [SurfaceOrganicMatter].Incorporate(fraction: 0.90, depth: 0)
                1984-12-31  [SurfaceOrganicMatter].Incorporate(fraction: 0.90, depth: 0)
                1985-12-31  [SurfaceOrganicMatter].Incorporate(fraction: 0.90, depth: 0)
                1986-12-31  [SurfaceOrganicMatter].Incorporate(fraction: 0.90, depth: 0)
                1987-12-31  [SurfaceOrganicMatter].Incorporate(fraction: 0.90, depth: 0)
                1988-12-31  [SurfaceOrganicMatter].Incorporate(fraction: 0.90, depth: 0)
                1989-12-31  [SurfaceOrganicMatter].Incorporate(fraction: 0.90, depth: 0)
                1990-12-31  [SurfaceOrganicMatter].Incorporate(fraction: 0.90, depth: 0)
                1991-12-31  [SurfaceOrganicMatter].Incorporate(fraction: 0.90, depth: 0)
                1992-12-31  [SurfaceOrganicMatter].Incorporate(fraction: 0.90, depth: 0)
                1993-12-31  [SurfaceOrganicMatter].Incorporate(fraction: 0.90, depth: 0)
                1994-12-31  [SurfaceOrganicMatter].Incorporate(fraction: 0.90, depth: 0)
                1995-12-31  [SurfaceOrganicMatter].Incorporate(fraction: 0.90, depth: 0)
              Operations Incorporated
                1978-12-31  [SurfaceOrganicMatter].Incorporate(fraction: 0.90, depth: 100)
                1979-12-31  [SurfaceOrganicMatter].Incorporate(fraction: 0.90, depth: 100)
                1980-12-31  [SurfaceOrganicMatter].Incorporate(fraction: 0.90, depth: 100)
                1981-12-31  [SurfaceOrganicMatter].Incorporate(fraction: 0.90, depth: 100)
                1982-12-31  [SurfaceOrganicMatter].Incorporate(fraction: 0.90, depth: 100)
                1983-12-31  [SurfaceOrganicMatter].Incorporate(fraction: 0.90, depth: 100)
                1984-12-31  [SurfaceOrganicMatter].Incorporate(fraction: 0.90, depth: 100)
                1985-12-31  [SurfaceOrganicMatter].Incorporate(fraction: 0.90, depth: 100)
                1986-12-31  [SurfaceOrganicMatter].Incorporate(fraction: 0.90, depth: 100)
                1987-12-31  [SurfaceOrganicMatter].Incorporate(fraction: 0.90, depth: 100)
                1988-12-31  [SurfaceOrganicMatter].Incorporate(fraction: 0.90, depth: 100)
                1989-12-31  [SurfaceOrganicMatter].Incorporate(fraction: 0.90, depth: 100)
                1990-12-31  [SurfaceOrganicMatter].Incorporate(fraction: 0.90, depth: 100)
                1991-12-31  [SurfaceOrganicMatter].Incorporate(fraction: 0.90, depth: 100)
                1992-12-31  [SurfaceOrganicMatter].Incorporate(fraction: 0.90, depth: 100)
                1993-12-31  [SurfaceOrganicMatter].Incorporate(fraction: 0.90, depth: 100)
                1994-12-31  [SurfaceOrganicMatter].Incorporate(fraction: 0.90, depth: 100)
                1995-12-31  [SurfaceOrganicMatter].Incorporate(fraction: 0.90, depth: 100)
              Operations Retained
            Factor N: Specifications=[SowingFertiliser].Script.Amount = 0,40,80
          Simulation TarleeBaseSimulation
            Weather: FileName=Tarlee.met
            Clock: StartDate=1978-01-01; EndDate=1996-12-31
            Summary summaryfile
            Zone Field: Area=1; Slope=0
              Operations: same as Validation.Australia.Tarlee.Tarlee.Factors.Rotation.WW
              Operations stubbleoperations
              Report: EventNames=[Clock].EndOfMonth
                VariableNames:
                  [Clock].Today
                  [Soil].Nutrient.TotalC[1] as TOC0_10cm
                  [Soil].Nutrient.TotalC[2] as TOC10_30cm
                  [Soil].Nutrient.TotalC[3] as TOC30_60cm
                  ([Soil].Nutrient.TotalC[1]+[Soil].Nutrient.TotalC[2]) as TOC0_30cm
              Report HarvestReport: EventNames=[Wheat].Harvesting
                VariableNames:
                  [Clock].Today.Year
                  [Wheat].Grain.Wt
                  [Wheat].AboveGround.Wt
                  [Wheat].Grain.Size
              SurfaceOrganicMatter stubble: PoolName=wheat; type=wheat; mass=1000; standing_fraction=0; cnr=80; CriticalResidueWeight=2000; OptimumDecompTemp=20; MaxCumulativeEOS=20; CNRatioDecompCoeff=0.277; CNRatioDecompThreshold=25; TotalLeachRain=25; MinRainToLeach=10; CriticalMinimumOrganicC=0.004; DefaultCPRatio=0; DefaultStandingFraction=0; StandingExtinctCoeff=0.5; FractionFaecesAdded=0.5
                Pools:
                  {PoolName=wheat, ResidueType=wheat, Mass=1000, CNRatio=80, StandingFraction=0}
                ResidueTypes ResidueTypesList: LoadFromResource=ResidueTypes
              Plant15 wheat: ResourceName=Wheat; AutoHarvest=false; CropType=wheat
              MicroClimate: a_interception=0; b_interception=1; c_interception=0; d_interception=0; soil_albedo=0.23; sun_angle=15; soil_heat_flux_fraction=0.4; night_interception_fraction=0.5; refheight=2; albedo=0.15; emissivity=0.96; RadIntTotal=0
              Manager Harvesting
                Crop = wheat
```csharp
using System;
using Models.Core;
using Models.PMF;
using Models.Soils;
using Models.Utilities;
using APSIM.Shared.Utilities;

namespace Models
{
	[Serializable] 
	public class Script : Model
	{
		[Description("Crop")]
		public ICrop Crop { get; set; }
        
		[EventSubscribe("DoManagement")]
		private void OnDoManagement(object sender, EventArgs e)
		{
			if (Crop.IsReadyForHarvesting)
			{
				Crop.Harvest();
				Crop.EndCrop();
			}
		}
	}
}
```
              Soil: ASCOrder=Sodosol; ASCSubOrder=Red; SoilType=Sand; Site=Tarlee; NearestTown=Tarlee; Region=Mid North; State=South Australia; Country=Australia; ApsoilNumber=610; Latitude=-34.276; Longitude=138.759; LocationAccuracy=+/- 20m
                DataSource=Characterisation 2008 by University of Adelaide, CSIRO Sustainable Ecosystems and Allan Mayfield Consulting, Clare, SA
                Comments=Roots: Wheat 90cm; barley and oats estimated; OC WB as measured; Strongly duplex low-moderate clay soil. Surface CEC low, moderate below. Texture change at about 7cm. Little chemical impediment to root growth, but high ESP below about 60cm may result in slaking or dispersion and high bulk density.
                Water
                  Thickness  BD    AirDry  LL15   DUL    SAT
                  100        1.54  0.055   0.11   0.223  0.389
                  200        1.41  0.167   0.209  0.388  0.438
                  300        1.53  0.22    0.22   0.342  0.393
                  300        1.57  0.22    0.22   0.293  0.378
                  350        1.6   0.22    0.22   0.264  0.366
                  SoilCrop WheatSoil: LL=[0.11, 0.209, 0.24, 0.225, 0.222]; KL=[0.06, 0.06, 0.06, 0.04, 0.04]; XF=[1, 1, 1, 1, 1]
                SoilWater: SummerDate=1-Nov; SummerU=6; SummerCona=3.5; WinterDate=1-Apr; WinterU=2; WinterCona=2; DiffusConst=88; DiffusSlope=35; Salb=0.13; CN2Bare=73; CNRed=20; CNCov=0.8; max_pond=0; Thickness=[100, 200, 300, 300, 350]; SWCON=[0.5, 0.5, 0.5, 0.5, 0.5]; residueinterception=0
                Nutrient
                SoilOrganicMatter: RootCN=40; RootWt=5000; SoilCN=12; EnrACoeff=7.4; EnrBCoeff=0.2; OCUnits=Total
                  Thickness  OC    FBiom  FInert
                  100        0.96  0.04   0.1
                  200        0.72  0.02   0.15
                  300        0.38  0.02   0.5
                  300        0.12  0.02   0.99
                  350        0.12  0.01   0.99
                Analysis: Thickness=[100, 200, 300, 300, 350]; PH=[7, 7.9, 8.9, 9.2, 9.2]; PHUnits=Water; BoronUnits=HotWater
                InitialWater Initial water: PercentMethod=FilledFromTop; FractionFull=1
                Sample Initial conditions: Thickness=[1800]; NO3=[10]; NH4=[1]; NO3Units=kgha; NH4Units=kgha; SWUnits=Volumetric; OCUnits=Total; PHUnits=Water
                CERESSoilTemperature
              Manager SowingFertiliser
                Amount = 160
                CropName = wheat
```csharp
using System;
using Models.Core;
using Models.PMF;
namespace Models
{
	[Serializable]
	public class Script : Model
	{
		[Link] Clock Clock;
		[Link] Fertiliser Fertiliser;
		[Link] Summary Summary;
		
		
		[Description("Amount of fertiliser to be applied (kg/ha)")]
		public double Amount { get; set; }
		
		[Description("Crop to be fertilised")]
		public string CropName { get; set; }
		
		
		

		[EventSubscribe("Sowing")]
		private void OnSowing(object sender, EventArgs e)
		{
			Model crop = sender as Model;
			if (crop.Name.ToLower() == CropName.ToLower())
				Fertiliser.Apply(Amount: Amount, Type: Fertiliser.Types.NO3N);
		}
		
	}
}
```
              Fertiliser
              SoluteManager
      Folder Hudson
        Simulation W1 Base Simulation
          Clock: StartDate=1994-08-05; EndDate=2000-01-23
          Summary summaryfile
          Weather: FileName=Hudson.met
          Zone paddock: Area=1; Slope=0
            Report Hudsonreport: EventNames=[Clock].DoReport
              VariableNames:
                [Clock].Today
                [Soil].SoilWater.SW
                [Soil].SoilWater.Runoff
                [Soil].SoilWater.Drainage
                [Soil].SoilWater.Es
                [Soil].SoilWater.Eo
                [Wheat].Leaf.LAI
                [Wheat].AboveGround.Wt
                [Wheat].Grain.Wt
                [Weather].Rain
                sum([Soil].SoilNitrogen.NH4) as NH4
                sum([Soil].SoilNitrogen.NO3) as NO3
                sum([Soil].SoilNitrogen.Denitrification) as dnit
                Wheat.AboveGround.N
                Wheat.BelowGround.N
            Soil: Latitude=0; Longitude=0
              Water
                Thickness  BD   AirDry  LL15  DUL   SAT
                100        1    0.1     0.24  0.47  0.53
                200        1.1  0.1     0.28  0.49  0.54
                200        1.1  0.1     0.28  0.52  0.57
                200        1.1  0.1     0.29  0.52  0.55
                200        1.1  0.1     0.29  0.51  0.54
                200        1.2  0.1     0.29  0.5   0.53
                200        1.2  0.1     0.29  0.5   0.53
                200        1.2  0.1     0.33  0.48  0.51
                200        1.2  0.1     0.33  0.48  0.51
                200        1.2  0.1     0.35  0.48  0.51
                200        1.2  0.1     0.35  0.47  0.5
                200        1.2  0.1     0.35  0.45  0.48
                200        1.3  0.1     0.35  0.45  0.48
                200        1.3  0.1     0.35  0.45  0.48
                200        1.3  0.1     0.35  0.45  0.48
                200        1.3  0.1     0.35  0.45  0.48
                SoilCrop WheatSoil
                  LL=[0.25, 0.3, 0.3, 0.33, 0.33, 0.35, 0.35, 0.4, 0.4, 0.4, 0.4, 0.4, 0.4, 0.4, 0.4, 0.4]
                  KL=[0.06, 0.06, 0.06, 0.06, 0.06, 0.06, 0.06, 0.06, 0.06, 0.06, 0, 0, 0, 0, 0, 0]
                  XF=[1, 1, 1, 1, 1, 1, 1, 1, 1, 1, 0, 0, 0, 0, 0, 0]
              SoilWater: SummerDate=1-Nov; SummerU=9; SummerCona=5; WinterDate=1-Apr; WinterU=9; WinterCona=5; DiffusConst=40; DiffusSlope=16; Salb=0.13; CN2Bare=72; CNRed=20; CNCov=0.8; max_pond=0; residueinterception=0
                Thickness=[100, 200, 200, 200, 200, 200, 200, 200, 200, 200, 200, 200, 200, 200, 200, 200]
                SWCON=[0.4, 0.4, 0.4, 0.4, 0.4, 0.4, 0.4, 0.4, 0.4, 0.4, 0.4, 0.4, 0.4, 0.4, 0.4, 0.4]
              SoilNitrogen: fom_type=[default, manure, mucuna, lablab, shemp, stable]; fract_carb=[0.2, 0.3, 0.54, 0.57, 0.45, 0]; fract_cell=[0.7, 0.3, 0.37, 0.37, 0.47, 0.1]; fract_lign=[0.1, 0.4, 0.09, 0.06, 0.08, 0.9]; wfpsN2N2O_x=[22, 88]; wfpsN2N2O_y=[0.1, 1]
              SoilOrganicMatter: RootCN=40; RootWt=10; SoilCN=14.5; EnrACoeff=7.4; EnrBCoeff=0.2; OCUnits=Total
                Thickness  OC    FBiom  FInert
                100        1.4   0.2    0.32
                200        1.4   0.03   0.5
                200        1.4   0.02   0.6
                200        1.35  0.015  0.7
                200        0.95  0.01   0.85
                200        1     0.01   0.9
                200        0.8   0.01   0.99
                200        0.45  0.01   0.99
                200        0.45  0.01   0.99
                200        0.45  0.01   0.99
                200        0.45  0.01   0.99
                200        0.45  0.01   0.99
                200        0.45  0.01   0.99
                200        0.45  0.01   0.99
                200        0.45  0.01   0.99
                200        0.45  0.01   0.99
              Analysis: PH=[6, 6.4, 6.8, 7.2, 7.6, 8, 8, 8, 8, 8, 8, 8, 8, 8, 8, 8]; PHUnits=Water; BoronUnits=HotWater
                Thickness=[100, 200, 200, 200, 200, 200, 200, 200, 200, 200, 200, 200, 200, 200, 200, 200]
              Sample Initial nitrogen: NO3Units=ppm; NH4Units=ppm; SWUnits=Volumetric; OCUnits=Total; PHUnits=Water
                Thickness  NO3   NH4
                100        10.7  0.3
                200        9.99  0.3
                200        7.87  0.3
                200        6.2   0.3
                200        4.85  0.3
                200        3.56  0.3
                200        2.72  0.3
                200        2.34  0.3
                200        2.47  0.3
                200        3.24  0.3
                200        4.25  0.3
                200        4.94  0.3
                200        5.2   0.3
                200        4.95  0.3
                200        4.52  0.3
                200        4.24  0.3
              Sample Initial water: NO3Units=ppm; NH4Units=ppm; SWUnits=Volumetric; OCUnits=Total; PHUnits=Water
                Thickness=[100, 200, 200, 200, 200, 200, 200, 200, 200, 200, 200, 200, 200, 200, 200, 200]
                SW=[0.43, 0.43, 0.48, 0.47, 0.46, 0.46, 0.46, 0.485, 0.49, 0.474, 0.457, 0.453, 0.447, 0.465, 0.457, 0.43]
              CERESSoilTemperature
            SurfaceOrganicMatter SurfaceOM: PoolName=unknown; type=wheat; mass=0; standing_fraction=1; cnr=100; CriticalResidueWeight=2000; OptimumDecompTemp=20; MaxCumulativeEOS=20; CNRatioDecompCoeff=0.277; CNRatioDecompThreshold=25; TotalLeachRain=25; MinRainToLeach=10; CriticalMinimumOrganicC=0.004; DefaultCPRatio=0; DefaultStandingFraction=0; StandingExtinctCoeff=0.5; FractionFaecesAdded=0.5
              Pools:
                {PoolName=unknown, ResidueType=wheat, Mass=0, CNRatio=100, StandingFraction=1}
              ResidueTypes ResidueTypesList: LoadFromResource=ResidueTypes
            MicroClimate: a_interception=0; b_interception=1; c_interception=0; d_interception=0; soil_albedo=0.23; sun_angle=15; soil_heat_flux_fraction=0.4; night_interception_fraction=0.5; refheight=2; albedo=0.15; emissivity=0.96; RadIntTotal=0
            Fertiliser
            Operations
              1994-08-05  [Wheat].Sow(population:26, cultivar:hartog, depth:40, rowSpacing:300);
              1994-08-05  [Fertiliser].Apply(70, Fertiliser.Types.NO3N, 50);
              1994-09-07  [Wheat].OnEndCrop();
              1994-10-27  [Wheat].Harvest();
              1995-06-01  [Wheat].Sow(cultivar:hartog, population:126, depth:40, rowSpacing:300);
              1995-06-01  [Fertiliser].Apply(80, Fertiliser.Types.NO3N, 50);
              1995-11-28  [Wheat].Harvest();
              1996-07-02  [Wheat].Sow(cultivar:hartog, population:126, depth:40, rowSpacing:300);
              1996-07-02  [Fertiliser].Apply(101, Fertiliser.Types.NO3N, 50);
              1996-12-04  [Wheat].EndCrop();
              1997-06-02  [Wheat].Sow(cultivar:hartog, population:71, depth:40, rowSpacing:300);
              1997-06-02  [Fertiliser].Apply(100, Fertiliser.Types.NO3N, 50);
              1997-11-26  [Wheat].Harvest();
              1998-06-18  [Wheat].Sow(cultivar:hartog, population:126, depth:40, rowSpacing:300);
              1998-06-18  [Fertiliser].Apply(102, Fertiliser.Types.NO3N, 50);
              1998-12-02  [Wheat].Harvest();
              1999-06-23  [Wheat].Sow(cultivar:hartog, population:50, depth:40, rowSpacing:300);
              1999-06-23  [Fertiliser].Apply(102, Fertiliser.Types.NO3N, 50);
              1999-12-16  [Wheat].Harvest();
            Plant15 Wheat: AutoHarvest=true; CropType=Wheat
            SoluteManager
    Folder North America
      Folder Pendleton
        Experiment Pendleton
          Factors
            Factor Treatment: Specifications=[Operations]
              Operations 6_fBN0
                1931-08-15  [SurfaceOrganicMatter].Incorporate(fraction: 0.67, depth: 0)
                1931-10-15  [Wheat].Sow(cultivar:PendletonTall, depth:30, population:100, rowSpacing:300);
                1933-08-15  [SurfaceOrganicMatter].Incorporate(fraction: 0.67, depth: 0)
                1933-10-15  [Wheat].Sow(cultivar:PendletonTall, depth:30, population:100, rowSpacing:300);
                1935-08-15  [SurfaceOrganicMatter].Incorporate(fraction: 0.67, depth: 0)
                1935-10-15  [Wheat].Sow(cultivar:PendletonTall, depth:30, population:100, rowSpacing:300);
                1937-08-15  [SurfaceOrganicMatter].Incorporate(fraction: 0.67, depth: 0)
                1937-10-15  [Wheat].Sow(cultivar:PendletonTall, depth:30, population:100, rowSpacing:300);
                1939-08-15  [SurfaceOrganicMatter].Incorporate(fraction: 0.67, depth: 0)
                1939-10-15  [Wheat].Sow(cultivar:PendletonTall, depth:30, population:100, rowSpacing:300);
                1941-08-15  [SurfaceOrganicMatter].Incorporate(fraction: 0.67, depth: 0)
                1941-10-15  [Wheat].Sow(cultivar:PendletonTall, depth:30, population:100, rowSpacing:300);
                1943-08-15  [SurfaceOrganicMatter].Incorporate(fraction: 0.67, depth: 0)
                1943-10-15  [Wheat].Sow(cultivar:PendletonTall, depth:30, population:100, rowSpacing:300);
                1945-08-15  [SurfaceOrganicMatter].Incorporate(fraction: 0.67, depth: 0)
                1945-10-15  [Wheat].Sow(cultivar:PendletonTall, depth:30, population:100, rowSpacing:300);
                1947-08-15  [SurfaceOrganicMatter].Incorporate(fraction: 0.67, depth: 0)
                1947-10-15  [Wheat].Sow(cultivar:PendletonTall, depth:30, population:100, rowSpacing:300);
                1949-08-15  [SurfaceOrganicMatter].Incorporate(fraction: 0.67, depth: 0)
                1949-10-15  [Wheat].Sow(cultivar:PendletonTall, depth:30, population:100, rowSpacing:300);
                1951-08-15  [SurfaceOrganicMatter].Incorporate(fraction: 0.67, depth: 0)
                1951-10-15  [Wheat].Sow(cultivar:PendletonTall, depth:30, population:100, rowSpacing:300);
                1953-08-15  [SurfaceOrganicMatter].Incorporate(fraction: 0.67, depth: 0)
                1953-10-15  [Wheat].Sow(cultivar:PendletonTall, depth:30, population:100, rowSpacing:300);
                1955-08-15  [SurfaceOrganicMatter].Incorporate(fraction: 0.67, depth: 0)
                1955-10-15  [Wheat].Sow(cultivar:PendletonTall, depth:30, population:100, rowSpacing:300);
                1957-08-15  [SurfaceOrganicMatter].Incorporate(fraction: 0.67, depth: 0)
                1957-10-15  [Wheat].Sow(cultivar:PendletonTall, depth:30, population:100, rowSpacing:300);
                1959-08-15  [SurfaceOrganicMatter].Incorporate(fraction: 0.67, depth: 0)
                1959-10-15  [Wheat].Sow(cultivar:PendletonTall, depth:30, population:100, rowSpacing:300);
                1961-08-15  [SurfaceOrganicMatter].Incorporate(fraction: 0.67, depth: 0)
                1961-10-15  [Wheat].Sow(cultivar:PendletonTall, depth:30, population:100, rowSpacing:300);
                1963-08-15  [SurfaceOrganicMatter].Incorporate(fraction: 0.67, depth: 0)
                1963-10-15  [Wheat].Sow(cultivar:PendletonTall, depth:30, population:100, rowSpacing:300);
                1965-08-15  [SurfaceOrganicMatter].Incorporate(fraction: 0.67, depth: 0)
                1965-10-15  [Wheat].Sow(cultivar:PendletonDwarf, depth:30, population:150, rowSpacing:300);
                1957-08-15  [SurfaceOrganicMatter].Incorporate(fraction: 0.67, depth: 0)
                1967-10-15  [Wheat].Sow(cultivar:PendletonDwarf, depth:30, population:150, rowSpacing:300);
                1969-08-15  [SurfaceOrganicMatter].Incorporate(fraction: 0.67, depth: 0)
                1969-10-15  [Wheat].Sow(cultivar:PendletonDwarf, depth:30, population:150, rowSpacing:300);
                1971-08-15  [SurfaceOrganicMatter].Incorporate(fraction: 0.67, depth: 0)
                1971-10-15  [Wheat].Sow(cultivar:PendletonDwarf, depth:30, population:150, rowSpacing:300);
                1973-08-15  [SurfaceOrganicMatter].Incorporate(fraction: 0.67, depth: 0)
                1973-10-15  [Wheat].Sow(cultivar:PendletonDwarf, depth:30, population:150, rowSpacing:300);
                1975-08-15  [SurfaceOrganicMatter].Incorporate(fraction: 0.67, depth: 0)
                1975-10-15  [Wheat].Sow(cultivar:PendletonDwarf, depth:30, population:150, rowSpacing:300);
                1977-08-15  [SurfaceOrganicMatter].Incorporate(fraction: 0.67, depth: 0)
                1977-10-15  [Wheat].Sow(cultivar:PendletonDwarf, depth:30, population:150, rowSpacing:300);
                1979-08-15  [SurfaceOrganicMatter].Incorporate(fraction: 0.67, depth: 0)
                1979-10-15  [Wheat].Sow(cultivar:PendletonDwarf, depth:30, population:150, rowSpacing:300);
                1981-08-15  [SurfaceOrganicMatter].Incorporate(fraction: 0.67, depth: 0)
                1981-10-15  [Wheat].Sow(cultivar:PendletonDwarf, depth:30, population:150, rowSpacing:300);
                1983-08-15  [SurfaceOrganicMatter].Incorporate(fraction: 0.67, depth: 0)
                1983-10-15  [Wheat].Sow(cultivar:PendletonDwarf, depth:30, population:150, rowSpacing:300);
                1985-08-15  [SurfaceOrganicMatter].Incorporate(fraction: 0.67, depth: 0)
                1985-10-15  [Wheat].Sow(cultivar:PendletonDwarf, depth:30, population:150, rowSpacing:300);
                1987-08-15  [SurfaceOrganicMatter].Incorporate(fraction: 0.67, depth: 0)
                1987-10-15  [Wheat].Sow(cultivar:PendletonDwarf, depth:30, population:150, rowSpacing:300);
                1989-08-15  [SurfaceOrganicMatter].Incorporate(fraction: 0.67, depth: 0)
                1989-10-15  [Wheat].Sow(cultivar:PendletonDwarf, depth:30, population:150, rowSpacing:300);
                1991-08-15  [SurfaceOrganicMatter].Incorporate(fraction: 0.67, depth: 0)
                1991-10-15  [Wheat].Sow(cultivar:PendletonDwarf, depth:30, population:150, rowSpacing:300);
                1993-08-15  [SurfaceOrganicMatter].Incorporate(fraction: 0.67, depth: 0)
                1993-10-15  [Wheat].Sow(cultivar:PendletonDwarf, depth:30, population:150, rowSpacing:300);
                1995-08-15  [SurfaceOrganicMatter].Incorporate(fraction: 0.67, depth: 0)
                1995-10-15  [Wheat].Sow(cultivar:PendletonDwarf, depth:30, population:150, rowSpacing:300);
                1997-08-15  [SurfaceOrganicMatter].Incorporate(fraction: 0.67, depth: 0)
                1997-10-15  [Wheat].Sow(cultivar:PendletonDwarf, depth:30, population:150, rowSpacing:300);
                1999-08-15  [SurfaceOrganicMatter].Incorporate(fraction: 0.67, depth: 0)
                1999-10-15  [Wheat].Sow(cultivar:PendletonDwarf, depth:30, population:150, rowSpacing:300);
              Operations 7_sBN0
                1931-04-15  [SurfaceOrganicMatter].Incorporate(fraction: 0.55, depth: 0)
                1931-10-15  [Wheat].Sow(cultivar:PendletonTall, depth:30, population:100, rowSpacing:300);
                1933-04-15  [SurfaceOrganicMatter].Incorporate(fraction: 0.55, depth: 0)
                1933-10-15  [Wheat].Sow(cultivar:PendletonTall, depth:30, population:100, rowSpacing:300);
                1935-04-15  [SurfaceOrganicMatter].Incorporate(fraction: 0.55, depth: 0)
                1935-10-15  [Wheat].Sow(cultivar:PendletonTall, depth:30, population:100, rowSpacing:300);
                1937-04-15  [SurfaceOrganicMatter].Incorporate(fraction: 0.55, depth: 0)
                1937-10-15  [Wheat].Sow(cultivar:PendletonTall, depth:30, population:100, rowSpacing:300);
                1939-04-15  [SurfaceOrganicMatter].Incorporate(fraction: 0.55, depth: 0)
                1939-10-15  [Wheat].Sow(cultivar:PendletonTall, depth:30, population:100, rowSpacing:300);
                1941-04-15  [SurfaceOrganicMatter].Incorporate(fraction: 0.55, depth: 0)
                1941-10-15  [Wheat].Sow(cultivar:PendletonTall, depth:30, population:100, rowSpacing:300);
                1943-04-15  [SurfaceOrganicMatter].Incorporate(fraction: 0.55, depth: 0)
                1943-10-15  [Wheat].Sow(cultivar:PendletonTall, depth:30, population:100, rowSpacing:300);
                1945-04-15  [SurfaceOrganicMatter].Incorporate(fraction: 0.55, depth: 0)
                1945-10-15  [Wheat].Sow(cultivar:PendletonTall, depth:30, population:100, rowSpacing:300);
                1947-04-15  [SurfaceOrganicMatter].Incorporate(fraction: 0.55, depth: 0)
                1947-10-15  [Wheat].Sow(cultivar:PendletonTall, depth:30, population:100, rowSpacing:300);
                1949-04-15  [SurfaceOrganicMatter].Incorporate(fraction: 0.55, depth: 0)
                1949-10-15  [Wheat].Sow(cultivar:PendletonTall, depth:30, population:100, rowSpacing:300);
                1951-04-15  [SurfaceOrganicMatter].Incorporate(fraction: 0.55, depth: 0)
                1951-10-15  [Wheat].Sow(cultivar:PendletonTall, depth:30, population:100, rowSpacing:300);
                1953-04-15  [SurfaceOrganicMatter].Incorporate(fraction: 0.55, depth: 0)
                1953-10-15  [Wheat].Sow(cultivar:PendletonTall, depth:30, population:100, rowSpacing:300);
                1955-04-15  [SurfaceOrganicMatter].Incorporate(fraction: 0.55, depth: 0)
                1955-10-15  [Wheat].Sow(cultivar:PendletonTall, depth:30, population:100, rowSpacing:300);
                1957-04-15  [SurfaceOrganicMatter].Incorporate(fraction: 0.55, depth: 0)
                1957-10-15  [Wheat].Sow(cultivar:PendletonTall, depth:30, population:100, rowSpacing:300);
                1959-04-15  [SurfaceOrganicMatter].Incorporate(fraction: 0.55, depth: 0)
                1959-10-15  [Wheat].Sow(cultivar:PendletonTall, depth:30, population:100, rowSpacing:300);
                1961-04-15  [SurfaceOrganicMatter].Incorporate(fraction: 0.55, depth: 0)
                1961-10-15  [Wheat].Sow(cultivar:PendletonTall, depth:30, population:100, rowSpacing:300);
                1963-04-15  [SurfaceOrganicMatter].Incorporate(fraction: 0.55, depth: 0)
                1963-10-15  [Wheat].Sow(cultivar:PendletonTall, depth:30, population:100, rowSpacing:300);
                1965-04-15  [SurfaceOrganicMatter].Incorporate(fraction: 0.55, depth: 0)
                1965-10-15  [Wheat].Sow(cultivar:PendletonDwarf, depth:30, population:150, rowSpacing:300);
                1967-04-15  [SurfaceOrganicMatter].Incorporate(fraction: 0.55, depth: 0)
                1967-10-15  [Wheat].Sow(cultivar:PendletonDwarf, depth:30, population:150, rowSpacing:300);
                1969-04-15  [SurfaceOrganicMatter].Incorporate(fraction: 0.55, depth: 0)
                1969-10-15  [Wheat].Sow(cultivar:PendletonDwarf, depth:30, population:150, rowSpacing:300);
                1971-04-15  [SurfaceOrganicMatter].Incorporate(fraction: 0.55, depth: 0)
                1971-10-15  [Wheat].Sow(cultivar:PendletonDwarf, depth:30, population:150, rowSpacing:300);
                1973-04-15  [SurfaceOrganicMatter].Incorporate(fraction: 0.55, depth: 0)
                1973-10-15  [Wheat].Sow(cultivar:PendletonDwarf, depth:30, population:150, rowSpacing:300);
                1975-04-15  [SurfaceOrganicMatter].Incorporate(fraction: 0.55, depth: 0)
                1975-10-15  [Wheat].Sow(cultivar:PendletonDwarf, depth:30, population:150, rowSpacing:300);
                1977-04-15  [SurfaceOrganicMatter].Incorporate(fraction: 0.55, depth: 0)
                1977-10-15  [Wheat].Sow(cultivar:PendletonDwarf, depth:30, population:150, rowSpacing:300);
                1979-04-15  [SurfaceOrganicMatter].Incorporate(fraction: 0.55, depth: 0)
                1979-10-15  [Wheat].Sow(cultivar:PendletonDwarf, depth:30, population:150, rowSpacing:300);
                1981-04-15  [SurfaceOrganicMatter].Incorporate(fraction: 0.55, depth: 0)
                1981-10-15  [Wheat].Sow(cultivar:PendletonDwarf, depth:30, population:150, rowSpacing:300);
                1983-04-15  [SurfaceOrganicMatter].Incorporate(fraction: 0.55, depth: 0)
                1983-10-15  [Wheat].Sow(cultivar:PendletonDwarf, depth:30, population:150, rowSpacing:300);
                1985-04-15  [SurfaceOrganicMatter].Incorporate(fraction: 0.55, depth: 0)
                1985-10-15  [Wheat].Sow(cultivar:PendletonDwarf, depth:30, population:150, rowSpacing:300);
                1987-04-15  [SurfaceOrganicMatter].Incorporate(fraction: 0.55, depth: 0)
                1987-10-15  [Wheat].Sow(cultivar:PendletonDwarf, depth:30, population:150, rowSpacing:300);
                1989-04-15  [SurfaceOrganicMatter].Incorporate(fraction: 0.55, depth: 0)
                1989-10-15  [Wheat].Sow(cultivar:PendletonDwarf, depth:30, population:150, rowSpacing:300);
                1991-04-15  [SurfaceOrganicMatter].Incorporate(fraction: 0.55, depth: 0)
                1991-10-15  [Wheat].Sow(cultivar:PendletonDwarf, depth:30, population:150, rowSpacing:300);
                1993-04-15  [SurfaceOrganicMatter].Incorporate(fraction: 0.55, depth: 0)
                1993-10-15  [Wheat].Sow(cultivar:PendletonDwarf, depth:30, population:150, rowSpacing:300);
                1995-04-15  [SurfaceOrganicMatter].Incorporate(fraction: 0.55, depth: 0)
                1995-10-15  [Wheat].Sow(cultivar:PendletonDwarf, depth:30, population:150, rowSpacing:300);
                1997-04-15  [SurfaceOrganicMatter].Incorporate(fraction: 0.55, depth: 0)
                1997-10-15  [Wheat].Sow(cultivar:PendletonDwarf, depth:30, population:150, rowSpacing:300);
                1999-04-15  [SurfaceOrganicMatter].Incorporate(fraction: 0.55, depth: 0)
                1999-10-15  [Wheat].Sow(cultivar:PendletonDwarf, depth:30, population:150, rowSpacing:300);
              Operations 0_nBN0
                1931-10-15  [Wheat].Sow(cultivar:PendletonTall, depth:30, population:100, rowSpacing:300);
                1933-10-15  [Wheat].Sow(cultivar:PendletonTall, depth:30, population:100, rowSpacing:300);
                1935-10-15  [Wheat].Sow(cultivar:PendletonTall, depth:30, population:100, rowSpacing:300);
                1937-10-15  [Wheat].Sow(cultivar:PendletonTall, depth:30, population:100, rowSpacing:300);
                1939-10-15  [Wheat].Sow(cultivar:PendletonTall, depth:30, population:100, rowSpacing:300);
                1941-10-15  [Wheat].Sow(cultivar:PendletonTall, depth:30, population:100, rowSpacing:300);
                1943-10-15  [Wheat].Sow(cultivar:PendletonTall, depth:30, population:100, rowSpacing:300);
                1945-10-15  [Wheat].Sow(cultivar:PendletonTall, depth:30, population:100, rowSpacing:300);
                1947-10-15  [Wheat].Sow(cultivar:PendletonTall, depth:30, population:100, rowSpacing:300);
                1949-10-15  [Wheat].Sow(cultivar:PendletonTall, depth:30, population:100, rowSpacing:300);
                1951-10-15  [Wheat].Sow(cultivar:PendletonTall, depth:30, population:100, rowSpacing:300);
                1953-10-15  [Wheat].Sow(cultivar:PendletonTall, depth:30, population:100, rowSpacing:300);
                1955-10-15  [Wheat].Sow(cultivar:PendletonTall, depth:30, population:100, rowSpacing:300);
                1957-10-15  [Wheat].Sow(cultivar:PendletonTall, depth:30, population:100, rowSpacing:300);
                1959-10-15  [Wheat].Sow(cultivar:PendletonTall, depth:30, population:100, rowSpacing:300);
                1961-10-15  [Wheat].Sow(cultivar:PendletonTall, depth:30, population:100, rowSpacing:300);
                1963-10-15  [Wheat].Sow(cultivar:PendletonTall, depth:30, population:100, rowSpacing:300);
                1965-10-15  [Wheat].Sow(cultivar:PendletonDwarf, depth:30, population:150, rowSpacing:300);
                1967-10-15  [Wheat].Sow(cultivar:PendletonDwarf, depth:30, population:150, rowSpacing:300);
                1969-10-15  [Wheat].Sow(cultivar:PendletonDwarf, depth:30, population:150, rowSpacing:300);
                1971-10-15  [Wheat].Sow(cultivar:PendletonDwarf, depth:30, population:150, rowSpacing:300);
                1973-10-15  [Wheat].Sow(cultivar:PendletonDwarf, depth:30, population:150, rowSpacing:300);
                1975-10-15  [Wheat].Sow(cultivar:PendletonDwarf, depth:30, population:150, rowSpacing:300);
                1977-10-15  [Wheat].Sow(cultivar:PendletonDwarf, depth:30, population:150, rowSpacing:300);
                1979-10-15  [Wheat].Sow(cultivar:PendletonDwarf, depth:30, population:150, rowSpacing:300);
                1981-10-15  [Wheat].Sow(cultivar:PendletonDwarf, depth:30, population:150, rowSpacing:300);
                1983-10-15  [Wheat].Sow(cultivar:PendletonDwarf, depth:30, population:150, rowSpacing:300);
                1985-10-15  [Wheat].Sow(cultivar:PendletonDwarf, depth:30, population:150, rowSpacing:300);
                1987-10-15  [Wheat].Sow(cultivar:PendletonDwarf, depth:30, population:150, rowSpacing:300);
                1989-10-15  [Wheat].Sow(cultivar:PendletonDwarf, depth:30, population:150, rowSpacing:300);
                1991-10-15  [Wheat].Sow(cultivar:PendletonDwarf, depth:30, population:150, rowSpacing:300);
                1993-10-15  [Wheat].Sow(cultivar:PendletonDwarf, depth:30, population:150, rowSpacing:300);
                1995-10-15  [Wheat].Sow(cultivar:PendletonDwarf, depth:30, population:150, rowSpacing:300);
                1997-10-15  [Wheat].Sow(cultivar:PendletonDwarf, depth:30, population:150, rowSpacing:300);
                1999-10-15  [Wheat].Sow(cultivar:PendletonDwarf, depth:30, population:150, rowSpacing:300);
              Operations 2_sBN45
                1931-08-15  [SurfaceOrganicMatter].Incorporate(fraction: 0.6, depth: 200)
                1931-10-15  [Wheat].Sow(cultivar:PendletonTall, depth:30, population:100, rowSpacing:300);
                1933-08-15  [SurfaceOrganicMatter].Incorporate(fraction: 0.6, depth: 200)
                1933-10-15  [Wheat].Sow(cultivar:PendletonTall, depth:30, population:100, rowSpacing:300);
                1935-08-15  [SurfaceOrganicMatter].Incorporate(fraction: 0.6, depth: 200)
                1935-10-15  [Wheat].Sow(cultivar:PendletonTall, depth:30, population:100, rowSpacing:300);
                1937-08-15  [SurfaceOrganicMatter].Incorporate(fraction: 0.6, depth: 200)
                1937-10-15  [Wheat].Sow(cultivar:PendletonTall, depth:30, population:100, rowSpacing:300);
                1939-08-15  [SurfaceOrganicMatter].Incorporate(fraction: 0.6, depth: 200)
                1939-10-15  [Wheat].Sow(cultivar:PendletonTall, depth:30, population:100, rowSpacing:300);
                1941-08-15  [SurfaceOrganicMatter].Incorporate(fraction: 0.6, depth: 200)
                1941-10-15  [Wheat].Sow(cultivar:PendletonTall, depth:30, population:100, rowSpacing:300);
                1943-08-15  [SurfaceOrganicMatter].Incorporate(fraction: 0.6, depth: 200)
                1943-10-15  [Wheat].Sow(cultivar:PendletonTall, depth:30, population:100, rowSpacing:300);
                1945-08-15  [SurfaceOrganicMatter].Incorporate(fraction: 0.6, depth: 200)
                1945-10-15  [Wheat].Sow(cultivar:PendletonTall, depth:30, population:100, rowSpacing:300);
                1947-08-15  [SurfaceOrganicMatter].Incorporate(fraction: 0.6, depth: 200)
                1947-10-15  [Wheat].Sow(cultivar:PendletonTall, depth:30, population:100, rowSpacing:300);
                1949-08-15  [SurfaceOrganicMatter].Incorporate(fraction: 0.6, depth: 200)
                1949-10-15  [Wheat].Sow(cultivar:PendletonTall, depth:30, population:100, rowSpacing:300);
                1951-08-15  [SurfaceOrganicMatter].Incorporate(fraction: 0.6, depth: 200)
                1951-10-15  [Wheat].Sow(cultivar:PendletonTall, depth:30, population:100, rowSpacing:300);
                1953-08-15  [SurfaceOrganicMatter].Incorporate(fraction: 0.6, depth: 200)
                1953-10-15  [Wheat].Sow(cultivar:PendletonTall, depth:30, population:100, rowSpacing:300);
                1955-08-15  [SurfaceOrganicMatter].Incorporate(fraction: 0.6, depth: 200)
                1955-10-15  [Wheat].Sow(cultivar:PendletonTall, depth:30, population:100, rowSpacing:300);
                1957-08-15  [SurfaceOrganicMatter].Incorporate(fraction: 0.6, depth: 200)
                1957-10-15  [Wheat].Sow(cultivar:PendletonTall, depth:30, population:100, rowSpacing:300);
                1959-08-15  [SurfaceOrganicMatter].Incorporate(fraction: 0.6, depth: 200)
                1959-10-15  [Wheat].Sow(cultivar:PendletonTall, depth:30, population:100, rowSpacing:300);
                1961-08-15  [SurfaceOrganicMatter].Incorporate(fraction: 0.6, depth: 200)
                1961-10-15  [Wheat].Sow(cultivar:PendletonTall, depth:30, population:100, rowSpacing:300);
                1963-08-15  [SurfaceOrganicMatter].Incorporate(fraction: 0.6, depth: 200)
                1963-10-15  [Wheat].Sow(cultivar:PendletonTall, depth:30, population:100, rowSpacing:300);
                1965-08-15  [SurfaceOrganicMatter].Incorporate(fraction: 0.6, depth: 200)
                1965-10-15  [Wheat].Sow(cultivar:PendletonDwarf, depth:30, population:150, rowSpacing:300);
                1967-10-15  [Fertiliser].Apply(Amount: 45, Type: Fertiliser.Types.NO3N);
                1967-10-15  [Wheat].Sow(cultivar:PendletonDwarf, depth:30, population:150, rowSpacing:300);
                1969-10-15  [Fertiliser].Apply(Amount: 45, Type: Fertiliser.Types.NO3N);
                1969-10-15  [Wheat].Sow(cultivar:PendletonDwarf, depth:30, population:150, rowSpacing:300);
                1971-10-15  [Fertiliser].Apply(Amount: 45, Type: Fertiliser.Types.NO3N);
                1971-10-15  [Wheat].Sow(cultivar:PendletonDwarf, depth:30, population:150, rowSpacing:300);
                1973-10-15  [Fertiliser].Apply(Amount: 45, Type: Fertiliser.Types.NO3N);
                1973-10-15  [Wheat].Sow(cultivar:PendletonDwarf, depth:30, population:150, rowSpacing:300);
                1975-10-15  [Fertiliser].Apply(Amount: 45, Type: Fertiliser.Types.NO3N);
                1975-10-15  [Wheat].Sow(cultivar:PendletonDwarf, depth:30, population:150, rowSpacing:300);
                1977-10-15  [Fertiliser].Apply(Amount: 45, Type: Fertiliser.Types.NO3N);
                1977-10-15  [Wheat].Sow(cultivar:PendletonDwarf, depth:30, population:150, rowSpacing:300);
                1979-10-15  [Fertiliser].Apply(Amount: 45, Type: Fertiliser.Types.NO3N);
                1979-10-15  [Wheat].Sow(cultivar:PendletonDwarf, depth:30, population:150, rowSpacing:300);
                1981-04-15  [SurfaceOrganicMatter].Incorporate(fraction: 0.55, depth: 0)
                1981-10-15  [Fertiliser].Apply(Amount: 45, Type: Fertiliser.Types.NO3N);
                1981-10-15  [Wheat].Sow(cultivar:PendletonDwarf, depth:30, population:150, rowSpacing:300);
                1983-04-15  [SurfaceOrganicMatter].Incorporate(fraction: 0.55, depth: 0)
                1983-10-15  [Fertiliser].Apply(Amount: 45, Type: Fertiliser.Types.NO3N);
                1983-10-15  [Wheat].Sow(cultivar:PendletonDwarf, depth:30, population:150, rowSpacing:300);
                1985-04-15  [SurfaceOrganicMatter].Incorporate(fraction: 0.55, depth: 0)
                1985-10-15  [Fertiliser].Apply(Amount: 45, Type: Fertiliser.Types.NO3N);
                1985-10-15  [Wheat].Sow(cultivar:PendletonDwarf, depth:30, population:150, rowSpacing:300);
                1987-04-15  [SurfaceOrganicMatter].Incorporate(fraction: 0.55, depth: 0)
                1987-10-15  [Fertiliser].Apply(Amount: 45, Type: Fertiliser.Types.NO3N);
                1987-10-15  [Wheat].Sow(cultivar:PendletonDwarf, depth:30, population:150, rowSpacing:300);
                1989-04-15  [SurfaceOrganicMatter].Incorporate(fraction: 0.55, depth: 0)
                1989-10-15  [Fertiliser].Apply(Amount: 45, Type: Fertiliser.Types.NO3N);
                1989-10-15  [Wheat].Sow(cultivar:PendletonDwarf, depth:30, population:150, rowSpacing:300);
                1991-04-15  [SurfaceOrganicMatter].Incorporate(fraction: 0.55, depth: 0)
                1991-10-15  [Fertiliser].Apply(Amount: 45, Type: Fertiliser.Types.NO3N);
                1991-10-15  [Wheat].Sow(cultivar:PendletonDwarf, depth:30, population:150, rowSpacing:300);
                1993-04-15  [SurfaceOrganicMatter].Incorporate(fraction: 0.55, depth: 0)
                1993-10-15  [Fertiliser].Apply(Amount: 45, Type: Fertiliser.Types.NO3N);
                1993-10-15  [Wheat].Sow(cultivar:PendletonDwarf, depth:30, population:150, rowSpacing:300);
                1995-04-15  [SurfaceOrganicMatter].Incorporate(fraction: 0.55, depth: 0)
                1995-10-15  [Fertiliser].Apply(Amount: 45, Type: Fertiliser.Types.NO3N);
                1995-10-15  [Wheat].Sow(cultivar:PendletonDwarf, depth:30, population:150, rowSpacing:300);
                1997-04-15  [SurfaceOrganicMatter].Incorporate(fraction: 0.55, depth: 0)
                1997-10-15  [Fertiliser].Apply(Amount: 45, Type: Fertiliser.Types.NO3N);
                1997-10-15  [Wheat].Sow(cultivar:PendletonDwarf, depth:30, population:150, rowSpacing:300);
                1999-04-15  [SurfaceOrganicMatter].Incorporate(fraction: 0.55, depth: 0)
                1999-10-15  [Fertiliser].Apply(Amount: 45, Type: Fertiliser.Types.NO3N);
                1999-10-15  [Wheat].Sow(cultivar:PendletonDwarf, depth:30, population:150, rowSpacing:300);
              Operations 3_sBN90
                1931-04-01  [SurfaceOrganicMatter].Incorporate(fraction: 0.6, depth: 200)
                1931-10-15  [Wheat].Sow(cultivar:PendletonTall, depth:30, population:100, rowSpacing:300);
                1933-04-01  [SurfaceOrganicMatter].Incorporate(fraction: 0.6, depth: 200)
                1933-10-15  [Wheat].Sow(cultivar:PendletonTall, depth:30, population:100, rowSpacing:300);
                1935-04-01  [SurfaceOrganicMatter].Incorporate(fraction: 0.6, depth: 200)
                1935-10-15  [Wheat].Sow(cultivar:PendletonTall, depth:30, population:100, rowSpacing:300);
                1937-04-01  [SurfaceOrganicMatter].Incorporate(fraction: 0.6, depth: 200)
                1937-10-15  [Wheat].Sow(cultivar:PendletonTall, depth:30, population:100, rowSpacing:300);
                1939-04-01  [SurfaceOrganicMatter].Incorporate(fraction: 0.6, depth: 200)
                1939-10-15  [Wheat].Sow(cultivar:PendletonTall, depth:30, population:100, rowSpacing:300);
                1941-04-01  [SurfaceOrganicMatter].Incorporate(fraction: 0.6, depth: 200)
                1941-10-15  [Wheat].Sow(cultivar:PendletonTall, depth:30, population:100, rowSpacing:300);
                1943-04-01  [SurfaceOrganicMatter].Incorporate(fraction: 0.6, depth: 200)
                1943-10-15  [Wheat].Sow(cultivar:PendletonTall, depth:30, population:100, rowSpacing:300);
                1945-04-01  [SurfaceOrganicMatter].Incorporate(fraction: 0.6, depth: 200)
                1945-10-15  [Wheat].Sow(cultivar:PendletonTall, depth:30, population:100, rowSpacing:300);
                1947-04-01  [SurfaceOrganicMatter].Incorporate(fraction: 0.6, depth: 200)
                1947-10-15  [Wheat].Sow(cultivar:PendletonTall, depth:30, population:100, rowSpacing:300);
                1949-04-01  [SurfaceOrganicMatter].Incorporate(fraction: 0.6, depth: 200)
                1949-10-15  [Wheat].Sow(cultivar:PendletonTall, depth:30, population:100, rowSpacing:300);
                1951-04-01  [SurfaceOrganicMatter].Incorporate(fraction: 0.6, depth: 200)
                1951-10-15  [Wheat].Sow(cultivar:PendletonTall, depth:30, population:100, rowSpacing:300);
                1953-04-01  [SurfaceOrganicMatter].Incorporate(fraction: 0.6, depth: 200)
                1953-10-15  [Wheat].Sow(cultivar:PendletonTall, depth:30, population:100, rowSpacing:300);
                1955-04-01  [SurfaceOrganicMatter].Incorporate(fraction: 0.6, depth: 200)
                1955-10-15  [Wheat].Sow(cultivar:PendletonTall, depth:30, population:100, rowSpacing:300);
                1957-04-01  [SurfaceOrganicMatter].Incorporate(fraction: 0.6, depth: 200)
                1957-10-15  [Wheat].Sow(cultivar:PendletonTall, depth:30, population:100, rowSpacing:300);
                1959-04-01  [SurfaceOrganicMatter].Incorporate(fraction: 0.6, depth: 200)
                1959-10-15  [Wheat].Sow(cultivar:PendletonTall, depth:30, population:100, rowSpacing:300);
                1961-04-01  [SurfaceOrganicMatter].Incorporate(fraction: 0.6, depth: 200)
                1961-10-15  [Wheat].Sow(cultivar:PendletonTall, depth:30, population:100, rowSpacing:300);
                1963-04-01  [SurfaceOrganicMatter].Incorporate(fraction: 0.6, depth: 200)
                1963-10-15  [Wheat].Sow(cultivar:PendletonTall, depth:30, population:100, rowSpacing:300);
                1965-04-01  [SurfaceOrganicMatter].Incorporate(fraction: 0.6, depth: 200)
                1965-10-15  [Wheat].Sow(cultivar:PendletonDwarf, depth:30, population:150, rowSpacing:300);
                1967-10-15  [Fertiliser].Apply(Amount: 90, Type: Fertiliser.Types.NO3N);
                1967-10-15  [Wheat].Sow(cultivar:PendletonDwarf, depth:30, population:150, rowSpacing:300);
                1969-10-15  [Fertiliser].Apply(Amount: 90, Type: Fertiliser.Types.NO3N);
                1969-10-15  [Wheat].Sow(cultivar:PendletonDwarf, depth:30, population:150, rowSpacing:300);
                1971-10-15  [Fertiliser].Apply(Amount: 90, Type: Fertiliser.Types.NO3N);
                1971-10-15  [Wheat].Sow(cultivar:PendletonDwarf, depth:30, population:150, rowSpacing:300);
                1973-10-15  [Fertiliser].Apply(Amount: 90, Type: Fertiliser.Types.NO3N);
                1973-10-15  [Wheat].Sow(cultivar:PendletonDwarf, depth:30, population:150, rowSpacing:300);
                1975-10-15  [Fertiliser].Apply(Amount: 90, Type: Fertiliser.Types.NO3N);
                1975-10-15  [Wheat].Sow(cultivar:PendletonDwarf, depth:30, population:150, rowSpacing:300);
                1977-10-15  [Fertiliser].Apply(Amount: 90, Type: Fertiliser.Types.NO3N);
                1977-10-15  [Wheat].Sow(cultivar:PendletonDwarf, depth:30, population:150, rowSpacing:300);
                1979-10-15  [Fertiliser].Apply(Amount: 90, Type: Fertiliser.Types.NO3N);
                1979-10-15  [Wheat].Sow(cultivar:PendletonDwarf, depth:30, population:150, rowSpacing:300);
                1981-04-15  [SurfaceOrganicMatter].Incorporate(fraction: 0.55, depth: 0)
                1981-10-15  [Fertiliser].Apply(Amount: 90, Type: Fertiliser.Types.NO3N);
                1981-10-15  [Wheat].Sow(cultivar:PendletonDwarf, depth:30, population:150, rowSpacing:300);
                1983-04-15  [SurfaceOrganicMatter].Incorporate(fraction: 0.55, depth: 0)
                1983-10-15  [Fertiliser].Apply(Amount: 90, Type: Fertiliser.Types.NO3N);
                1983-10-15  [Wheat].Sow(cultivar:PendletonDwarf, depth:30, population:150, rowSpacing:300);
                1985-04-15  [SurfaceOrganicMatter].Incorporate(fraction: 0.55, depth: 0)
                1985-10-15  [Fertiliser].Apply(Amount: 90, Type: Fertiliser.Types.NO3N);
                1985-10-15  [Wheat].Sow(cultivar:PendletonDwarf, depth:30, population:150, rowSpacing:300);
                1987-04-15  [SurfaceOrganicMatter].Incorporate(fraction: 0.55, depth: 0)
                1987-10-15  [Fertiliser].Apply(Amount: 90, Type: Fertiliser.Types.NO3N);
                1987-10-15  [Wheat].Sow(cultivar:PendletonDwarf, depth:30, population:150, rowSpacing:300);
                1989-04-15  [SurfaceOrganicMatter].Incorporate(fraction: 0.55, depth: 0)
                1989-10-15  [Fertiliser].Apply(Amount: 90, Type: Fertiliser.Types.NO3N);
                1989-10-15  [Wheat].Sow(cultivar:PendletonDwarf, depth:30, population:150, rowSpacing:300);
                1991-04-15  [SurfaceOrganicMatter].Incorporate(fraction: 0.55, depth: 0)
                1991-10-15  [Fertiliser].Apply(Amount: 90, Type: Fertiliser.Types.NO3N);
                1991-10-15  [Wheat].Sow(cultivar:PendletonDwarf, depth:30, population:150, rowSpacing:300);
                1993-04-15  [SurfaceOrganicMatter].Incorporate(fraction: 0.55, depth: 0)
                1993-10-15  [Fertiliser].Apply(Amount: 90, Type: Fertiliser.Types.NO3N);
                1993-10-15  [Wheat].Sow(cultivar:PendletonDwarf, depth:30, population:150, rowSpacing:300);
                1995-04-15  [SurfaceOrganicMatter].Incorporate(fraction: 0.55, depth: 0)
                1995-10-15  [Fertiliser].Apply(Amount: 90, Type: Fertiliser.Types.NO3N);
                1995-10-15  [Wheat].Sow(cultivar:PendletonDwarf, depth:30, population:150, rowSpacing:300);
                1997-04-15  [SurfaceOrganicMatter].Incorporate(fraction: 0.55, depth: 0)
                1997-10-15  [Fertiliser].Apply(Amount: 90, Type: Fertiliser.Types.NO3N);
                1997-10-15  [Wheat].Sow(cultivar:PendletonDwarf, depth:30, population:150, rowSpacing:300);
                1999-04-15  [SurfaceOrganicMatter].Incorporate(fraction: 0.55, depth: 0)
                1999-10-15  [Fertiliser].Apply(Amount: 90, Type: Fertiliser.Types.NO3N);
                1999-10-15  [Wheat].Sow(cultivar:PendletonDwarf, depth:30, population:150, rowSpacing:300);
              Operations 4_nBN45
                1931-08-15  [SurfaceOrganicMatter].Incorporate(fraction: 0.6, depth: 200)
                1931-10-15  [Fertiliser].Apply(Amount: 34, Type: Fertiliser.Types.NO3N);
                1931-10-15  [Wheat].Sow(cultivar:PendletonTall, depth:30, population:100, rowSpacing:300);
                1933-08-15  [SurfaceOrganicMatter].Incorporate(fraction: 0.6, depth: 200)
                1933-10-15  [Fertiliser].Apply(Amount: 34, Type: Fertiliser.Types.NO3N);
                1933-10-15  [Wheat].Sow(cultivar:PendletonTall, depth:30, population:100, rowSpacing:300);
                1935-08-15  [SurfaceOrganicMatter].Incorporate(fraction: 0.6, depth: 200)
                1935-10-15  [Fertiliser].Apply(Amount: 34, Type: Fertiliser.Types.NO3N);
                1935-10-15  [Wheat].Sow(cultivar:PendletonTall, depth:30, population:100, rowSpacing:300);
                1937-08-15  [SurfaceOrganicMatter].Incorporate(fraction: 0.6, depth: 200)
                1937-10-15  [Fertiliser].Apply(Amount: 34, Type: Fertiliser.Types.NO3N);
                1937-10-15  [Wheat].Sow(cultivar:PendletonTall, depth:30, population:100, rowSpacing:300);
                1939-08-15  [SurfaceOrganicMatter].Incorporate(fraction: 0.6, depth: 200)
                1939-10-15  [Fertiliser].Apply(Amount: 34, Type: Fertiliser.Types.NO3N);
                1939-10-15  [Wheat].Sow(cultivar:PendletonTall, depth:30, population:100, rowSpacing:300);
                1941-08-15  [SurfaceOrganicMatter].Incorporate(fraction: 0.6, depth: 200)
                1941-10-15  [Fertiliser].Apply(Amount: 34, Type: Fertiliser.Types.NO3N);
                1941-10-15  [Wheat].Sow(cultivar:PendletonTall, depth:30, population:100, rowSpacing:300);
                1943-08-15  [SurfaceOrganicMatter].Incorporate(fraction: 0.6, depth: 200)
                1943-10-15  [Fertiliser].Apply(Amount: 34, Type: Fertiliser.Types.NO3N);
                1943-10-15  [Wheat].Sow(cultivar:PendletonTall, depth:30, population:100, rowSpacing:300);
                1945-08-15  [SurfaceOrganicMatter].Incorporate(fraction: 0.6, depth: 200)
                1945-10-15  [Fertiliser].Apply(Amount: 34, Type: Fertiliser.Types.NO3N);
                1945-10-15  [Wheat].Sow(cultivar:PendletonTall, depth:30, population:100, rowSpacing:300);
                1947-08-15  [SurfaceOrganicMatter].Incorporate(fraction: 0.6, depth: 200)
                1947-10-15  [Fertiliser].Apply(Amount: 34, Type: Fertiliser.Types.NO3N);
                1947-10-15  [Wheat].Sow(cultivar:PendletonTall, depth:30, population:100, rowSpacing:300);
                1949-08-15  [SurfaceOrganicMatter].Incorporate(fraction: 0.6, depth: 200)
                1949-10-15  [Fertiliser].Apply(Amount: 34, Type: Fertiliser.Types.NO3N);
                1949-10-15  [Wheat].Sow(cultivar:PendletonTall, depth:30, population:100, rowSpacing:300);
                1951-08-15  [SurfaceOrganicMatter].Incorporate(fraction: 0.6, depth: 200)
                1951-10-15  [Fertiliser].Apply(Amount: 34, Type: Fertiliser.Types.NO3N);
                1951-10-15  [Wheat].Sow(cultivar:PendletonTall, depth:30, population:100, rowSpacing:300);
                1953-08-15  [SurfaceOrganicMatter].Incorporate(fraction: 0.6, depth: 200)
                1953-10-15  [Fertiliser].Apply(Amount: 34, Type: Fertiliser.Types.NO3N);
                1953-10-15  [Wheat].Sow(cultivar:PendletonTall, depth:30, population:100, rowSpacing:300);
                1955-08-15  [SurfaceOrganicMatter].Incorporate(fraction: 0.6, depth: 200)
                1955-10-15  [Fertiliser].Apply(Amount: 34, Type: Fertiliser.Types.NO3N);
                1955-10-15  [Wheat].Sow(cultivar:PendletonTall, depth:30, population:100, rowSpacing:300);
                1957-08-15  [SurfaceOrganicMatter].Incorporate(fraction: 0.6, depth: 200)
                1957-10-15  [Fertiliser].Apply(Amount: 34, Type: Fertiliser.Types.NO3N);
                1957-10-15  [Wheat].Sow(cultivar:PendletonTall, depth:30, population:100, rowSpacing:300);
                1959-08-15  [SurfaceOrganicMatter].Incorporate(fraction: 0.6, depth: 200)
                1959-10-15  [Fertiliser].Apply(Amount: 34, Type: Fertiliser.Types.NO3N);
                1959-10-15  [Wheat].Sow(cultivar:PendletonTall, depth:30, population:100, rowSpacing:300);
                1961-08-15  [SurfaceOrganicMatter].Incorporate(fraction: 0.6, depth: 200)
                1961-10-15  [Fertiliser].Apply(Amount: 34, Type: Fertiliser.Types.NO3N);
                1961-10-15  [Wheat].Sow(cultivar:PendletonTall, depth:30, population:100, rowSpacing:300);
                1963-08-15  [SurfaceOrganicMatter].Incorporate(fraction: 0.6, depth: 200)
                1963-10-15  [Fertiliser].Apply(Amount: 34, Type: Fertiliser.Types.NO3N);
                1963-10-15  [Wheat].Sow(cultivar:PendletonTall, depth:30, population:100, rowSpacing:300);
                1965-08-15  [SurfaceOrganicMatter].Incorporate(fraction: 0.6, depth: 200)
                1965-10-15  [Fertiliser].Apply(Amount: 34, Type: Fertiliser.Types.NO3N);
                1965-10-15  [Wheat].Sow(cultivar:PendletonDwarf, depth:30, population:150, rowSpacing:300);
                1967-10-15  [Fertiliser].Apply(Amount: 45, Type: Fertiliser.Types.NO3N);
                1967-10-15  [Wheat].Sow(cultivar:PendletonDwarf, depth:30, population:150, rowSpacing:300);
                1969-10-15  [Fertiliser].Apply(Amount: 45, Type: Fertiliser.Types.NO3N);
                1969-10-15  [Wheat].Sow(cultivar:PendletonDwarf, depth:30, population:150, rowSpacing:300);
                1971-10-15  [Fertiliser].Apply(Amount: 45, Type: Fertiliser.Types.NO3N);
                1971-10-15  [Wheat].Sow(cultivar:PendletonDwarf, depth:30, population:150, rowSpacing:300);
                1973-10-15  [Fertiliser].Apply(Amount: 45, Type: Fertiliser.Types.NO3N);
                1973-10-15  [Wheat].Sow(cultivar:PendletonDwarf, depth:30, population:150, rowSpacing:300);
                1975-10-15  [Fertiliser].Apply(Amount: 45, Type: Fertiliser.Types.NO3N);
                1975-10-15  [Wheat].Sow(cultivar:PendletonDwarf, depth:30, population:150, rowSpacing:300);
                1977-10-15  [Fertiliser].Apply(Amount: 45, Type: Fertiliser.Types.NO3N);
                1977-10-15  [Wheat].Sow(cultivar:PendletonDwarf, depth:30, population:150, rowSpacing:300);
                1979-10-15  [Fertiliser].Apply(Amount: 45, Type: Fertiliser.Types.NO3N);
                1979-10-15  [Wheat].Sow(cultivar:PendletonDwarf, depth:30, population:150, rowSpacing:300);
                1981-10-15  [Fertiliser].Apply(Amount: 45, Type: Fertiliser.Types.NO3N);
                1981-10-15  [Wheat].Sow(cultivar:PendletonDwarf, depth:30, population:150, rowSpacing:300);
                1983-10-15  [Fertiliser].Apply(Amount: 45, Type: Fertiliser.Types.NO3N);
                1983-10-15  [Wheat].Sow(cultivar:PendletonDwarf, depth:30, population:150, rowSpacing:300);
                1985-10-15  [Fertiliser].Apply(Amount: 45, Type: Fertiliser.Types.NO3N);
                1985-10-15  [Wheat].Sow(cultivar:PendletonDwarf, depth:30, population:150, rowSpacing:300);
                1987-10-15  [Fertiliser].Apply(Amount: 45, Type: Fertiliser.Types.NO3N);
                1987-10-15  [Wheat].Sow(cultivar:PendletonDwarf, depth:30, population:150, rowSpacing:300);
                1989-10-15  [Fertiliser].Apply(Amount: 45, Type: Fertiliser.Types.NO3N);
                1989-10-15  [Wheat].Sow(cultivar:PendletonDwarf, depth:30, population:150, rowSpacing:300);
                1991-10-15  [Fertiliser].Apply(Amount: 45, Type: Fertiliser.Types.NO3N);
                1991-10-15  [Wheat].Sow(cultivar:PendletonDwarf, depth:30, population:150, rowSpacing:300);
                1993-10-15  [Fertiliser].Apply(Amount: 45, Type: Fertiliser.Types.NO3N);
                1993-10-15  [Wheat].Sow(cultivar:PendletonDwarf, depth:30, population:150, rowSpacing:300);
                1995-10-15  [Fertiliser].Apply(Amount: 45, Type: Fertiliser.Types.NO3N);
                1995-10-15  [Wheat].Sow(cultivar:PendletonDwarf, depth:30, population:150, rowSpacing:300);
                1997-10-15  [Fertiliser].Apply(Amount: 45, Type: Fertiliser.Types.NO3N);
                1997-10-15  [Wheat].Sow(cultivar:PendletonDwarf, depth:30, population:150, rowSpacing:300);
                1999-10-15  [Fertiliser].Apply(Amount: 45, Type: Fertiliser.Types.NO3N);
                1999-10-15  [Wheat].Sow(cultivar:PendletonDwarf, depth:30, population:150, rowSpacing:300);
              Operations 5_nBN90
                1931-04-01  [SurfaceOrganicMatter].Incorporate(fraction: 0.6, depth: 200)
                1931-10-15  [Fertiliser].Apply(Amount: 34, Type: Fertiliser.Types.NO3N);
                1931-10-15  [Wheat].Sow(cultivar:PendletonTall, depth:30, population:100, rowSpacing:300);
                1933-04-01  [SurfaceOrganicMatter].Incorporate(fraction: 0.6, depth: 200)
                1933-10-15  [Fertiliser].Apply(Amount: 34, Type: Fertiliser.Types.NO3N);
                1933-10-15  [Wheat].Sow(cultivar:PendletonTall, depth:30, population:100, rowSpacing:300);
                1935-04-01  [SurfaceOrganicMatter].Incorporate(fraction: 0.6, depth: 200)
                1935-10-15  [Fertiliser].Apply(Amount: 34, Type: Fertiliser.Types.NO3N);
                1935-10-15  [Wheat].Sow(cultivar:PendletonTall, depth:30, population:100, rowSpacing:300);
                1937-04-01  [SurfaceOrganicMatter].Incorporate(fraction: 0.6, depth: 200)
                1937-10-15  [Fertiliser].Apply(Amount: 34, Type: Fertiliser.Types.NO3N);
                1937-10-15  [Wheat].Sow(cultivar:PendletonTall, depth:30, population:100, rowSpacing:300);
                1939-04-01  [SurfaceOrganicMatter].Incorporate(fraction: 0.6, depth: 200)
                1939-10-15  [Fertiliser].Apply(Amount: 34, Type: Fertiliser.Types.NO3N);
                1939-10-15  [Wheat].Sow(cultivar:PendletonTall, depth:30, population:100, rowSpacing:300);
                1941-04-01  [SurfaceOrganicMatter].Incorporate(fraction: 0.6, depth: 200)
                1941-10-15  [Fertiliser].Apply(Amount: 34, Type: Fertiliser.Types.NO3N);
                1941-10-15  [Wheat].Sow(cultivar:PendletonTall, depth:30, population:100, rowSpacing:300);
                1943-04-01  [SurfaceOrganicMatter].Incorporate(fraction: 0.6, depth: 200)
                1943-10-15  [Fertiliser].Apply(Amount: 34, Type: Fertiliser.Types.NO3N);
                1943-10-15  [Wheat].Sow(cultivar:PendletonTall, depth:30, population:100, rowSpacing:300);
                1945-04-01  [SurfaceOrganicMatter].Incorporate(fraction: 0.6, depth: 200)
                1945-10-15  [Fertiliser].Apply(Amount: 34, Type: Fertiliser.Types.NO3N);
                1945-10-15  [Wheat].Sow(cultivar:PendletonTall, depth:30, population:100, rowSpacing:300);
                1947-04-01  [SurfaceOrganicMatter].Incorporate(fraction: 0.6, depth: 200)
                1947-10-15  [Fertiliser].Apply(Amount: 34, Type: Fertiliser.Types.NO3N);
                1947-10-15  [Wheat].Sow(cultivar:PendletonTall, depth:30, population:100, rowSpacing:300);
                1949-04-01  [SurfaceOrganicMatter].Incorporate(fraction: 0.6, depth: 200)
                1949-10-15  [Fertiliser].Apply(Amount: 34, Type: Fertiliser.Types.NO3N);
                1949-10-15  [Wheat].Sow(cultivar:PendletonTall, depth:30, population:100, rowSpacing:300);
                1951-04-01  [SurfaceOrganicMatter].Incorporate(fraction: 0.6, depth: 200)
                1951-10-15  [Fertiliser].Apply(Amount: 34, Type: Fertiliser.Types.NO3N);
                1951-10-15  [Wheat].Sow(cultivar:PendletonTall, depth:30, population:100, rowSpacing:300);
                1953-04-01  [SurfaceOrganicMatter].Incorporate(fraction: 0.6, depth: 200)
                1953-10-15  [Fertiliser].Apply(Amount: 34, Type: Fertiliser.Types.NO3N);
                1953-10-15  [Wheat].Sow(cultivar:PendletonTall, depth:30, population:100, rowSpacing:300);
                1955-04-01  [SurfaceOrganicMatter].Incorporate(fraction: 0.6, depth: 200)
                1955-10-15  [Fertiliser].Apply(Amount: 34, Type: Fertiliser.Types.NO3N);
                1955-10-15  [Wheat].Sow(cultivar:PendletonTall, depth:30, population:100, rowSpacing:300);
                1957-04-01  [SurfaceOrganicMatter].Incorporate(fraction: 0.6, depth: 200)
                1957-10-15  [Fertiliser].Apply(Amount: 34, Type: Fertiliser.Types.NO3N);
                1957-10-15  [Wheat].Sow(cultivar:PendletonTall, depth:30, population:100, rowSpacing:300);
                1959-04-01  [SurfaceOrganicMatter].Incorporate(fraction: 0.6, depth: 200)
                1959-10-15  [Fertiliser].Apply(Amount: 34, Type: Fertiliser.Types.NO3N);
                1959-10-15  [Wheat].Sow(cultivar:PendletonTall, depth:30, population:100, rowSpacing:300);
                1961-04-01  [SurfaceOrganicMatter].Incorporate(fraction: 0.6, depth: 200)
                1961-10-15  [Fertiliser].Apply(Amount: 34, Type: Fertiliser.Types.NO3N);
                1961-10-15  [Wheat].Sow(cultivar:PendletonTall, depth:30, population:100, rowSpacing:300);
                1963-04-01  [SurfaceOrganicMatter].Incorporate(fraction: 0.6, depth: 200)
                1963-10-15  [Fertiliser].Apply(Amount: 34, Type: Fertiliser.Types.NO3N);
                1963-10-15  [Wheat].Sow(cultivar:PendletonTall, depth:30, population:100, rowSpacing:300);
                1965-04-01  [SurfaceOrganicMatter].Incorporate(fraction: 0.6, depth: 200)
                1965-10-15  [Fertiliser].Apply(Amount: 34, Type: Fertiliser.Types.NO3N);
                1965-10-15  [Wheat].Sow(cultivar:PendletonDwarf, depth:30, population:150, rowSpacing:300);
                1967-10-15  [Fertiliser].Apply(Amount: 90, Type: Fertiliser.Types.NO3N);
                1967-10-15  [Wheat].Sow(cultivar:PendletonDwarf, depth:30, population:150, rowSpacing:300);
                1969-10-15  [Fertiliser].Apply(Amount: 90, Type: Fertiliser.Types.NO3N);
                1969-10-15  [Wheat].Sow(cultivar:PendletonDwarf, depth:30, population:150, rowSpacing:300);
                1971-10-15  [Fertiliser].Apply(Amount: 90, Type: Fertiliser.Types.NO3N);
                1971-10-15  [Wheat].Sow(cultivar:PendletonDwarf, depth:30, population:150, rowSpacing:300);
                1973-10-15  [Fertiliser].Apply(Amount: 90, Type: Fertiliser.Types.NO3N);
                1973-10-15  [Wheat].Sow(cultivar:PendletonDwarf, depth:30, population:150, rowSpacing:300);
                1975-10-15  [Fertiliser].Apply(Amount: 90, Type: Fertiliser.Types.NO3N);
                1975-10-15  [Wheat].Sow(cultivar:PendletonDwarf, depth:30, population:150, rowSpacing:300);
                1977-10-15  [Fertiliser].Apply(Amount: 90, Type: Fertiliser.Types.NO3N);
                1977-10-15  [Wheat].Sow(cultivar:PendletonDwarf, depth:30, population:150, rowSpacing:300);
                1979-10-15  [Fertiliser].Apply(Amount: 90, Type: Fertiliser.Types.NO3N);
                1979-10-15  [Wheat].Sow(cultivar:PendletonDwarf, depth:30, population:150, rowSpacing:300);
                1981-10-15  [Fertiliser].Apply(Amount: 90, Type: Fertiliser.Types.NO3N);
                1981-10-15  [Wheat].Sow(cultivar:PendletonDwarf, depth:30, population:150, rowSpacing:300);
                1983-10-15  [Fertiliser].Apply(Amount: 90, Type: Fertiliser.Types.NO3N);
                1983-10-15  [Wheat].Sow(cultivar:PendletonDwarf, depth:30, population:150, rowSpacing:300);
                1985-10-15  [Fertiliser].Apply(Amount: 90, Type: Fertiliser.Types.NO3N);
                1985-10-15  [Wheat].Sow(cultivar:PendletonDwarf, depth:30, population:150, rowSpacing:300);
                1987-10-15  [Fertiliser].Apply(Amount: 90, Type: Fertiliser.Types.NO3N);
                1987-10-15  [Wheat].Sow(cultivar:PendletonDwarf, depth:30, population:150, rowSpacing:300);
                1989-10-15  [Fertiliser].Apply(Amount: 90, Type: Fertiliser.Types.NO3N);
                1989-10-15  [Wheat].Sow(cultivar:PendletonDwarf, depth:30, population:150, rowSpacing:300);
                1991-10-15  [Fertiliser].Apply(Amount: 90, Type: Fertiliser.Types.NO3N);
                1991-10-15  [Wheat].Sow(cultivar:PendletonDwarf, depth:30, population:150, rowSpacing:300);
                1993-10-15  [Fertiliser].Apply(Amount: 90, Type: Fertiliser.Types.NO3N);
                1993-10-15  [Wheat].Sow(cultivar:PendletonDwarf, depth:30, population:150, rowSpacing:300);
                1995-10-15  [Fertiliser].Apply(Amount: 90, Type: Fertiliser.Types.NO3N);
                1995-10-15  [Wheat].Sow(cultivar:PendletonDwarf, depth:30, population:150, rowSpacing:300);
                1997-10-15  [Fertiliser].Apply(Amount: 90, Type: Fertiliser.Types.NO3N);
                1997-10-15  [Wheat].Sow(cultivar:PendletonDwarf, depth:30, population:150, rowSpacing:300);
                1999-10-15  [Fertiliser].Apply(Amount: 90, Type: Fertiliser.Types.NO3N);
                1999-10-15  [Wheat].Sow(cultivar:PendletonDwarf, depth:30, population:150, rowSpacing:300);
              Operations 9_nBPv
                1931-04-15  [SurfaceOrganicMatter].Add(mass: 2000, N: 46, P:0.0, type: "wheat", name: "");
                1931-10-15  [Wheat].Sow(cultivar:PendletonTall, depth:30, population:100, rowSpacing:300);
                1933-04-15  [SurfaceOrganicMatter].Add(mass: 2000, N: 46, P:0.0, type: "wheat", name: "");
                1933-10-15  [Wheat].Sow(cultivar:PendletonTall, depth:30, population:100, rowSpacing:300);
                1935-04-15  [SurfaceOrganicMatter].Add(mass: 2000, N: 46, P:0.0, type: "wheat", name: "");
                1935-10-15  [Wheat].Sow(cultivar:PendletonTall, depth:30, population:100, rowSpacing:300);
                1937-04-15  [SurfaceOrganicMatter].Add(mass: 2000, N: 46, P:0.0, type: "wheat", name: "");
                1937-10-15  [Wheat].Sow(cultivar:PendletonTall, depth:30, population:100, rowSpacing:300);
                1939-04-15  [SurfaceOrganicMatter].Add(mass: 2000, N: 46, P:0.0, type: "wheat", name: "");
                1939-10-15  [Wheat].Sow(cultivar:PendletonTall, depth:30, population:100, rowSpacing:300);
                1941-04-15  [SurfaceOrganicMatter].Add(mass: 2000, N: 46, P:0.0, type: "wheat", name: "");
                1941-10-15  [Wheat].Sow(cultivar:PendletonTall, depth:30, population:100, rowSpacing:300);
                1943-04-15  [SurfaceOrganicMatter].Add(mass: 2000, N: 46, P:0.0, type: "wheat", name: "");
                1943-10-15  [Wheat].Sow(cultivar:PendletonTall, depth:30, population:100, rowSpacing:300);
                1945-04-15  [SurfaceOrganicMatter].Add(mass: 2000, N: 46, P:0.0, type: "wheat", name: "");
                1945-10-15  [Wheat].Sow(cultivar:PendletonTall, depth:30, population:100, rowSpacing:300);
                1947-04-15  [SurfaceOrganicMatter].Add(mass: 2000, N: 46, P:0.0, type: "wheat", name: "");
                1947-10-15  [Wheat].Sow(cultivar:PendletonTall, depth:30, population:100, rowSpacing:300);
                1949-04-15  [SurfaceOrganicMatter].Add(mass: 2000, N: 46, P:0.0, type: "wheat", name: "");
                1949-10-15  [Wheat].Sow(cultivar:PendletonTall, depth:30, population:100, rowSpacing:300);
                1951-04-15  [SurfaceOrganicMatter].Add(mass: 2000, N: 46, P:0.0, type: "wheat", name: "");
                1951-10-15  [Wheat].Sow(cultivar:PendletonTall, depth:30, population:100, rowSpacing:300);
                1953-04-15  [SurfaceOrganicMatter].Add(mass: 2000, N: 34, P:0.0, type: "wheat", name: "");
                1953-10-15  [Wheat].Sow(cultivar:PendletonTall, depth:30, population:100, rowSpacing:300);
                1955-04-15  [SurfaceOrganicMatter].Add(mass: 2000, N: 34, P:0.0, type: "wheat", name: "");
                1955-10-15  [Wheat].Sow(cultivar:PendletonTall, depth:30, population:100, rowSpacing:300);
                1957-04-15  [SurfaceOrganicMatter].Add(mass: 2000, N: 34, P:0.0, type: "wheat", name: "");
                1957-10-15  [Wheat].Sow(cultivar:PendletonTall, depth:30, population:100, rowSpacing:300);
                1959-04-15  [SurfaceOrganicMatter].Add(mass: 2000, N: 34, P:0.0, type: "wheat", name: "");
                1959-10-15  [Wheat].Sow(cultivar:PendletonTall, depth:30, population:100, rowSpacing:300);
                1961-04-15  [SurfaceOrganicMatter].Add(mass: 2000, N: 34, P:0.0, type: "wheat", name: "");
                1961-10-15  [Wheat].Sow(cultivar:PendletonTall, depth:30, population:100, rowSpacing:300);
                1963-04-15  [SurfaceOrganicMatter].Add(mass: 2000, N: 34, P:0.0, type: "wheat", name: "");
                1963-10-15  [Wheat].Sow(cultivar:PendletonTall, depth:30, population:100, rowSpacing:300);
                1965-04-15  [SurfaceOrganicMatter].Add(mass: 2000, N: 34, P:0.0, type: "wheat", name: "");
                1965-10-15  [Wheat].Sow(cultivar:PendletonDwarf, depth:30, population:150, rowSpacing:300);
                1967-04-15  [SurfaceOrganicMatter].Add(mass: 2000, N: 34, P:0.0, type: "wheat", name: "");
                1967-10-15  [Wheat].Sow(cultivar:PendletonDwarf, depth:30, population:150, rowSpacing:300);
                1969-04-15  [SurfaceOrganicMatter].Add(mass: 2000, N: 34, P:0.0, type: "wheat", name: "");
                1969-10-15  [Wheat].Sow(cultivar:PendletonDwarf, depth:30, population:150, rowSpacing:300);
                1971-04-15  [SurfaceOrganicMatter].Add(mass: 2000, N: 34, P:0.0, type: "wheat", name: "");
                1971-10-15  [Wheat].Sow(cultivar:PendletonDwarf, depth:30, population:150, rowSpacing:300);
                1973-04-15  [SurfaceOrganicMatter].Add(mass: 2000, N: 34, P:0.0, type: "wheat", name: "");
                1973-10-15  [Wheat].Sow(cultivar:PendletonDwarf, depth:30, population:150, rowSpacing:300);
                1975-04-15  [SurfaceOrganicMatter].Add(mass: 2000, N: 34, P:0.0, type: "wheat", name: "");
                1975-10-15  [Wheat].Sow(cultivar:PendletonDwarf, depth:30, population:150, rowSpacing:300);
                1977-04-15  [SurfaceOrganicMatter].Add(mass: 2000, N: 34, P:0.0, type: "wheat", name: "");
                1977-10-15  [Wheat].Sow(cultivar:PendletonDwarf, depth:30, population:150, rowSpacing:300);
                1979-04-15  [SurfaceOrganicMatter].Add(mass: 2000, N: 34, P:0.0, type: "wheat", name: "");
                1979-10-15  [Wheat].Sow(cultivar:PendletonDwarf, depth:30, population:150, rowSpacing:300);
                1981-04-15  [SurfaceOrganicMatter].Add(mass: 2000, N: 34, P:0.0, type: "wheat", name: "");
                1981-10-15  [Wheat].Sow(cultivar:PendletonDwarf, depth:30, population:150, rowSpacing:300);
                1983-04-15  [SurfaceOrganicMatter].Add(mass: 2000, N: 34, P:0.0, type: "wheat", name: "");
                1983-10-15  [Wheat].Sow(cultivar:PendletonDwarf, depth:30, population:150, rowSpacing:300);
                1985-04-15  [SurfaceOrganicMatter].Add(mass: 2000, N: 34, P:0.0, type: "wheat", name: "");
                1985-10-15  [Wheat].Sow(cultivar:PendletonDwarf, depth:30, population:150, rowSpacing:300);
                1987-04-15  [SurfaceOrganicMatter].Add(mass: 2000, N: 34, P:0.0, type: "wheat", name: "");
                1987-10-15  [Wheat].Sow(cultivar:PendletonDwarf, depth:30, population:150, rowSpacing:300);
                1989-04-15  [SurfaceOrganicMatter].Add(mass: 2000, N: 34, P:0.0, type: "wheat", name: "");
                1989-10-15  [Wheat].Sow(cultivar:PendletonDwarf, depth:30, population:150, rowSpacing:300);
                1991-04-15  [SurfaceOrganicMatter].Add(mass: 2000, N: 34, P:0.0, type: "wheat", name: "");
                1991-10-15  [Wheat].Sow(cultivar:PendletonDwarf, depth:30, population:150, rowSpacing:300);
                1993-04-15  [SurfaceOrganicMatter].Add(mass: 2000, N: 34, P:0.0, type: "wheat", name: "");
                1993-10-15  [Wheat].Sow(cultivar:PendletonDwarf, depth:30, population:150, rowSpacing:300);
                1995-04-15  [SurfaceOrganicMatter].Add(mass: 2000, N: 34, P:0.0, type: "wheat", name: "");
                1995-10-15  [Wheat].Sow(cultivar:PendletonDwarf, depth:30, population:150, rowSpacing:300);
                1997-04-15  [SurfaceOrganicMatter].Add(mass: 2000, N: 34, P:0.0, type: "wheat", name: "");
                1997-10-15  [Wheat].Sow(cultivar:PendletonDwarf, depth:30, population:150, rowSpacing:300);
                1999-04-15  [SurfaceOrganicMatter].Add(mass: 2000, N: 34, P:0.0, type: "wheat", name: "");
                1999-10-15  [Wheat].Sow(cultivar:PendletonDwarf, depth:30, population:150, rowSpacing:300);
              Operations 8_nBMn
                1931-04-15  [SurfaceOrganicMatter].Add(mass: 11379, N: 111, P:0.0, type: "wheat", name: "");
                1931-10-15  [Wheat].Sow(cultivar:PendletonTall, depth:30, population:100, rowSpacing:300);
                1933-04-15  [SurfaceOrganicMatter].Add(mass: 11379, N: 111, P:0.0, type: "wheat", name: "");
                1933-10-15  [Wheat].Sow(cultivar:PendletonTall, depth:30, population:100, rowSpacing:300);
                1935-04-15  [SurfaceOrganicMatter].Add(mass: 11379, N: 111, P:0.0, type: "wheat", name: "");
                1935-10-15  [Wheat].Sow(cultivar:PendletonTall, depth:30, population:100, rowSpacing:300);
                1937-04-15  [SurfaceOrganicMatter].Add(mass: 11379, N: 111, P:0.0, type: "wheat", name: "");
                1937-10-15  [Wheat].Sow(cultivar:PendletonTall, depth:30, population:100, rowSpacing:300);
                1939-04-15  [SurfaceOrganicMatter].Add(mass: 11379, N: 111, P:0.0, type: "wheat", name: "");
                1939-10-15  [Wheat].Sow(cultivar:PendletonTall, depth:30, population:100, rowSpacing:300);
                1941-04-15  [SurfaceOrganicMatter].Add(mass: 11379, N: 111, P:0.0, type: "wheat", name: "");
                1941-10-15  [Wheat].Sow(cultivar:PendletonTall, depth:30, population:100, rowSpacing:300);
                1943-10-15  [Wheat].Sow(cultivar:PendletonTall, depth:30, population:100, rowSpacing:300);
                1945-10-15  [Wheat].Sow(cultivar:PendletonTall, depth:30, population:100, rowSpacing:300);
                1947-10-15  [Wheat].Sow(cultivar:PendletonTall, depth:30, population:100, rowSpacing:300);
                1949-04-15  [SurfaceOrganicMatter].Add(mass: 11379, N: 56, P:0.0, type: "wheat", name: "");
                1949-10-15  [Wheat].Sow(cultivar:PendletonTall, depth:30, population:100, rowSpacing:300);
                1951-04-15  [SurfaceOrganicMatter].Add(mass: 11379, N: 56, P:0.0, type: "wheat", name: "");
                1951-10-15  [Wheat].Sow(cultivar:PendletonTall, depth:30, population:100, rowSpacing:300);
                1953-04-15  [SurfaceOrganicMatter].Add(mass: 11379, N: 111, P:0.0, type: "wheat", name: "");
                1953-10-15  [Wheat].Sow(cultivar:PendletonTall, depth:30, population:100, rowSpacing:300);
                1955-04-15  [SurfaceOrganicMatter].Add(mass: 11379, N: 111, P:0.0, type: "wheat", name: "");
                1955-10-15  [Wheat].Sow(cultivar:PendletonTall, depth:30, population:100, rowSpacing:300);
                1957-04-15  [SurfaceOrganicMatter].Add(mass: 11379, N: 111, P:0.0, type: "wheat", name: "");
                1957-10-15  [Wheat].Sow(cultivar:PendletonTall, depth:30, population:100, rowSpacing:300);
                1959-04-15  [SurfaceOrganicMatter].Add(mass: 11379, N: 111, P:0.0, type: "wheat", name: "");
                1959-10-15  [Wheat].Sow(cultivar:PendletonTall, depth:30, population:100, rowSpacing:300);
                1961-04-15  [SurfaceOrganicMatter].Add(mass: 11379, N: 111, P:0.0, type: "wheat", name: "");
                1961-10-15  [Wheat].Sow(cultivar:PendletonTall, depth:30, population:100, rowSpacing:300);
                1963-04-15  [SurfaceOrganicMatter].Add(mass: 11379, N: 111, P:0.0, type: "wheat", name: "");
                1963-10-15  [Wheat].Sow(cultivar:PendletonTall, depth:30, population:100, rowSpacing:300);
                1965-04-15  [SurfaceOrganicMatter].Add(mass: 11379, N: 111, P:0.0, type: "wheat", name: "");
                1965-10-15  [Wheat].Sow(cultivar:PendletonDwarf, depth:30, population:150, rowSpacing:300);
                1967-04-15  [SurfaceOrganicMatter].Add(mass: 11379, N: 111, P:0.0, type: "wheat", name: "");
                1967-10-15  [Wheat].Sow(cultivar:PendletonDwarf, depth:30, population:150, rowSpacing:300);
                1969-04-15  [SurfaceOrganicMatter].Add(mass: 11379, N: 111, P:0.0, type: "wheat", name: "");
                1969-10-15  [Wheat].Sow(cultivar:PendletonDwarf, depth:30, population:150, rowSpacing:300);
                1971-04-15  [SurfaceOrganicMatter].Add(mass: 11379, N: 111, P:0.0, type: "wheat", name: "");
                1971-10-15  [Wheat].Sow(cultivar:PendletonDwarf, depth:30, population:150, rowSpacing:300);
                1973-04-15  [SurfaceOrganicMatter].Add(mass: 11379, N: 111, P:0.0, type: "wheat", name: "");
                1973-10-15  [Wheat].Sow(cultivar:PendletonDwarf, depth:30, population:150, rowSpacing:300);
                1975-04-15  [SurfaceOrganicMatter].Add(mass: 11379, N: 111, P:0.0, type: "wheat", name: "");
                1975-10-15  [Wheat].Sow(cultivar:PendletonDwarf, depth:30, population:150, rowSpacing:300);
                1977-04-15  [SurfaceOrganicMatter].Add(mass: 11379, N: 111, P:0.0, type: "wheat", name: "");
                1977-10-15  [Wheat].Sow(cultivar:PendletonDwarf, depth:30, population:150, rowSpacing:300);
                1979-04-15  [SurfaceOrganicMatter].Add(mass: 11379, N: 111, P:0.0, type: "wheat", name: "");
                1979-10-15  [Wheat].Sow(cultivar:PendletonDwarf, depth:30, population:150, rowSpacing:300);
                1981-04-15  [SurfaceOrganicMatter].Add(mass: 11379, N: 111, P:0.0, type: "wheat", name: "");
                1981-10-15  [Wheat].Sow(cultivar:PendletonDwarf, depth:30, population:150, rowSpacing:300);
                1983-04-15  [SurfaceOrganicMatter].Add(mass: 11379, N: 111, P:0.0, type: "wheat", name: "");
                1983-10-15  [Wheat].Sow(cultivar:PendletonDwarf, depth:30, population:150, rowSpacing:300);
                1985-04-15  [SurfaceOrganicMatter].Add(mass: 11379, N: 111, P:0.0, type: "wheat", name: "");
                1985-10-15  [Wheat].Sow(cultivar:PendletonDwarf, depth:30, population:150, rowSpacing:300);
                1987-04-15  [SurfaceOrganicMatter].Add(mass: 11379, N: 111, P:0.0, type: "wheat", name: "");
                1987-10-15  [Wheat].Sow(cultivar:PendletonDwarf, depth:30, population:150, rowSpacing:300);
                1989-04-15  [SurfaceOrganicMatter].Add(mass: 11379, N: 111, P:0.0, type: "wheat", name: "");
                1989-10-15  [Wheat].Sow(cultivar:PendletonDwarf, depth:30, population:150, rowSpacing:300);
                1991-04-15  [SurfaceOrganicMatter].Add(mass: 11379, N: 111, P:0.0, type: "wheat", name: "");
                1991-10-15  [Wheat].Sow(cultivar:PendletonDwarf, depth:30, population:150, rowSpacing:300);
                1993-04-15  [SurfaceOrganicMatter].Add(mass: 11379, N: 111, P:0.0, type: "wheat", name: "");
                1993-10-15  [Wheat].Sow(cultivar:PendletonDwarf, depth:30, population:150, rowSpacing:300);
                1995-04-15  [SurfaceOrganicMatter].Add(mass: 11379, N: 111, P:0.0, type: "wheat", name: "");
                1995-10-15  [Wheat].Sow(cultivar:PendletonDwarf, depth:30, population:150, rowSpacing:300);
                1997-04-15  [SurfaceOrganicMatter].Add(mass: 11379, N: 111, P:0.0, type: "wheat", name: "");
                1997-10-15  [Wheat].Sow(cultivar:PendletonDwarf, depth:30, population:150, rowSpacing:300);
                1999-04-15  [SurfaceOrganicMatter].Add(mass: 11379, N: 111, P:0.0, type: "wheat", name: "");
                1999-10-15  [Wheat].Sow(cultivar:PendletonDwarf, depth:30, population:150, rowSpacing:300);
          Simulation PendletonBaseSimulation
            Weather: FileName=pendletonAPSIMtav.met
            Clock: StartDate=1930-01-01; EndDate=1990-12-31
            Summary summaryfile
            Zone Field: Area=1; Slope=0
              Operations: same as Validation.North America.Pendleton.Pendleton.Factors.Treatment.0_nBN0
              Manager TillageOperations
                Crop = wheat
                TillDate = 16-may
                IncorpFraction = 0.95
```csharp
using System;
using Models.Core;
using Models.PMF;
using Models.Soils;
using Models.Utilities;
using APSIM.Shared.Utilities;
using Models.SurfaceOM;

namespace Models
{
	[Serializable] 
	public class Script : Model
	{
		[Description("Crop")]
		public ICrop Crop { get; set; }
		[Description("Tillage date (d-mmm)")]
		public string TillDate { get; set; }
		[Description("Incorporation fraction (0-1)")]
		public double IncorpFraction { get; set; }

		[Link] Clock Clock;
		[Link] SurfaceOrganicMatter SOM;
		
		[EventSubscribe("DoManagement")]
		private void OnDoManagement(object sender, EventArgs e)
		{
			if ((!Crop.IsAlive) && DateUtilities.WithinDates(TillDate, Clock.Today, TillDate))
				SOM.Incorporate(fraction: IncorpFraction, depth: 200);			
		}
	}
}
```
              Operations NOperations
              Report HarvestReport: EventNames=[Wheat].Harvesting
                VariableNames:
                  [Clock].Today
                  [Clock].Today.Year
                  [Wheat].Grain.Wt
                  [Wheat].Grain.N*10 as NExport
                  [Wheat].AboveGround.Wt
                  sum([Soil].Nutrient.TotalC[1:2]) as TOC0_30cm
                  [Soil].Nutrient.TotalC[3] as TOC30_60cm
                  sum([Soil].Nutrient.TotalN[1:2]) as TON0_30cm
                  [Soil].Nutrient.TotalN[3] as TON30_60cm
                  sum([Soil].Nutrient.TotalC[1:2])/sum([Soil].Nutrient.TotalN[1:2]) as CNR0_30cm
                  [Soil].Nutrient.TotalC[3]/[Soil].Nutrient.TotalN[3] as CNR30_60cm
              Report: EventNames=[Clock].EndOfMonth
                VariableNames:
                  [Clock].Today
                  [Soil].Nutrient.TotalC[1] as TOC0_10cm
                  [Soil].Nutrient.TotalC[2] as TOC10_30cm
                  [Soil].Nutrient.TotalC[3] as TOC30_60cm
                  ([Soil].Nutrient.TotalC[1]+[Soil].Nutrient.TotalC[2]) as TOC0_30cm
                  [Soil].Nutrient.TotalN[1] as TON0_10cm
                  [Soil].Nutrient.TotalN[2] as TON10_30cm
                  [Soil].Nutrient.TotalN[3] as TON30_60cm
                  ([Soil].Nutrient.TotalN[1]+[Soil].Nutrient.TotalN[2]) as TON0_30cm
              SurfaceOrganicMatter stubble: same as Validation.Australia.Tarlee.Tarlee.TarleeBaseSimulation.Field.stubble
              Plant15 wheat: ResourceName=Wheat; AutoHarvest=false; CropType=wheat
              MicroClimate: a_interception=0; b_interception=1; c_interception=0; d_interception=0; soil_albedo=0.23; sun_angle=15; soil_heat_flux_fraction=0.4; night_interception_fraction=0.5; refheight=2; albedo=0.15; emissivity=0.96; RadIntTotal=0
              Manager Harvesting
                Crop = wheat
                script: same as in Validation.Australia.Tarlee.Tarlee.TarleeBaseSimulation.Field.Harvesting
              Fertiliser
              Soil: ASCOrder=Sodosol; ASCSubOrder=Red; SoilType=Sandy loam; Site=Tarlee; NearestTown=Tarlee; Region=Mid North; State=South Australia; Country=Australia; ApsoilNumber=610; Latitude=-34.276; Longitude=138.759; LocationAccuracy=+/- 20m
                DataSource=Characterisation 2008 by University of Adelaide, CSIRO Sustainable Ecosystems and Allan Mayfield Consulting, Clare, SA
                Comments=Roots: Wheat 90cm; barley and oats estimated; OC WB as measured; Strongly duplex low-moderate clay soil. Surface CEC low, moderate below. Texture change at about 7cm. Little chemical impediment to root growth, but high ESP below about 60cm may result in slaking or dispersion and high bulk density.
                Water
                  Thickness  BD    AirDry  LL15  DUL   SAT   KS
                  150        1.24  0.055   0.11  0.32  0.52  562
                  150        1.25  0.055   0.11  0.32  0.52  562
                  300        1.26  0.09    0.11  0.31  0.51  557
                  300        1.29  0.1     0.1   0.31  0.5   959
                  300        1.3   0.1     0.1   0.3   0.49  1063
                  300        1.3   0.1     0.1   0.3   0.49  1063
                  300        1.3   0.1     0.1   0.3   0.49  1063
                  SoilCrop WheatSoil: LL=[0.11, 0.11, 0.11, 0.1, 0.1, 0.1, 0.1]; KL=[0.06, 0.06, 0.05, 0.04, 0.04, 0.02, 0.01]; XF=[1, 1, 1, 1, 1, 0, 0]
                SoilWater: SummerDate=1-Apr; SummerU=6; SummerCona=3.5; WinterDate=1-Nov; WinterU=2; WinterCona=2; DiffusConst=88; DiffusSlope=35; Salb=0.13; CN2Bare=73; CNRed=20; CNCov=0.8; max_pond=0; Thickness=[100, 200, 300, 300, 900]; SWCON=[0.5, 0.5, 0.5, 0.5, 0.5]; residueinterception=0
                Nutrient
                SoilOrganicMatter: RootCN=57; RootWt=1109; SoilCN=13; EnrACoeff=7.4; EnrBCoeff=0.2; OCUnits=Total
                  Thickness  OC     FBiom  FInert
                  150        1.42   0.04   0.35
                  150        1.2    0.03   0.5
                  300        0.95   0.02   0.65
                  300        0.5    0.02   0.75
                  300        0.225  0.015  0.85
                  300        0.15   0.01   0.99
                  300        0.15   0.01   0.99
                Analysis: Thickness=[150, 150, 300, 300, 300, 300, 300]; PH=[6.64, 6.64, 6.64, 6.64, 6.64, 6.64, 6.64]; PHUnits=Water; BoronUnits=HotWater
                InitialWater Initial water: PercentMethod=FilledFromTop; FractionFull=1
                Sample Initial conditions: NO3Units=kgha; NH4Units=ppm; SWUnits=Volumetric; OCUnits=Total; PHUnits=Water
                  Thickness  NO3   NH4
                  100        10.2  0.0355556
                  200        19.9  0
                  300        19    0
                  300        15.5  0
                  300        21.1  0
                  300        17.7  0
                  300        17.7  0
                CERESSoilTemperature
              SoluteManager
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