Simulations: Version=2
  Memo Introduction
    Hamish Brown, Rob Zyskowski, Edmar I. Teixeira

    The New Zealand Institute for Plant & Food Research Limited, Private Bag 4704, Christchurch, New Zealand

    Developed using wheat as a starting point.
  Replacements
    Plant Oats: CropType=Wheat
      Memo TitlePage
        # The APSIM Wheat Model

        _Brown, H.E., Huth, N.I. and Holzworth, D.P._

        The APSIM wheat model has been developed using the Plant Modelling Framework (PMF) of [brown_plant_2014]. This new framework provides a library of plant organ and process submodels that can be coupled, at runtime, to construct a model in much the same way that models can be coupled to construct a simulation. This means that dynamic composition of lower level process and organ classes (e.g. photosynthesis, leaf) into larger constructions (e.g. maize, wheat, sorghum) can be achieved by the model developer without additional coding.

        The model consists of:

        * a phenology model to simulate development between growth phases
        * a structure model to simulate plant morphology
        * a collection of organs to simulate the various plant parts
        * an arbitrator to allocate resources (N, biomass) to the various plant organs
      OrganArbitrator Arbitrator: NArbitrationOption=RelativeAllocation; DMArbitrationOption=RelativeAllocation
      Phenology: DaysAfterSowing=0
        Memo
          Wheat exhibits a range of developmental responses to environment and these are strongly influences by genotype characteristics.
          Temperature effects development and it effects are captured by thermal time, incrasing development rates and decreasing phase durations as temperatures as temperatures increase.  However, wheat also exhibits vernalisation and photoperiod sensitivities in its Vegetative phase and further photoperiod sensitivity in the EarlyReproducivePhase.  Photoperiod responses are seen as a reduction in the length of a phase for a photoperiod sensitive genotype in response to a longer photoperiod.  Vernalisation responses are more complicated as they are driven by temperature but interact with photoperiod.  For vernalisation sensitive varieties (Winter types) exposure to cool temperatures or short photoperiods during the Vegetative phase will reduce the thermal time duration of the vegetative phase.

          This model draws on the Kirby Framework to capture these vernalisation and photoperiod responses.  This framework assumes that the timing of anthesis is a result of the timing of flag leaf and an additional thermal time passage from there to anthesis.  It also assumes the timing of flag leaf is a rusult of the Final Leaf Number which sets a target, and leaf appearance rate, which sets the rate of progress to this target.  Leaf appearance rate is a function of Thermal time and a genotype specific Phyllochron which changes with Haun stage as described by [Jamieson_LeafAppearance_1995].

          Final Leaf Number (FLN) is modeled as the sum of three numbers:

          FLN = MinLeafNumber + VernalLeaves + PhotoLeaves

          Where MinLeafNumber is the number of leaves that a wheat crop will produce when vernalisation is satisified early in the crops duration (before 2nd true leaf) and it is grown in a long photoperiod..  VernalLeaves are the number of leaves that are added due to vernalisation effects.  For insensitive varieties this will always be zero but this is potentially a larger number for sensitivie varieties and the number progresively decreases as the crop encounters more vernalisation.  PhotoLeaves are the number of leaves that are added to the minimum leaf number as a result of short day exposure.  For insensitive varieties this will be zero but is potential larger for more sensitivie varieties and decreases as day length increases.  More detailed explinations of the components of phenology are provided below.
        AirTemperatureFunction ThermalTimeB8
          XYPairs: X=[0, 7, 8, 18, 30, 40]; Y=[0, 1, 8, 18, 30, 0]
          Memo
            Thermal time determines the rate of developmental progress through many of the crops phases and is used by organs to determing potential growth rates.
        SoilTemperatureFunction: maxt_soil_surface=20; mint_soil_surface=10
          XYPairs: X=[0, 30, 40]; Y=[0, 30, 0]
        PhotoperiodFunction Photoperiod: Twilight=-6; DayLength=0
        PhotoperiodDeltaFunction: Twilight=-6
        PhaseLookup PercievedPhotoPeriod
          PhaseLookupValue ApexBelowGround: Start=Germination; End=Emergence
            Constant Photoperiod: Value=0; Units=h
          PhaseLookupValue ApexAboveGround: Start=Emergence; End=HarvestRipe
            MultiplyFunction
              VariableReference Photoperiod: VariableName=[Phenology].Photoperiod.Value
              LinearInterpolationFunction: XProperty=[Phenology].PhotoperiodDeltaFunction.Value
                XYPairs: X=[-24, 0, 0.1, 24]; Y=[0, 0, 1, 1]
        Constant MinimumLeafNumber: Value=6; Units=Leaves
          Memo
            Number of leaves the plant will produce when fully vernalised early and grown in long photoperiod
        Constant VrnSensitivity: Value=0; Units=Leaves
          Memo
            The difference between Inherent earlyness leaf number and the number of leaves produced when the plant is unvernalisaed and grown in long photoperiod
        Constant VernLag: Value=1; Units=Unitless
          Memo
            The amount of vernalising temperature required before vernalisation response will be evident.  Value of relative to the amount offl vernalisation temperature required from the end of the lag until vernalisation saturation.  A value of 0 means there is no lag, a value of 1 means the lag is the same (in vernal time) as the vernalisation requirement and a value of 2 means the lag is twice as long as the vernalisation response phase
        Constant PpSensitivity: Value=6; Units=Leaves
          Memo
            The reduction in leaf number going from 8 to 16 h Pp
        Constant EarlyReproductivePpSensitivity: Value=0
          Memo
            The phyllochrons duration for the plant to go from flag leaf ligual appearance at 16 h Pp compared to the phyllochron duration for the same phase at 8 h Pp.
        Constant EarlyReproductiveLongDayBase: Value=2.5
          Memo
            The phyllochrons duration for the plant to go from flag leaf ligual appearance at 16 h Pp.
        GerminatingPhase Germinating: Start=Sowing; End=Germination
        EmergingPhase Emerging: Start=Germination; End=Emergence; ShootLag=40; ShootRate=3
          VariableReference ThermalTime: VariableName=[Phenology].ThermalTime.Value
        GenericPhase Vegetative: Start=Emergence; End=VS
          Memo
            The duration of the vegetative phase is set by a target Haun Stage for the occurance of Terminal Spikelet and the rate of leaf appearance.
          VariableReference ThermalTime: VariableName=[Phenology].ThermalTime.Value
          Memo Memo1
            Currently just using a contsant target, look into Drought response
          MultiplyFunction Target
            Constant Six: Value=4
            VariableReference Phyll: VariableName=[Structure].BasePhyllochron.Value
        GenericPhase EarlyReproductive: Start=VS; End=TerminalSpikelet
          VariableReference ThermalTime: VariableName=[Phenology].ThermalTime.Value
          MultiplyFunction Target
            SubtractFunction
              VariableReference TST: VariableName=[Structure].TSLN.Value
              Constant Six: Value=6
            VariableReference Phyllochron: VariableName=[Structure].BasePhyllochron.Value
        GenericPhase StemElongation: Start=TerminalSpikelet; End=FlagLeaf
          VariableReference ThermalTime: VariableName=[Phenology].ThermalTime.Value
          MultiplyFunction Target
            VariableReference Phyllochron: VariableName=[Structure].BasePhyllochron.Value
            Constant exp: Value=1.5
        GenericPhase EarDevelopment: Start=FlagLeaf; End=Flowering
          Constant Target: Value=100
          VariableReference ThermalTime: VariableName=[Phenology].ThermalTime.Value
        GenericPhase GrainDevelopment: Start=Flowering; End=StartGrainFill
          Constant Target: Value=240
          VariableReference ThermalTime: VariableName=[Phenology].ThermalTime.Value
        GenericPhase GrainFilling: Start=StartGrainFill; End=EndGrainFill
          Constant Target: Value=700
          VariableReference ThermalTime: VariableName=[Phenology].ThermalTime.Value
        GenericPhase Maturing: Start=EndGrainFill; End=Maturity
          Constant Target: Value=35
          VariableReference ThermalTime: VariableName=[Phenology].ThermalTime.Value
        GenericPhase Ripening: Start=Maturity; End=HarvestRipe
          Constant Target: Value=300
          VariableReference ThermalTime: VariableName=[Phenology].ThermalTime.Value
        EndPhase ReadyForHarvesting: Start=HarvestRipe; End=Unused
          VariableReference ThermalTime: VariableName=[Phenology].ThermalTime.Value
        ZadokPMF Zadok
        OnEventFunction FlagLeafDAS: SetEvent=FlagLeaf; ReSetEvent=never
          Memo
            A function is used to provide flowering date as days after sowing(DAS).
          Constant PreEventValue: Value=0
          VariableReference PostEventValue: VariableName=[Phenology].DaysAfterSowing
        OnEventFunction FloweringDAS: SetEvent=Flowering; ReSetEvent=never
          Memo
            A function is used to provide flowering date as days after sowing(DAS).
          Constant PreEventValue: Value=0
          VariableReference PostEventValue: VariableName=[Phenology].DaysAfterSowing
        OnEventFunction MaturityDAS: SetEvent=Maturity; ReSetEvent=never
          Memo
            A function is used to provide maturity date as days after sowing(DAS).
          Constant PreEventValue: Value=0
          VariableReference PostEventValue: VariableName=[Phenology].DaysAfterSowing
        PhaseLookup ThermalTimeP
          PhaseLookupValue SoilTemperature: Start=Sowing; End=TerminalSpikelet
            SoilTemperatureFunction: maxt_soil_surface=20; mint_soil_surface=10
              XYPairs: X=[0, 30, 40]; Y=[0, 25, 0]
          PhaseLookupValue AirTemperature: Start=TerminalSpikelet; End=HarvestRipe
            AirTemperatureFunction
              XYPairs: X=[0, 15, 30, 40]; Y=[0, 12, 30, 0]
        AirTemperatureFunction ThermalTimeB0
          XYPairs: X=[0, 15, 30, 40]; Y=[0, 15, 30, 0]
          Memo
            Thermal time determines the rate of developmental progress through many of the crops phases and is used by organs to determing potential growth rates.
        MultiplyFunction ThermalTime
          AirTemperatureFunction ThermalTimeB0
            XYPairs: X=[0, 15, 30, 40]; Y=[0, 15, 30, 0]
            Memo
              Thermal time determines the rate of developmental progress through many of the crops phases and is used by organs to determing potential growth rates.
          MaximumFunction
            Constant Zero: Value=0
            DivideFunction
              SubtractFunction PP7
                VariableReference Photoperiod: VariableName=[Phenology].Photoperiod.Value
                Constant Seven: Value=7
              Constant Nine: Value=9
      Structure: Initialised=false; Germinated=false; Emerged=false; CohortToInitialise=0; TipToAppear=0
        VariableReference ThermalTime: VariableName=[Phenology].ThermalTime.Value
          MultiplyFunction MainStemNodeAppearanceRate
            Memo Rational
              Based on [Jamieson_SIRIUS_1998] where leaf appearace could be described by a base phyllochron determined between leaves 2 and 7 and a phyllochron that was 70% of base phyllochron for leaves < 2 and 130% of base phyllochron for leaves > 7
            LinearInterpolationFunction LeafStageFactor: XProperty=[Leaf].AppearedCohortNo
              XYPairs: X=[0, 2, 4, 6, 8, 14, 18]; Y=[0.75, 0.9, 1, 1.1, 1.2, 1.4, 1.5]
            Constant BasePhyllochron: Value=90; Units=oC.d
            LinearInterpolationFunction PhotoPeriodEffect: XProperty=[Phenology].Photoperiod.Value
              XYPairs: X=[8, 12, 14]; Y=[1.6, 1, 1]
        MultiplyFunction MainStemNodeAppearanceRate
          Memo Rational
            Based on [Jamieson_SIRIUS_1998] where leaf appearace could be described by a base phyllochron determined between leaves 2 and 7 and a phyllochron that was 70% of base phyllochron for leaves < 2 and 130% of base phyllochron for leaves > 7
          LinearInterpolationFunction LeafStageFactor: XProperty=[Leaf].AppearedCohortNo
            XYPairs: X=[0, 2, 4, 6, 8, 14, 18]; Y=[0.75, 0.9, 1, 1.1, 1.2, 1.4, 1.5]
          LinearInterpolationFunction PhotoPeriodEffect: XProperty=[Phenology].Photoperiod.Value
            XYPairs: X=[8, 12, 14]; Y=[1.6, 1, 1]
          VariableReference Phyllochron: VariableName=[Structure].BasePhyllochron.Value
            MultiplyFunction MainStemNodeAppearanceRate: same as Replacements.Oats.Structure.ThermalTime.MainStemNodeAppearanceRate
        MultiplyFunction BranchingRate
          PhaseLookup PotentialBranchingRate
            PhaseLookupValue Vegetative: Start=Emergence; End=TerminalSpikelet
              LinearInterpolationFunction PotentialBranchingRate: XProperty=[Structure].LeafTipsAppeared
                XYPairs: X=[1, 2, 3, 4, 5, 6, 7, 8]; Y=[0, 0, 1, 2, 4, 7, 12, 20]
            PhaseLookupValue Reproductive: Start=TerminalSpikelet; End=HarvestRipe
              Constant Zero: Value=0
          MinimumFunction StressFactors
            LinearInterpolationFunction WSC: XProperty=[Stem].PercentWSC.Value
              XYPairs: X=[0.2, 0.27]; Y=[1, 1]
            LinearInterpolationFunction Nitrogen: XProperty=[Arbitrator].FN
              XYPairs: X=[0.5, 2, 3]; Y=[0, 1, 1]
            LinearInterpolationFunction Cover: XProperty=[Leaf].CoverTotal
              XYPairs: X=[0, 0.1, 0.25]; Y=[1, 1, 0]
            LinearInterpolationFunction Growth: XProperty=[Structure].MeanTillerGrowthRate.Value
              XYPairs: X=[0, 0.001, 0.005]; Y=[1, 1, 1]
            LinearInterpolationFunction PhotoPeriodEffect: XProperty=[Phenology].Photoperiod.Value
              XYPairs: X=[11.99, 12, 14]; Y=[1, 1, 1]
            LinearInterpolationFunction TemperatureEffect: XProperty=[Weather].MeanT
              XYPairs: X=[4, 10, 14]; Y=[1, 1, 1]
        PhaseLookup BranchMortality
          PhaseLookupValue MortalityPhase: Start=FlagLeaf; End=Flowering
            MultiplyFunction Mortality
              LinearInterpolationFunction MortalityPerDegDay: XProperty=[Structure].MeanTillerGrowthRate.Value
                XYPairs: X=[0, 0.005, 0.005]; Y=[0.002, 0, 0]
              VariableReference ThermalTime: VariableName=[Phenology].ThermalTime.Value
        HeightFunction HeightModel
          LinearInterpolationFunction PotentialHeight: XProperty=[Phenology].Stage
            XYPairs: X=[3, 4, 5, 6, 7]; Y=[10, 200, 1000, 1100, 1200]
          LinearInterpolationFunction WaterStress: XProperty=[Oats].WaterSupplyDemandRatio
            XYPairs: X=[0.3, 1]; Y=[0, 1]
        MovingAverageFunction MeanTillerGrowthRate: NumberOfDays=5; InitialValue=0
          DivideFunction TillerGrowthRate
            VariableReference DailyGrowth: VariableName=[Arbitrator].DMSupply
            VariableReference ThermalTime: VariableName=[Phenology].ThermalTime.Value
            VariableReference StemPopulation: VariableName=[Structure].TotalStemPopn
        MovingAverageFunction MeanPhyllochron: NumberOfDays=300; InitialValue=80
          VariableReference Phyllochron: VariableName=[Structure].MainStemNodeAppearanceRate.Value
        DivideFunction HaunStageTerminalSpikelet
          SubtractFunction FLNlessIntercept
            VariableReference FinalLeafNumber: VariableName=[Structure].MainStemFinalNodeNumber.Value
            Constant Intercept: Value=2.85
          Constant Slope: Value=1.1
        AddFunction HaunStage
          VariableReference AppearedLeaves: VariableName=[Leaf].ExpandedCohortNo
          VariableReference ProportionOfExpandingLeaf: VariableName=[Leaf].NextExpandingLeafProportion
        PhaseLookup ThermalTimeP
          PhaseLookupValue SoilTemperature: Start=Sowing; End=TerminalSpikelet
            SoilTemperatureFunction: maxt_soil_surface=20; mint_soil_surface=10
              XYPairs: X=[0, 30, 40]; Y=[0, 30, 0]
          PhaseLookupValue AirTemperature: Start=TerminalSpikelet; End=HarvestRipe
            AirTemperatureFunction
              XYPairs: X=[0, 30, 40]; Y=[0, 30, 0]
        MinimumFunction MainStemFinalNodeNumber
          Constant MaxLN: Value=15
          MinimumFunction FLN
            OnEventFunction AtLeafSix: SetEvent=VS; ReSetEvent=never
              VariableReference PreEventValue: VariableName=[Structure].MaxLN.Value
              MaximumFunction PostEventValue
                Constant Zero: Value=0
                LessThanFunction
                  VariableReference TestVariable: VariableName=[Phenology].PhotoperiodDeltaFunction.Value
                  Constant Zero: Value=0
                  SubtractFunction IfTrue
                    VariableReference MLN: VariableName=[Structure].MaxLN.Value
                    Constant Two: Value=2
                  SubtractFunction IfFalse
                    VariableReference MLN: VariableName=[Structure].MaxLN.Value
                    MultiplyFunction Ic
                      VariableReference PP: VariableName=[Phenology].Photoperiod.Value
                      VariableReference PPS: VariableName=[Structure].PPSlope.Value
            VariableReference MLN: VariableName=[Structure].MaxLN.Value
        MinimumFunction TSLN
          VariableReference MLN: VariableName=[Structure].MaxLN.Value
          SubtractFunction
            MultiplyFunction
              VariableReference FLN: VariableName=[Structure].MainStemFinalNodeNumber.Value
              Constant PS: Value=0.995
            Constant LVS: Value=1.95
        Constant MaxLN: Value=17
        Constant BasePhyllochron: Value=90; Units=oC.d
        Constant PPSlope: Value=0.5
      ReproductiveOrgan Grain: GrowthRespiration=0; MaintenanceRespiration=0; RipeStage=Ripe
        Biomass Live
        Biomass Dead
        Constant MaxNConcDailyGrowth: Value=0.03
        Constant WaterContent: Value=0.12
        Constant MinimumNConc: Value=0.006
        Constant MaximumNConc: Value=0.03
        Constant MaximumPotentialGrainSize: Value=0.043; Units=g
        PhaseBasedSwitch NitrogenDemandSwitch: Start=Germination; End=Maturity
        AccumulateFunction AccumThermalTime: StartStageName=Flowering; EndStageName=Maturity
          VariableReference DailyThermalTimeValue: VariableName=[Phenology].ThermalTime.Value
        AirTemperatureFunction FillingRate
          XYPairs: X=[0, 26, 30, 35]; Y=[0, 0.0015, 0.0015, 0.0015]
        PartitionFractionDemandFunction DMDemandFunction
          PhaseLookup PartitionFraction
            PhaseLookupValue InitialPhase: Start=Flowering; End=StartGrainFill
              Constant: Value=0.01
            PhaseLookupValue LinearPhase: Start=StartGrainFill; End=EndGrainFill
              Constant: Value=0.6
            PhaseLookupValue Ripening: Start=EndGrainFill; End=HarvestRipe
              Constant: Value=0
        PhaseLookup DMDemandFunctionG
          PhaseLookupValue InitialPhase: Start=Flowering; End=StartGrainFill
            FillingRateFunction
              VariableReference NumberFunction: VariableName=[Grain].NumberFunction.Value
              VariableReference FillingDuration: VariableName=[Phenology].GrainDevelopment.Target.Value
              VariableReference ThermalTime: VariableName=[Phenology].ThermalTime.Value
              MultiplyFunction PotentialSizeIncrement
                VariableReference InitialProportion: VariableName=[Grain].InitialGrainProportion.Value
                VariableReference MaximumSize: VariableName=[Grain].MaximumPotentialGrainSize.Value
          PhaseLookupValue LinearPhase: Start=StartGrainFill; End=EndGrainFill
            FillingRateFunction
              VariableReference NumberFunction: VariableName=[Grain].NumberFunction.Value
              VariableReference FillingDuration: VariableName=[Phenology].GrainFilling.Target.Value
              VariableReference ThermalTime: VariableName=[Phenology].ThermalTime.Value
              MultiplyFunction PotentialSizeIncrement
                SubtractFunction ProportionLinearPhase
                  Constant One: Value=1
                  VariableReference InitialProportion: VariableName=[Grain].InitialGrainProportion.Value
                VariableReference MaximumSize: VariableName=[Grain].MaximumPotentialGrainSize.Value
        ExpressionFunction Protein
          Expression=([Grain].Live.N + [Grain].Dead.N)/([Grain].Live.Wt + [Grain].Dead.Wt) * 100 * 5.71
        DivideFunction GrowthRateGrainDevelopment
          AccumulateFunction AccumulatedGrowth: StartStageName=FlagLeaf; EndStageName=StartGrainFill
            VariableReference DailyBiomassProduction: VariableName=[Arbitrator].DMSupply
          AccumulateFunction DaysOfGrainDevelopment: StartStageName=FlagLeaf; EndStageName=StartGrainFill
            Constant LenthOfADay: Value=1; Units=days/day
        Constant InitialGrainProportion: Value=0.2
        PhaseLookup NFillingRate
          PhaseLookupValue GrainFilling: Start=Flowering; End=EndGrainFill
            FillingRateFunction
              VariableReference NumberFunction: VariableName=[Grain].NumberFunction.Value
              AddFunction FillingDuration
                VariableReference FloweringToGrainFilling: VariableName=[Phenology].GrainDevelopment.Target.Value
                VariableReference GrainFilling: VariableName=[Phenology].GrainFilling.Target.Value
              VariableReference ThermalTime: VariableName=[Phenology].ThermalTime.Value
              MultiplyFunction PotentialSizeIncrement
                Constant MaximumFinalNConc: Value=0.026; Units=g/g
                VariableReference MaximumSize: VariableName=[Grain].MaximumPotentialGrainSize.Value
        BiomassRemoval BiomassRemovalDefaults
          OrganBiomassRemovalType Harvest: FractionLiveToRemove=1; FractionDeadToRemove=0; FractionLiveToResidue=0; FractionDeadToResidue=0
          OrganBiomassRemovalType Cut: FractionLiveToRemove=1; FractionDeadToRemove=0; FractionLiveToResidue=0; FractionDeadToResidue=0
          OrganBiomassRemovalType Prune: FractionLiveToRemove=0; FractionDeadToRemove=0; FractionLiveToResidue=0.8; FractionDeadToResidue=0
          OrganBiomassRemovalType Graze: FractionLiveToRemove=0.6; FractionDeadToRemove=0; FractionLiveToResidue=0.2; FractionDeadToResidue=0
          OrganBiomassRemovalType Thin: FractionLiveToRemove=0; FractionDeadToRemove=0; FractionLiveToResidue=0.05; FractionDeadToResidue=0
        HoldFunction NumberFunction: WhenToHold=Flowering
          MultiplyFunction ValueToHold
            Constant GrainsPerGramOfStem: Value=22; Units=grains
            VariableReference StemMass: VariableName=[StemPlusSpike].Wt
              VariableReference StemMass: VariableName=[StemPlusSpike].Wt
      Root: GrowthRespiration=0; MaintenanceRespiration=0
        CompositeBiomass Live: Propertys=[[Root].LayerLive]
        CompositeBiomass Dead: Propertys=[[Root].LayerDead]
        LinearInterpolationFunction KLModifier: XProperty=[Leaf].LAI
          XYPairs: X=[0, 3]; Y=[1, 1]
        Constant SoilWaterEffect: Value=1
        Constant MaxDailyNUptake: Value=20
        Constant SenescenceRate: Value=0.005
        Constant StructuralFraction: Value=1
        Constant MaximumRootDepth: Value=1000000
        PhaseLookup PartitionFraction
          PhaseLookupValue PreEmergence: Start=Germination; End=Emergence
            Constant Value: Value=0
          PhaseLookupValue PreFlowering: Start=Emergence; End=Flowering
            Constant Value: Value=0.2
          PhaseLookupValue PostFlowering: Start=Flowering; End=EndGrainFill
            Constant Value: Value=0.2
        Constant MaximumNConc: Value=0.01
        Constant MinimumNConc: Value=0.01
        PhaseLookup RootFrontVelocity
          PhaseLookupValue PreEmergence: Start=Germination; End=Emergence
            Constant Value: Value=5
          PhaseLookupValue PostEmergence: Start=Emergence; End=Maturity
            Constant Value: Value=20
        PhaseBasedSwitch NitrogenDemandSwitch: Start=Germination; End=Maturity
        BiomassRemoval BiomassRemovalDefaults
          OrganBiomassRemovalType Harvest: FractionLiveToRemove=0; FractionDeadToRemove=0; FractionLiveToResidue=0.2; FractionDeadToResidue=0
          OrganBiomassRemovalType Cut: FractionLiveToRemove=0; FractionDeadToRemove=0; FractionLiveToResidue=0.3; FractionDeadToResidue=0
          OrganBiomassRemovalType Prune: FractionLiveToRemove=0; FractionDeadToRemove=0; FractionLiveToResidue=0.1; FractionDeadToResidue=0
          OrganBiomassRemovalType Graze: FractionLiveToRemove=0; FractionDeadToRemove=0; FractionLiveToResidue=0.15; FractionDeadToResidue=0
          OrganBiomassRemovalType Thin: FractionLiveToRemove=0; FractionDeadToRemove=0; FractionLiveToResidue=0.05; FractionDeadToResidue=0
        LinearInterpolationFunction KNO3: XProperty=[Root].RootLengthDenisty
          XYPairs: X=[0, 0.004]; Y=[0.002, 0.02]
        LinearInterpolationFunction KNH4: XProperty=[Root].RootLengthDenisty
          XYPairs: X=[0, 0.004]; Y=[0.001, 0.01]
        LinearInterpolationFunction NUptakeSWFactor: XProperty=[Root].RWC
          XYPairs: X=[0, 0.2, 1]; Y=[1, 1, 1]
        Constant InitialDM: Value=0.2; Units=g/plant
        Constant SpecificRootLength: Value=40; Units=m/g
      Leaf: MaxCover=1; Albedo=0.2; Gsmax=0.015; R50=150; MicroClimatePresent=true; KDead=0.3; MaximumMainStemLeafNumber=30
        zero: GrowthRespiration, MaintenanceRespiration, CurrentExpandingLeaf, StartFractionExpanded, FractionNextleafExpanded, DeadNodesYesterday, FRGR, PotentialEP, DMConversionEfficiency, TipsAtEmergence, CohortsAtInitialisation, FractionDied
        LeafCohort InitialLeaves[1]: DeltaWaterConstrainedArea=0; DeltaCarbonConstrainedArea=0; Rank=1; Area=200; MaintenanceRespiration=0
        LeafCohort InitialLeaves[2]: DeltaWaterConstrainedArea=0; DeltaCarbonConstrainedArea=0; Rank=2; Area=0; MaintenanceRespiration=0
        CompositeBiomass Live: Propertys=[[Leaf].CohortLive]
        CompositeBiomass Dead: Propertys=[[Leaf].CohortDead]
        ArrayBiomass CohortArrayLive: Propertys=[[Leaf].Live]; ArraySize=[Leaf].MaxNodeNo
        ArrayBiomass CohortArrayDead: Propertys=[[Leaf].Dead]; ArraySize=[Leaf].MaxNodeNo
        LeafCohortParameters CohortParameters
          Constant NReallocationFactor: Value=1
          Constant MaintenanceRespirationFunction: Value=0
          Constant NRetranslocationFactor: Value=0.03
          Constant DMReallocationFactor: Value=0
          Constant DMRetranslocationFactor: Value=0.1
          MinimumFunction CellDivisionStress
            LinearInterpolationFunction WaterStressFactor: XProperty=[Oats].WaterSupplyDemandRatio
              XYPairs: X=[0, 1]; Y=[0.5, 1]
            LinearInterpolationFunction NitrogenStressFactor: XProperty=[Oats].Leaf.Fn
              XYPairs: X=[0, 0.5, 1]; Y=[0.1, 0.1, 1]
          MinimumFunction ExpansionStress
            LinearInterpolationFunction WaterStress: XProperty=[Oats].WaterSupplyDemandRatio
              XYPairs: X=[0, 0.7, 1]; Y=[0, 1, 1]
            LinearInterpolationFunction TemperatureEffect: XProperty=[Weather].MeanT
              XYPairs: X=[0, 12, 14]; Y=[0, 1, 1]
          MultiplyFunction MaxArea
            Constant AreaLargestLeaves: Value=5000; Units=mm^2
            LinearInterpolationFunction AgeFactor: XProperty=[Phenology].Stage
              XYPairs: X=[3, 4, 5, 7, 9]; Y=[0.1, 0.5, 1, 0.5, 0]
              Memo
                Growth Stages and Phenology
                1 Sowing
                2 Germination
                3 Emergence
                4 VS
                5 TS
                6 FLag leaf
                7 Flowering
                8 SGF
                9 EGF
                10 HR
                11
          MultiplyFunction GrowthDuration
            Constant Multiplier: Value=2.5
            VariableReference Phyllochron: VariableName=[Structure].MainStemNodeAppearanceRate.Value
          PhaseLookup LagDuration
            PhaseLookupValue VegetativeGrowth: Start=Emergence; End=TerminalSpikelet
              MultiplyFunction LagDuration
                VariableReference Phyllochron: VariableName=[Structure].MainStemNodeAppearanceRate.Value
                LinearInterpolationFunction AgeFactor: XProperty=[Phenology].Stage
                  XYPairs: X=[3, 4, 9]; Y=[5, 7, 0]
                Constant Multiplier: Value=1
            PhaseLookupValue StemElongation: Start=TerminalSpikelet; End=Maturity
              SubtractFunction LagDuration
                AddFunction ThermalTimeToRipe
                  VariableReference GrainDevelopment: VariableName=[Phenology].GrainDevelopment.Target.Value
                  VariableReference GrainFilling: VariableName=[Phenology].GrainFilling.Target.Value
                  VariableReference Maturing: VariableName=[Phenology].Maturing.Target.Value
                  VariableReference Ripening: VariableName=[Phenology].Ripening.Target.Value
                ExpressionFunction SenescenceDuration: Expression=[Leaf].CohortParameters.SenescenceDuration.Value
          MultiplyFunction SenescenceDuration
            Constant Multiplier: Value=10
            VariableReference Phyllochron: VariableName=[Structure].MainStemNodeAppearanceRate.Value
            LinearInterpolationFunction: XProperty=[Leaf].CohortParameters.MaxArea.Value
              XYPairs: X=[0, 2000, 4500, 6000]; Y=[1, 1, 1, 1]
          Constant DetachmentLagDuration: Value=1000000
          Constant DetachmentDuration: Value=1000000
          Constant RelativeBranchLeafSize: Value=1
          LinearInterpolationFunction MaximumNConc: XProperty=[Phenology].Stage
            XYPairs: X=[3, 4, 6]; Y=[0.08, 0.05, 0.02]
          LinearInterpolationFunction CriticalNConc: XProperty=[Phenology].Stage
            XYPairs: X=[3, 4, 6]; Y=[0.07, 0.04, 0.015]
          LinearInterpolationFunction MinimumNConc: XProperty=[Phenology].Stage
            XYPairs: X=[3, 4]; Y=[0.01, 0.005]
          AddFunction DroughtInducedSenAcceleration
            Constant One: Value=1
            MultiplyFunction Stress
              Constant StressResponseCoefficient: Value=1
              LinearInterpolationFunction StressFactor: XProperty=[Oats].WaterSupplyDemandRatio
                XYPairs: X=[0, 0.7]; Y=[1, 0]
          LinearInterpolationFunction SpecificLeafAreaMax: XProperty=[Phenology].Stage
            XYPairs: X=[4, 5]; Y=[35000, 50000]
            Memo
              Growth Stages and Phenology
              1 Sowing
              2 Germination
              3 Emergence
              4 VS
              5 TS
              6 FLag leaf
              7 Flowering
              8 SGF
              9 EGF
              10 HR
              11
          Constant SpecificLeafAreaMin: Value=25000
          Constant InitialNConc: Value=0
          Constant StructuralFraction: Value=0.5
          Constant NonStructuralFraction: Value=0.5
          Constant LeafSizeShapeParameter: Value=0.3
          Constant SenessingLeafRelativeSize: Value=1; Units=0-1
          MultiplyFunction ShadeInducedSenescenceRate
            LinearInterpolationFunction RatePerDegDay: XProperty=[Leaf].CohortCurrentRankCoverAbove
              XYPairs: X=[0.99, 1]; Y=[0, 0]
              Memo
                1% per degree day means it takes one phyllochron for a shaded leaf to fully sceness
            VariableReference ThermalTime: VariableName=[Phenology].ThermalTime.Value
        RUEModel Photosynthesis
          Constant RUE: Value=1.5
          WeightedTemperatureFunction FT: MaximumTemperatureWeighting=1
            XYPairs: X=[0, 4, 9, 15, 40]; Y=[0, 0, 1, 1, 1]
          LinearInterpolationFunction FVPD: XProperty=[Leaf].Photosynthesis.VPD
            XYPairs: X=[0, 10, 50]; Y=[1, 1, 1]
          LinearInterpolationFunction FN: XProperty=[Leaf].Fn
            XYPairs: X=[0, 1, 1.5]; Y=[0, 1, 1]
          LinearInterpolationFunction FW: XProperty=[Leaf].Fw
            XYPairs: X=[0, 1, 1]; Y=[1, 1, 1]
          RUECO2Function FCO2: PhotosyntheticPathway=C3
          VariableReference RadnInt: VariableName=[Leaf].RadIntTot
        LinearInterpolationFunction FrostFraction: XProperty=[Weather].MinT
          XYPairs: X=[-1, 0]; Y=[0, 0]
        VariableReference ThermalTime: VariableName=[Phenology].ThermalTime.Value
        MinimumFunction FRGRFunction
          VariableReference RUE_FT: VariableName=[Leaf].Photosynthesis.FT.Value
          MinimumFunction Others
            VariableReference RUE_FN: VariableName=[Leaf].Photosynthesis.FN.Value
            VariableReference RUE_FVPD: VariableName=[Leaf].Photosynthesis.FVPD.Value
        BiomassRemoval BiomassRemovalDefaults
          OrganBiomassRemovalType Harvest: FractionLiveToRemove=0; FractionDeadToRemove=0; FractionLiveToResidue=0.3; FractionDeadToResidue=0.3
          OrganBiomassRemovalType Cut: FractionLiveToRemove=0.8; FractionDeadToRemove=0.8; FractionLiveToResidue=0; FractionDeadToResidue=0
          OrganBiomassRemovalType Prune: FractionLiveToRemove=0; FractionDeadToRemove=0; FractionLiveToResidue=0.6; FractionDeadToResidue=0.6
          OrganBiomassRemovalType Graze: FractionLiveToRemove=0.6; FractionDeadToRemove=0.6; FractionLiveToResidue=0.1; FractionDeadToResidue=0.1
          OrganBiomassRemovalType Thin: FractionLiveToRemove=0; FractionDeadToRemove=0; FractionLiveToResidue=0.05; FractionDeadToResidue=0.05
        Constant ExtinctionCoeff: Value=0.5
        Constant StructuralFraction: Value=0.5
        Constant DMConversionEfficiencyFunction: Value=1; Units=0-1
      GenericOrgan Spike
        PopulationBasedDemandFunction DMDemandFunction
          VariableReference ThermalTime: VariableName=[Phenology].ThermalTime.Value
          Constant ExpansionStress: Value=1
          VariableReference OrganPopulation: VariableName=[Spike].HeadNumber.Value
          Constant StartStage: Value=4.5
          Constant MaximumOrganWt: Value=0.2
          AddFunction GrowthDuration
            VariableReference EarlyReproductive: VariableName=[Phenology].EarlyReproductive.Target.Value
            VariableReference GrainDevelopment: VariableName=[Phenology].GrainDevelopment.Target.Value
        Biomass Live
        Biomass Dead
        Constant NReallocationFactor: Value=0
        Constant NRetranslocationFactor: Value=0.1
        Constant MaximumNConc: Value=0.01
        Constant StructuralFraction: Value=0.9
        Constant SenescenceRate: Value=0; Units=/d
        Constant MinimumNConc: Value=0.003
        MultiplyFunction HeadNumber
          Constant FertileTillers: Value=1
          VariableReference StemPopulation: VariableName=[Structure].TotalStemPopn
        BiomassRemoval BiomassRemovalDefaults
          OrganBiomassRemovalType Harvest: FractionLiveToRemove=0.5; FractionDeadToRemove=0; FractionLiveToResidue=0.1; FractionDeadToResidue=0
          OrganBiomassRemovalType Cut: FractionLiveToRemove=0.8; FractionDeadToRemove=0; FractionLiveToResidue=0; FractionDeadToResidue=0
          OrganBiomassRemovalType Prune: FractionLiveToRemove=0; FractionDeadToRemove=0; FractionLiveToResidue=0.6; FractionDeadToResidue=0
          OrganBiomassRemovalType Graze: FractionLiveToRemove=0.6; FractionDeadToRemove=0; FractionLiveToResidue=0.2; FractionDeadToResidue=0
          OrganBiomassRemovalType Thin: FractionLiveToRemove=0; FractionDeadToRemove=0; FractionLiveToResidue=0.05; FractionDeadToResidue=0
        PhaseBasedSwitch NitrogenDemandSwitch: Start=Emergence; End=StartGrainFill
        PhaseLookup DMRetranslocationFactor
          PhaseLookupValue VegetativeGrowth: Start=Emergence; End=StartGrainFill
            Constant DMRetranslocationFactor: Value=0
          PhaseLookupValue ReproductiveGrowth: Start=StartGrainFill; End=EndGrainFill
            Constant DMRetranslocationFactor: Value=0.5
        Constant InitialWtFunction: Value=0; Units=g/m^2
        Constant DetachmentRateFunction: Value=0; Units=/d
        Constant MaintenanceRespirationFunction: Value=0; Units=0-1
        Constant DMConversionEfficiency: Value=1; Units=0-1
      GenericOrgan Stem
        Biomass Live
        Biomass Dead
        PhaseLookup StructuralFraction
          PhaseLookupValue VegetativeGrowth: Start=Sowing; End=FlagLeaf
            Constant Fraction: Value=0.7
          PhaseLookupValue ReproductiveGrowth: Start=FlagLeaf; End=Flowering
            Constant Fraction: Value=0.7
          PhaseLookupValue GrainFilling: Start=Flowering; End=EndGrainFill
            Constant Fraction: Value=0.7
          PhaseLookupValue EndStemGrowth: Start=EndGrainFill; End=Maturity
            Constant Fraction: Value=1
        Constant SenescenceRate: Value=0; Units=/d
        LinearInterpolationFunction MaximumNConc: XProperty=[Phenology].Stage
          XYPairs: X=[3, 4, 5, 6]; Y=[0.07, 0.04, 0.015, 0.012]
        LinearInterpolationFunction MinimumNConc: XProperty=[Phenology].Stage
          XYPairs: X=[3, 4, 6]; Y=[0.0025, 0.0025, 0.0025]
        PhaseBasedSwitch NitrogenDemandSwitch: Start=Emergence; End=StartGrainFill
        Constant NReallocationFactor: Value=0
        PhaseLookup NRetranslocationFactor
          PhaseLookupValue VegetativeGrowth: Start=Sowing; End=Flowering
            Constant Fraction: Value=0
          PhaseLookupValue ReproductiveGrowth: Start=Flowering; End=HarvestRipe
            Constant Fraction: Value=0.5
        PhaseLookup DMRetranslocationFactor: same as Replacements.Oats.Spike.DMRetranslocationFactor
        PartitionFractionDemandFunction DMDemandFunction
          PhaseLookup PartitionFraction
            PhaseLookupValue PreStemElongation: Start=Emergence; End=TerminalSpikelet
              Constant StemFraction: Value=0.4
            PhaseLookupValue StemElongation: Start=TerminalSpikelet; End=FlagLeaf
              Constant StemFraction: Value=0.6
            PhaseLookupValue EarEmergence: Start=FlagLeaf; End=Flowering
              Constant StemFraction: Value=0.4
            PhaseLookupValue PostEarEmergence: Start=Flowering; End=EndGrainFill
              Constant StemFraction: Value=0.4
            PhaseLookupValue PostGrainFill: Start=EndGrainFill; End=HarvestRipe
              Constant StemFraction: Value=0
        BiomassRemoval BiomassRemovalDefaults: same as Replacements.Oats.Spike.BiomassRemovalDefaults
        DivideFunction PercentWSC
          VariableReference WSC: VariableName=[Stem].Live.NonStructuralWt
          VariableReference StemWt: VariableName=[Stem].Live.Wt
        Constant InitialWtFunction: Value=0; Units=g/m^2
        Constant DetachmentRateFunction: Value=0; Units=/d
        Constant MaintenanceRespirationFunction: Value=0; Units=0-1
        Constant DMConversionEfficiency: Value=1; Units=0-1
      CompositeBiomass AboveGround
        Propertys=[[Leaf].Live, [Leaf].Dead, [Stem].Live, [Stem].Dead, [Spike].Live, [Spike].Dead, [Grain].Live, [Grain].Dead]
      CompositeBiomass AboveGroundLive: Propertys=[[Leaf].Live, [Stem].Live, [Spike].Live, [Grain].Live]
      CompositeBiomass AboveGroundDead: Propertys=[[Leaf].Dead, [Stem].Dead, [Spike].Dead, [Grain].Dead]
      CompositeBiomass BelowGround: Propertys=[[Root].Live, [Root].Dead]
      CompositeBiomass Total
        Propertys=[[Leaf].Live, [Leaf].Dead, [Stem].Live, [Stem].Dead, [Root].Live, [Root].Dead, [Spike].Live, [Spike].Dead, [Grain].Live, [Grain].Dead]
      CompositeBiomass TotalLive
        Propertys=[[Leaf].Live, [Stem].Live, [Root].Live, [Spike].Live, [Grain].Live]
      CompositeBiomass TotalDead
        Propertys=[[Leaf].Dead, [Stem].Dead, [Root].Dead, [Spike].Dead, [Grain].Dead]
      CompositeBiomass Ear: Propertys=[[Spike].Live, [Grain].Live, [Spike].Dead, [Grain].Dead]
        Memo
          The Ear composite biomass object includes the Live and dead pools of all organs within the Ear to allow output for total dry matter and Nutrient contents, including total structural, non-structural and metabolic pools.
      CompositeBiomass StemPlusSpike: Propertys=[[Stem].Live, [Spike].Live, [Stem].Dead, [Spike].Dead]
      CultivarFolder Cultivars
        Cultivar Drummond
          Command:
            [Phenology].MinimumLeafNumber.Value = 9
            [Phenology].VrnSensitivity.Value = 7
            [Phenology].PpSensitivity.Value = 3
            [Structure].BasePhyllochron.Value = 80
        Cultivar Milton
          Command:
            [Phenology].MinimumLeafNumber.Value = 9
            [Phenology].VrnSensitivity.Value = 7
            [Phenology].PpSensitivity.Value = 3
            [Structure].BasePhyllochron.Value = 100
        Cultivar Hokunui
          Command:
            [Phenology].MinimumLeafNumber.Value = 9
            [Phenology].VrnSensitivity.Value = 7
            [Phenology].PpSensitivity.Value = 3
            [Structure].BasePhyllochron.Value = 82
            [Structure].PPSlope.Value = 0.4
        Cultivar Stampede
          Command:
            [Phenology].MinimumLeafNumber.Value = 9
            [Phenology].VrnSensitivity.Value = 7
            [Phenology].PpSensitivity.Value = 3
            [Structure].BasePhyllochron.Value = 82
            [Structure].PPSlope.Value = 0.4
        Cultivar Milton1
          Command:
            [Phenology].MinimumLeafNumber.Value = 15
            [Phenology].VrnSensitivity.Value = 7
            [Phenology].PpSensitivity.Value = 3
            [Structure].MaxLN.Value = 15
    Report DailyReport: EventNames=[Clock].DoReport
      VariableNames:
        [Clock].Today
        [Weather].MeanT
        [Soil].SoilWater.SW
        [Soil].SoilWater.SWmm
        sum([Soil].SoilWater.SWmm) as ProfileWater
        [Oats].AboveGround.N
        [Oats].AboveGround.Wt
        [Oats].AboveGroundLive.N
        [Oats].AboveGroundLive.N*10 as UptakeNKgHA
        [Oats].AboveGroundLive.Wt
        [Oats].AboveGroundDead.N
        [Oats].AboveGroundDead.Wt
        [Oats].Arbitrator.DMDemand
        [Oats].Arbitrator.DMSupply
        [Oats].Ear.N
        [Oats].Ear.Nconc
        [Oats].Ear.Wt
        [Oats].Grain.N
        [Oats].Grain.NConc
        [Oats].Grain.Number
        [Oats].Grain.Size
        [Oats].Grain.Wt
        [Oats].Leaf.AppearedCohortNo
        [Oats].Leaf.CoverDead
        [Oats].Leaf.CoverGreen
        [Oats].Leaf.CoverTotal
        [Oats].Leaf.Dead.N
        [Oats].Leaf.Dead.NConc
        [Oats].Leaf.Dead.Wt
        [Oats].Leaf.DeadCohortNo
        [Oats].Leaf.SenescingCohortNo
        [Oats].Leaf.ExpandedCohortNo
        [Oats].Leaf.Fn
        [Oats].Leaf.Fw
        [Oats].Leaf.Height
        [Oats].Leaf.InitialisedCohortNo
        [Oats].Leaf.LAI
        [Oats].Leaf.Live.N
        [Oats].Leaf.Live.NConc
        [Oats].Leaf.Live.Wt
        [Oats].Leaf.SpecificArea
        [Oats].Leaf.Transpiration
        [Oats].Phenology.CurrentPhaseName
        [Oats].Phenology.CurrentStageName
        [Oats].Phenology.DailyVernalisation.Value
        [Oats].Phenology.MeanTemp.Value
        [Oats].Phenology.Photoperiod.Value
        [Oats].Phenology.Stage
        [Oats].Phenology.ThermalTime.Value
        [Oats].Phenology.ThermalTime.Value
        [Oats].Phenology.Vrn1.Value
        [Oats].Phenology.Vrn2.Value
        [Oats].Phenology.Vrn4.Value
        [Oats].Phenology.Zadok.Stage
        [Oats].Root.Depth
        [Oats].Root.N
        [Oats].Root.Wt
        [Oats].Root.Nconc
        [Oats].Root.WaterUptake
        [Oats].Spike.N
        [Oats].Spike.NConc
        [Oats].Spike.Wt
        [Oats].Spike.Live.NonStructuralWt
        [Oats].Stem.N
        [Oats].Stem.NConc
        [Oats].Stem.Wt
        [Oats].Stem.PercentWSC
        [Oats].Stem.Live.NonStructuralWt
        [Oats].StemPlusSpike.Wt
        [Oats].StemPlusSpike.N
        [Oats].SowingData.Cultivar
        [Oats].Structure.HaunStage.ValueTerminalSpikelet.Value
        [Oats].Structure.HaunStage.Value
        [Oats].Structure.Height
        [Oats].Structure.LeafTipsAppeared
        [Oats].Structure.MainStemFinalNodeNumber.Value
        [Oats].Structure.MainStemFinalNodeNumber.ValueToHold.PhotoPLeaves.Value
        [Oats].Structure.MainStemPopn
        [Oats].Structure.MeanTillerGrowthRate.Value
        [Oats].Structure.TotalStemPopn
        [Oats].Total.N
        [Oats].Total.Wt
        [SurfaceOrganicMatter].Wt
        ([Oats].Leaf.Transpiration + [Soil].SoilWater.Es + [MicroClimate].interception) as ET
        sum([Soil].SoilNitrogen.NO3) as TotalSoilNitrogen
        [Oats].Phenology.FlagLeafDAS
        [Oats].Phenology.FloweringDAS
        [Oats].Phenology.MaturityDAS
        [Oats].Phenology.PhotoPeriod
        [Oats].Phenology.PhotoPeriodDeltaFunction
        [Oats].Phenology.Stage
        [Oats].Phenology.SoilTemperatureFunction.Value
    Report EndTrialReport: EventNames=[Clock].EndOfSimulation
      VariableNames:
        [Oats].Structure.LeafTipsAppeared
        [Oats].Structure.MainStemFinalNodeNumber
        [Oats].Phenology.FlagLeafDAS
        [Oats].Phenology.FloweringDAS
        [Oats].Phenology.MaturityDAS
        [Script].CalcVals.SowMonth
  DataStore
    ExcelInput Oats9899: FileName=Observed\Oats_rainshelter_9899.xlsx; SheetNames=[Observations]
    ExcelInput Oats9899Structure: FileName=Observed\Oats_rainshelter_9899.xlsx; SheetNames=[ObsStructure]
    ExcelInput OatsWinterSowing: FileName=Observed\WinterSowingObservations.xlsx; SheetNames=[Obs2015]
    ExcelInput OatsWinterSowing1: FileName=Observed\WinterSowingObservations.xlsx; SheetNames=[Obs2016]
    ExcelInput SowingDateObs: FileName=Observed\SowingDateOns.xlsx; SheetNames=[obsPhenology]
    PredictedObserved: PredictedTableName=EndTrialReport; ObservedTableName=obsPhenology; FieldNameUsedForMatch=Sow
    ExcelInput Oats9899SW: FileName=Observed\RS_Oats_9899_sw_observed.xlsx; SheetNames=[RS_SW_Obs]
    Input OatsLeafSize: ErrorMessage=Please select a file to use.; FileName=Observed\RS_Oats_9899_leaf.csv
  Experiment RS_Oats_9899
    Factors
      Factor _Irrig
        Factor Nill
          Specifications:
            [Irrig]
            [Water]
            [Initial water]
          Operations Irrig
          Water
            Thickness  BD     AirDry  LL15   DUL   SAT    KS
            200        1.311  0.07    0.12   0.32  0.419  4832.039
            200        1.524  0.14    0.14   0.3   0.405  389.229
            200        1.65   0.149   0.149  0.26  0.342  16.362
            200        1.601  0.1     0.15   0.24  0.322  97.995
            200        1.601  0.14    0.14   0.24  0.348  97.995
            200        1.601  0.16    0.16   0.24  0.342  97.995
            200        1.601  0.09    0.09   0.13  0.307  97.995
            200        1.601  0.061   0.061  0.17  0.309  97.995
            SoilCrop OatsSoil: LL=[0.1, 0.1, 0.149, 0.15, 0.14, 0.14, 0.053, 0.061]; KL=[0.06, 0.06, 0.05, 0.02, 0.02, 0.02, 0.01, 0]; XF=[1, 1, 1, 1, 1, 1, 1, 1]
          Sample Initial water: Thickness=[200, 200, 200, 200, 200, 200, 200, 200]; SW=[0.33, 0.28, 0.26, 0.24, 0.24, 0.25, 0.19, 0.17]; NO3Units=kgha; NH4Units=ppm; SWUnits=Volumetric; OCUnits=Total; PHUnits=Water
        Factor Full
          Specifications:
            [Irrig]
            [Water]
            [Initial water]
          Operations Irrig
            1998-10-31  [Irrigation].Apply(30);
            1998-11-09  [Irrigation].Apply(35.3);
            1998-11-16  [Irrigation].Apply(45);
            1998-11-23  [Irrigation].Apply(44);
            1998-11-30  [Irrigation].Apply(30.1);
            1998-12-07  [Irrigation].Apply(41.6);
            1998-12-14  [Irrigation].Apply(55);
            1998-12-21  [Irrigation].Apply(50);
            1998-12-28  [Irrigation].Apply(55);
            1999-01-05  [Irrigation].Apply(53);
            1999-01-11  [Irrigation].Apply(50.4);
            1999-01-18  [Irrigation].Apply(49);
            1999-01-25  [Irrigation].Apply(49);
            1999-02-01  [Irrigation].Apply(51.2);
            1999-02-08  [Irrigation].Apply(53);
            1999-02-15  [Irrigation].Apply(34);
            1999-02-22  [Irrigation].Apply(37);
            1999-03-01  [Irrigation].Apply(24);
          Water
            Thickness  BD     AirDry  LL15   DUL    SAT    KS
            200        1.311  0.05    0.1    0.3    0.419  4832.039
            200        1.524  0.05    0.1    0.3    0.405  389.229
            200        1.65   0.149   0.149  0.28   0.342  16.362
            200        1.601  0.129   0.129  0.255  0.322  97.995
            200        1.601  0.155   0.155  0.288  0.348  97.995
            200        1.601  0.149   0.149  0.28   0.342  97.995
            200        1.601  0.053   0.053  0.107  0.307  97.995
            200        1.601  0.061   0.061  0.122  0.309  97.995
            SoilCrop OatsSoil: LL=[0.1, 0.1, 0.149, 0.129, 0.155, 0.149, 0.053, 0.061]; KL=[0.06, 0.06, 0.05, 0.08, 0.03, 0.01, 0, 0]; XF=[1, 1, 1, 1, 1, 1, 1, 1]
          Memo
            Added an Irrigation on 30 Oct after looking at data and seeing a spike.
          Sample Initial water: Thickness=[200, 200, 200, 200, 200, 200, 200, 200]; SW=[0.33, 0.28, 0.28, 0.25, 0.2, 0.25, 0.19, 0.17]; NO3Units=kgha; NH4Units=ppm; SWUnits=Volumetric; OCUnits=Total; PHUnits=Water
        Factor LD1
          Specifications:
            [Irrig]
            [Water]
            [Initial water]
          Operations Irrig
            1998-10-27  [Irrigation].Apply(50);
            1998-11-02  [Irrigation].Apply(30);
          Water
            Thickness  BD     AirDry  LL15   DUL   SAT    KS
            200        1.311  0.05    0.1    0.32  0.419  4832.039
            200        1.524  0.14    0.14   0.3   0.405  389.229
            200        1.65   0.13    0.13   0.26  0.342  16.362
            200        1.601  0.129   0.129  0.28  0.322  97.995
            200        1.601  0.17    0.17   0.27  0.348  97.995
            200        1.601  0.18    0.18   0.28  0.342  97.995
            200        1.601  0.053   0.053  0.2   0.307  97.995
            200        1.601  0.061   0.061  0.22  0.309  97.995
            SoilCrop OatsSoil: LL=[0.1, 0.1, 0.149, 0.129, 0.155, 0.149, 0.053, 0.061]; KL=[0.06, 0.06, 0.05, 0.08, 0.03, 0.01, 0, 0]; XF=[1, 1, 1, 1, 1, 1, 1, 1]
          Sample Initial water: Thickness=[200, 200, 200, 200, 200, 200, 200, 200]; SW=[0.33, 0.28, 0.28, 0.25, 0.2, 0.25, 0.19, 0.17]; NO3Units=kgha; NH4Units=ppm; SWUnits=Volumetric; OCUnits=Total; PHUnits=Water
        Factor LD4
          Specifications:
            [Irrig]
            [Water]
            [Initial water]
          Operations Irrig
            1998-10-27  [Irrigation].Apply(50)
            1998-11-02  [Irrigation].Apply(30)
            1998-11-09  [Irrigation].Apply( 35.3)
            1998-11-16  [Irrigation].Apply(45)
            1998-11-23  [Irrigation].Apply( 44)
            1998-11-30  [Irrigation].Apply(30.1 )
            1998-12-07  [Irrigation].Apply( 41.6)
          Water
            Thickness  BD     AirDry  LL15   DUL   SAT    KS
            200        1.311  0.05    0.1    0.32  0.419  4832.039
            200        1.524  0.14    0.14   0.3   0.405  389.229
            200        1.65   0.1     0.1    0.26  0.342  16.362
            200        1.601  0.09    0.09   0.24  0.322  97.995
            200        1.601  0.16    0.1    0.27  0.348  97.995
            200        1.601  0.16    0.1    0.23  0.342  97.995
            200        1.601  0.11    0.11   0.15  0.307  97.995
            200        1.601  0.061   0.061  0.2   0.309  97.995
            SoilCrop OatsSoil: LL=[0.1, 0.1, 0.149, 0.129, 0.155, 0.149, 0.053, 0.061]; KL=[0.06, 0.06, 0.05, 0.08, 0.03, 0.01, 0, 0]; XF=[1, 1, 1, 1, 1, 1, 1, 1]
          Sample Initial water: Thickness=[200, 200, 200, 200, 200, 200, 200, 200]; SW=[0.33, 0.24, 0.27, 0.18, 0.24, 0.24, 0.19, 0.17]; NO3Units=kgha; NH4Units=ppm; SWUnits=Volumetric; OCUnits=Total; PHUnits=Water
        Factor ED1
          Specifications:
            [Irrig]
            [Water]
            [Initial water]
          Operations Irrig
            1998-11-16  [Irrigation].Apply(  45 )
            1998-11-23  [Irrigation].Apply(  44 )
            1998-11-30  [Irrigation].Apply(  30.1 )
            1998-12-07  [Irrigation].Apply(  41.6 )
            1998-12-14  [Irrigation].Apply(  55 )
            1998-12-21  [Irrigation].Apply(  50 )
            1998-12-28  [Irrigation].Apply(  55 )
            1999-01-05  [Irrigation].Apply(  53 )
            1999-01-11  [Irrigation].Apply( 50.4 )
            1999-01-18  [Irrigation].Apply(  49 )
            1999-01-25  [Irrigation].Apply(  49 )
            1999-02-01  [Irrigation].Apply(  51.2 )
            1999-02-08  [Irrigation].Apply(  53 )
            1999-02-15  [Irrigation].Apply(  34 )
            1999-02-22  [Irrigation].Apply(  37 )
            1999-03-01  [Irrigation].Apply(  24 )
          Water
            Thickness  BD     AirDry  LL15  DUL   SAT    KS
            200        1.311  0.05    0.1   0.32  0.35   4832.039
            200        1.524  0.1     0.1   0.31  0.35   389.229
            200        1.65   0.149   0.1   0.27  0.342  16.362
            200        1.601  0.14    0.1   0.22  0.322  97.995
            200        1.601  0.15    0.1   0.2   0.348  97.995
            200        1.601  0.149   0.1   0.25  0.342  97.995
            200        1.601  0.1     0.1   0.19  0.307  97.995
            200        1.601  0.06    0.06  0.17  0.309  97.995
            SoilCrop OatsSoil: LL=[0.1, 0.1, 0.1, 0.1, 0.1, 0.1, 0.053, 0.061]; KL=[0.06, 0.06, 0.05, 0.08, 0.03, 0.01, 0, 0]; XF=[1, 1, 1, 1, 1, 1, 1, 1]
          Sample Initial water: Thickness=[200, 200, 200, 200, 200, 200, 200, 200]; SW=[0.33, 0.28, 0.27, 0.22, 0.2, 0.25, 0.19, 0.17]; NO3Units=kgha; NH4Units=ppm; SWUnits=Volumetric; OCUnits=Total; PHUnits=Water
    Simulation Rainshelter
      Clock: StartDate=1998-09-28; EndDate=1999-04-01
      Summary summaryfile
      Weather: FileName=%root%\Examples\WeatherFiles\lincoln.met
      Zone paddock: Area=1; Slope=0
        Folder Manager folder
          Operations
            1998-09-29  [Oats].Sow(population:300, cultivar:"Drummond", depth:15, rowSpacing:130);
          Operations Irrig
            1998-11-09  [Irrigation].Apply(35.3);
            1998-11-16  [Irrigation].Apply(45);
            1998-11-23  [Irrigation].Apply(44);
            1998-11-30  [Irrigation].Apply(30.1);
            1998-12-07  [Irrigation].Apply(41.6);
            1998-12-14  [Irrigation].Apply(55);
            1998-12-21  [Irrigation].Apply(50);
            1998-12-28  [Irrigation].Apply(55);
            1999-01-05  [Irrigation].Apply(53);
            1999-01-11  [Irrigation].Apply(50.4);
            1999-01-18  [Irrigation].Apply(49);
            1999-01-25  [Irrigation].Apply(49);
            1999-02-01  [Irrigation].Apply(51.2);
            1999-02-08  [Irrigation].Apply(53);
            1999-02-15  [Irrigation].Apply(34);
            1999-02-22  [Irrigation].Apply(37);
            1999-03-01  [Irrigation].Apply(24);
        Irrigation
        SurfaceOrganicMatter Surface Organic Matter: PoolName=wheat_stubble; type=wheat; mass=0; standing_fraction=0; cnr=80; CriticalResidueWeight=2000; OptimumDecompTemp=20; MaxCumulativeEOS=20; CNRatioDecompCoeff=0.277; CNRatioDecompThreshold=25; TotalLeachRain=25; MinRainToLeach=10; CriticalMinimumOrganicC=0.004; DefaultCPRatio=0; DefaultStandingFraction=0; StandingExtinctCoeff=0.5; FractionFaecesAdded=0.5
          Pools:
            {PoolName=wheat_stubble, ResidueType=wheat, Mass=0, CNRatio=80, StandingFraction=0}
          ResidueTypes: LoadFromResource=ResidueTypes
        Fertiliser
        MicroClimate: a_interception=0; b_interception=1; c_interception=0; d_interception=0; soil_albedo=0.3; sun_angle=15; soil_heat_flux_fraction=0.4; night_interception_fraction=0.5; refheight=2; albedo=0.293662; emissivity=0.96; RadIntTotal=0
        Plant Oats: CropType=Oats
        Report DailyReport
        Report HarvestReport
        Manager Harvesting
```csharp
using System;
using Models.Core;
using System.Collections.Generic;
using System.Text;
using Models.Soils;
using Models.PMF;
using Models;
using System.Xml.Serialization;
using APSIM.Shared.Utilities;

namespace Models
{
	[Serializable] 
	public class Script : Model
	{
		[Link] Plant Oats;
		[Link] Clock clock;
		[EventSubscribe("DoManagement")]
		private void OnDoManagement(object sender, EventArgs e)
		{
			if (Oats.IsAlive == true)
			{	
				DateTime HD = new DateTime(1999, 03, 04);
				if (clock.Today.Date == HD.Date)
				{
					Oats.Harvest();
					Oats.EndCrop();
				}
			}
		}
	}
}
```
        Report SupReport: EventNames=[Clock].DoReport
          VariableNames:
            [Clock].Today
            [Phenology].ThermalTime.Value
            [Leaf].CohortSize
            [Leaf].CohortParameters.MaxArea.Value
            [0ats].Arbitrator.DMAllocated
            [0ats].Arbitrator.DMDemand
            [0ats].Arbitrator.DMNutrientLimitation
            [0ats].Arbitrator.DMSinkLimitation
            [0ats].Arbitrator.DMSupply
            [0ats].Arbitrator.FN
            [0ats].Arbitrator.NDemand
            [Oats].Structure.MainStemNodeAppearanceRate
            [0ats].Leaf.CohortMaxSize
            [0ats].Leaf.CohortParameters.GrowthDuration.Value
            [0ats].Leaf.CohortParameters.LagDuration.Value
            [0ats].Leaf.CohortParameters.SenescenceDuration.Value
            [0ats].Leaf.CohortParameters.SpecificLeafAreaMax.Value
            [0ats].Leaf.CohortParameters.SpecificLeafAreaMin.Value
            [0ats].Leaf.Photosynthesis.FT.Value
            [0ats].Leaf.Photosynthesis.FVPD.Value
            [0ats].Leaf.Photosynthesis.RueAct
            [0ats].Stem.DMDemandFunction.HightLimitedDMAccumulation.Value
            [0ats].Stem.DMDemandFunction.PotentialDMAccumulation.Value
            [0ats].Leaf.NextExpandingLeafProportion
            [0ats].Structure.MeanTillerGrowthRate.Value
            sum([Soil].SoilWater.SWmm[1:8]) as ProfileWater
        Soil: SoilType=NZ_sedementary; Region=Plains; State=Canterbury; Country=New Zealnd; Latitude=0; Longitude=0; Area=0
          Analysis: Thickness=[100, 200, 300, 300, 300, 300]; PH=[6.6, 6.2, 5.7, 5.5, 5.5, 5.5]; PHUnits=Water; BoronUnits=HotWater
          Water
            Thickness  BD     AirDry  LL15   DUL   SAT    KS
            200        1.311  0.05    0.1    0.25  0.419  4832.039
            200        1.524  0.1     0.1    0.33  0.405  389.229
            200        1.65   0.149   0.149  0.27  0.342  16.362
            200        1.601  0.14    0.14   0.22  0.322  97.995
            200        1.601  0.15    0.15   0.2   0.348  97.995
            200        1.601  0.149   0.149  0.25  0.342  97.995
            200        1.601  0.1     0.1    0.19  0.307  97.995
            200        1.601  0.06    0.06   0.17  0.309  97.995
            SoilCrop WheatSoil: LL=[0.1, 0.1, 0.07, 0.07, 0.08, 0.07, 0.07, 0.07]; KL=[0.06, 0.06, 0.06, 0.06, 0.04, 0.025, 0.01, 0.005]; XF=[1, 1, 1, 1, 1, 1, 1, 1]
            SoilCrop OatsSoil: LL=[0.1, 0.1, 0.149, 0.129, 0.155, 0.149, 0.053, 0.061]; KL=[0.06, 0.06, 0.05, 0.08, 0.03, 0.01, 0, 0]; XF=[1, 1, 1, 1, 1, 1, 1, 1]
          SoilWater: SummerDate=1-Nov; SummerU=6; SummerCona=2; WinterDate=1-Apr; WinterU=9; WinterCona=4.4; DiffusConst=0; DiffusSlope=0; Salb=0.18; CN2Bare=68; CNRed=20; CNCov=0.8; slope=0; discharge_width=0; catchment_area=0; max_pond=0; residueinterception=0
            Thickness  SWCON  KLAT
            200        0.7    0
            200        0.7    0
            200        0.95   0
            200        0.95   0
            200        0.95   0
            200        0.95   0
            200        0.95   0
            200        0.95   0
          SoilNitrogen: fom_type=[default, manure, mucuna, lablab, shemp, stable]; fract_carb=[0.2, 0.3, 0.54, 0.57, 0.45, 0]; fract_cell=[0.7, 0.3, 0.37, 0.37, 0.47, 0.1]; fract_lign=[0.1, 0.4, 0.09, 0.06, 0.08, 0.9]; wfpsN2N2O_x=[22, 88]; wfpsN2N2O_y=[0.1, 1]; oc=[1.83566, 1.46334, 1.19884, 1.0301, 0.470338, 0.470138]
          SoilOrganicMatter: RootCN=40; RootWt=1000; SoilCN=11; EnrACoeff=7.4; EnrBCoeff=0.2; OCUnits=Total
            Thickness  OC     FBiom  FInert
            180        2.625  0.033  0.437
            150        1.247  0.019  0.657
            400        0.316  0.012  0.85
            270        0.208  0.01   0.945
            500        0.2    0.01   0.983
          Sample Initial nitrogen: NO3Units=ppm; NH4Units=ppm; SWUnits=Volumetric; OCUnits=Total; PHUnits=Water
            Thickness  NO3      NH4
            200        202.213  3
            200        4.921    2
            200        4.545    1
            200        3.123    1
            200        1.562    1
            200        1.562    1
            200        1.562    1
            200        1.562    1
          Sample Initial water: Thickness=[200, 200, 200, 200, 200, 200, 200, 200]; SW=[0.31, 0.31, 0.16, 0.15, 0.1, 0.1, 0.11, 0.12]; NO3Units=kgha; NH4Units=ppm; SWUnits=Volumetric; OCUnits=Total; PHUnits=Water
        Manager ClimateControl
          StartDate = 1998-10-17
          EndDate = 1999-04-01
```csharp
using System;
using Models.Core;
using APSIM.Shared.Utilities;



using System.Collections.Generic;
using System.Text;
using Models.PMF;
using Models;
using System.Xml.Serialization;

namespace Models
{
	[Serializable] 
	[System.Xml.Serialization.XmlInclude(typeof(Model))]
	public class Script : Model
	{
		[Link] Weather Met;
		[Link] Clock Clock;
    
		[Description("Start Date")]
		public DateTime StartDate { get; set; }
        
		[Description("End Date")]
		public DateTime EndDate { get; set; }
 
    
		[EventSubscribe("PreparingNewWeatherData")]
		private void OnPreparingNewWeatherData(object sender, EventArgs e)
		{
			if ((Clock.Today.Date >= StartDate) && (Clock.Today.Date <= EndDate))
				Met.Rain = 0;		
		}
	}
}
```
        Report EnviroReport: EventNames=[Clock].DoReport
          VariableNames:
            [Clock].Today
            [Weather].MeanT
            [Weather].Radn
            [Oats].Phenology.ThermalTime
            [Oats].Phenology.ThermalTime.MaximumFunction
            [Oats].Phenology.ThermalTime.MaximumFunction.DivideFunction
            [Oats].Phenology.ThermalTime.MaximumFunction.DivideFunction.PP7
            [Oats].Phenology.Photoperiod
            [Oats].Structure.LeafTipsAppeared
      SoilArbitrator Soil Arbitrator
  Experiment WinterSowing2015
    Factors
      Factor Sow
        Factor July
          Specifications:
            [Operations]
            [Fertilise].Script.SDSwitch = 1.0
          Operations
            2015-06-01  [Oats].Sow(population:200, cultivar:"Milton", depth:40, rowSpacing:150);
        Factor Aug
          Specifications:
            [Operations]
            [Fertilise].Script.SDSwitch = 2.0
          Operations
            2015-07-01  [Oats].Sow(population:200, cultivar:"Milton", depth:40, rowSpacing:150);
        Factor Fallow
          Specifications:
            [Operations]
            [Fertilise].Script.SDSwitch = 0.0
          Operations
            2015-07-01  [Oats].Sow(population:200, cultivar:"Milton", depth:40, rowSpacing:150);
      Factor Fert
        Factor 0: Specifications=[Fertilize]
          Operations Fertilize
            2015-06-01  [Fertiliser].Apply(0, Fertiliser.Types.UreaN, 10);
        Factor 400: Specifications=[Fertilize]
          Operations Fertilize
            2015-06-01  [Fertiliser].Apply(400, Fertiliser.Types.UreaN, 10);
    Simulation ABlock
      Clock: StartDate=2015-05-25; EndDate=2015-12-01
      Summary summaryfile
      Weather: FileName=%root%\Examples\WeatherFiles\lincoln.met
      Zone paddock: Area=1; Slope=0
        Folder Manager folder
          Operations
          Manager Fertilise
            FertDate1 = 05-Aug
            FertDate2 = 01-Oct
            FertDate3 = 20-Oct
            FertDate4 = 25-Nov
            Amount1 = 0
            Amount2 = 0
            Amount3 = 0
            Amount4 = 0
            SDSwitch = 0
```csharp
using System;
using Models.Core;
using Models.PMF;
using APSIM.Shared.Utilities;
namespace Models
{
	[Serializable]
	public class Script : Model
	{
		[Link] Clock Clock;
		[Link] Fertiliser Fertiliser;
		
		[Description("Date to fertilise")]
		public string FertDate1 { get; set; }
		[Description("Date to fertilise")]
		public string FertDate2 { get; set; }
		[Description("Date to fertilise")]
		public string FertDate3 { get; set; }
		[Description("Date to fertilise")]
		public string FertDate4 { get; set; }
		
		[Description("Amount of fertiliser to be applied (kg/ha)")]
		public double Amount1 { get; set; }
		[Description("Amount of fertiliser to be applied (kg/ha)")]
		public double Amount2 { get; set; }
		[Description("Amount of fertiliser to be applied (kg/ha)")]
		public double Amount3 { get; set; }
		[Description("Amount of fertiliser to be applied (kg/ha)")]
		public double Amount4 { get; set; }
		
		[Description("Amount of fertiliser to be applied (kg/ha)")]
		public double SDSwitch { get; set; }
		
		[EventSubscribe("DoManagement")]
		private void OnDoManagement(object sender, EventArgs e)
		{
			if (DateUtilities.WithinDates(FertDate1, Clock.Today, FertDate1))
				Fertiliser.Apply(Amount: Amount1 * SDSwitch, Type: Fertiliser.Types.NO3N);
			if (DateUtilities.WithinDates(FertDate2, Clock.Today, FertDate2))
				Fertiliser.Apply(Amount: Amount2, Type: Fertiliser.Types.NO3N);
			if (DateUtilities.WithinDates(FertDate3, Clock.Today, FertDate3))
				Fertiliser.Apply(Amount: Amount3, Type: Fertiliser.Types.NO3N);
			if (DateUtilities.WithinDates(FertDate4, Clock.Today, FertDate4))
				Fertiliser.Apply(Amount: Amount4 * SDSwitch, Type: Fertiliser.Types.NO3N);
		}
	}
}
```
          Operations Fertilize
            2015-06-01  [Fertiliser].Apply(0, Fertiliser.Types.UreaN, 10);
          Operations Irr
            2015-10-15  [Irrigation].Apply(25);
            2015-11-03  [Irrigation].Apply(25);
            2015-11-15  [Irrigation].Apply(25);
            2015-11-20  [Irrigation].Apply(30);
        Irrigation
        SurfaceOrganicMatter Surface Organic Matter: same as RS_Oats_9899.Rainshelter.paddock.Surface Organic Matter
        Fertiliser
        MicroClimate: a_interception=0; b_interception=1; c_interception=0; d_interception=0; soil_albedo=0.3; sun_angle=15; soil_heat_flux_fraction=0.4; night_interception_fraction=0.5; refheight=2; albedo=0.293662; emissivity=0.96; RadIntTotal=0
        Plant Oats: CropType=Oats
        Report DailyReport
        Report HarvestReport
        Manager Harvesting
```csharp
using System;
using Models.Core;
using System.Collections.Generic;
using System.Text;
using Models.Soils;
using Models.PMF;
using Models;
using System.Xml.Serialization;
using APSIM.Shared.Utilities;

namespace Models
{
	[Serializable] 
	public class Script : Model
	{
		[Link] Plant Oats;
		[Link] Clock clock;
		[EventSubscribe("DoManagement")]
		private void OnDoManagement(object sender, EventArgs e)
		{
			if (Oats.IsAlive == true)
			{	
				DateTime HD = new DateTime(2015, 11, 30);
				if (clock.Today.Date == HD.Date)
				{
					Oats.Harvest();
					Oats.EndCrop();
				}
			}
		}
	}
}
```
        Report SupReport: EventNames=[Clock].DoReport
          VariableNames:
            [Clock].Today
            [Leaf].CohortSize
            [0ats].Arbitrator.DMAllocated
            [0ats].Arbitrator.DMDemand
            [0ats].Arbitrator.DMNutrientLimitation
            [0ats].Arbitrator.DMSinkLimitation
            [0ats].Arbitrator.DMSupply
            [0ats].Arbitrator.FN
            [0ats].Arbitrator.NDemand
            [0ats].Leaf.CohortMaxSize
            [0ats].Leaf.CohortParameters.GrowthDuration.Value
            [0ats].Leaf.CohortParameters.LagDuration.Value
            [0ats].Leaf.CohortParameters.MaxArea.Value
            [0ats].Leaf.CohortParameters.SenescenceDuration.Value
            [0ats].Leaf.CohortParameters.SpecificLeafAreaMax.Value
            [0ats].Leaf.CohortParameters.SpecificLeafAreaMin.Value
            [0ats].Leaf.Photosynthesis.FT.Value
            [0ats].Leaf.Photosynthesis.FVPD.Value
            [0ats].Leaf.Photosynthesis.RueAct
            [0ats].Stem.DMDemandFunction.HightLimitedDMAccumulation.Value
            [0ats].Stem.DMDemandFunction.PotentialDMAccumulation.Value
            [0ats].Leaf.NextExpandingLeafProportion
            [0ats].Structure.MeanTillerGrowthRate.Value
            sum([Soil].SoilWater.SWmm[1:8]) as ProfileWater
        Soil: Latitude=0; Longitude=0; Area=0
          Analysis: Thickness=[100, 200, 300, 300, 300, 300]; PH=[6.6, 6.2, 5.7, 5.5, 5.5, 5.5]; PHUnits=Water; BoronUnits=HotWater
          Water
            Thickness  BD   AirDry  LL15  DUL   SAT
            200        1.2  0.05    0.1   0.32  0.46
            200        1.2  0.1     0.1   0.32  0.46
            200        1.2  0.07    0.07  0.13  0.4
            200        1.2  0.07    0.07  0.1   0.3
            200        1.2  0.08    0.08  0.11  0.3
            200        1.2  0.07    0.07  0.1   0.3
            200        1.2  0.07    0.07  0.1   0.3
            200        1.2  0.07    0.07  0.1   0.3
            SoilCrop WheatSoil: LL=[0.1, 0.1, 0.07, 0.07, 0.08, 0.07, 0.07, 0.07]; KL=[0.06, 0.06, 0.06, 0.06, 0.04, 0.025, 0.01, 0.005]; XF=[1, 1, 1, 1, 1, 1, 1, 1]
            SoilCrop OatsSoil: LL=[0.1, 0.1, 0.07, 0.07, 0.08, 0.07, 0.07, 0.07]; KL=[0.06, 0.06, 0.06, 0.06, 0.04, 0.025, 0.01, 0.005]; XF=[1, 1, 1, 1, 1, 1, 1, 1]
          SoilWater: same as RS_Oats_9899.Rainshelter.paddock.Soil.SoilWater
          SoilNitrogen: same as RS_Oats_9899.Rainshelter.paddock.Soil.SoilNitrogen
          SoilOrganicMatter: RootCN=30; RootWt=3000; SoilCN=11.5; EnrACoeff=7.4; EnrBCoeff=0.2; OCUnits=Total
            Thickness  OC    FBiom  FInert
            100        1.82  0.025  0.3
            200        1.47  0.025  0.4
            300        1.2   0.015  0.75
            300        1.03  0.01   0.9
            300        0.47  0.01   0.96
            300        0.47  0.01   0.96
          Sample Initial nitrogen: NO3Units=kgha; NH4Units=ppm; SWUnits=Volumetric; OCUnits=Total; PHUnits=Water
            Thickness  NO3  NH4
            100        20   0
            200        30   0
            300        5    0
            300        5    0
            300        0    0
            300        0    0
          Sample Initial water: Thickness=[200, 200, 200, 200, 200, 200, 200, 200]; SW=[0.29, 0.28, 0.16, 0.15, 0.1, 0.1, 0.11, 0.12]; NO3Units=kgha; NH4Units=ppm; SWUnits=Volumetric; OCUnits=Total; PHUnits=Water
        Report EndTrialReport: EventNames=[Clock].EndOfSimulation
          VariableNames:
            [Oats].Structure.LeafTipsAppeared
            [Oats].Structure.MainStemFinalNodeNumber
            [Oats].Phenology.FlagLeafDAS
            [Oats].Phenology.FloweringDAS
            [Oats].Phenology.MaturityDAS
            [Oats].TotalLive.N
      SoilArbitrator Soil Arbitrator
  Experiment WinterSowing2016
    Factors
      Factor Sow
        Factor July
          Specifications:
            [Operations]
            [Fertilise].Script.SDSwitch = 1.0
          Operations
            2016-06-01  [Oats].Sow(population:200, cultivar:"Milton", depth:40, rowSpacing:150);
        Factor Aug
          Specifications:
            [Operations]
            [Fertilise].Script.SDSwitch = 2.0
          Operations
            2016-07-01  [Oats].Sow(population:200, cultivar:"Milton", depth:40, rowSpacing:150);
      Factor Fert
        Factor 400: Specifications=[Fertilize]
          Operations Fertilize
            2015-06-01  [Fertiliser].Apply(400, Fertiliser.Types.UreaN, 10);
    Simulation RS2016
      Clock: StartDate=2016-05-25; EndDate=2016-12-01
      Summary summaryfile
      Weather: FileName=%root%\Examples\WeatherFiles\lincoln.met
      Zone paddock: Area=1; Slope=0
        Folder Manager folder
          Operations
          Manager Fertilise: same as WinterSowing2015.ABlock.paddock.Manager folder.Fertilise
          Operations Fertilize
            2015-06-01  [Fertiliser].Apply(0, Fertiliser.Types.UreaN, 10);
        Irrigation
        SurfaceOrganicMatter Surface Organic Matter: same as RS_Oats_9899.Rainshelter.paddock.Surface Organic Matter
        Fertiliser
        MicroClimate: a_interception=0; b_interception=1; c_interception=0; d_interception=0; soil_albedo=0.3; sun_angle=15; soil_heat_flux_fraction=0.4; night_interception_fraction=0.5; refheight=2; albedo=0.293662; emissivity=0.96; RadIntTotal=0
        Plant Oats: CropType=Oats
        Report DailyReport
        Report HarvestReport
        Manager Harvesting: same as WinterSowing2015.ABlock.paddock.Harvesting
        Report SupReport: same as WinterSowing2015.ABlock.paddock.SupReport
        Soil: Latitude=0; Longitude=0; Area=0
          Analysis: Thickness=[100, 200, 300, 300, 300, 300]; PH=[6.6, 6.2, 5.7, 5.5, 5.5, 5.5]; PHUnits=Water; BoronUnits=HotWater
          Water: same as WinterSowing2015.ABlock.paddock.Soil.Water
          SoilWater: same as RS_Oats_9899.Rainshelter.paddock.Soil.SoilWater
          SoilNitrogen: same as RS_Oats_9899.Rainshelter.paddock.Soil.SoilNitrogen
          SoilOrganicMatter: same as WinterSowing2015.ABlock.paddock.Soil.SoilOrganicMatter
          Sample Initial nitrogen: NO3Units=kgha; NH4Units=ppm; SWUnits=Volumetric; OCUnits=Total; PHUnits=Water
            Thickness  NO3  NH4
            100        217  0
            200        30   0
            300        5    0
            300        5    0
            300        0    0
            300        0    0
          Sample Initial water: Thickness=[200, 200, 200, 200, 200, 200, 200, 200]; SW=[0.29, 0.28, 0.16, 0.15, 0.1, 0.1, 0.11, 0.12]; NO3Units=kgha; NH4Units=ppm; SWUnits=Volumetric; OCUnits=Total; PHUnits=Water
      SoilArbitrator Soil Arbitrator
  Experiment SowingDate2002
    Factors
      Factor Sow
        Factor HokMar
          Specifications:
            [Operations]
            [Fertilise].Script.SDSwitch = 1.0
          Operations
            2002-03-07  [Oats].Sow(population:200, cultivar:"Hokunui", depth:40, rowSpacing:150);
        Factor HokMay
          Specifications:
            [Operations]
            [Fertilise].Script.SDSwitch = 0.0
          Operations
            2002-05-15  [Oats].Sow(population:200, cultivar:"Hokunui", depth:40, rowSpacing:150);
        Factor HokSep
          Specifications:
            [Operations]
            [Fertilise].Script.SDSwitch = 2.0
          Operations
            2002-09-09  [Oats].Sow(population:200, cultivar:"Hokunui", depth:40, rowSpacing:150);
        Factor StamMar
          Specifications:
            [Operations]
            [Fertilise].Script.SDSwitch = 1.0
          Operations
            2002-03-07  [Oats].Sow(population:200, cultivar:"Stampede", depth:40, rowSpacing:150);
        Factor StamMay
          Specifications:
            [Operations]
            [Fertilise].Script.SDSwitch = 0.0
          Operations
            2002-05-15  [Oats].Sow(population:200, cultivar:"Stampede", depth:40, rowSpacing:150);
        Factor StamSep
          Specifications:
            [Operations]
            [Fertilise].Script.SDSwitch = 0.0
          Operations
            2002-09-09  [Oats].Sow(population:200, cultivar:"Stampede", depth:40, rowSpacing:150);
    Simulation PaddockS1
      Clock: StartDate=2002-03-01; EndDate=2003-02-01
      Summary summaryfile
      Weather: FileName=%root%\Examples\WeatherFiles\lincoln.met
      Zone paddock: Area=1; Slope=0
        Folder Manager folder: same as WinterSowing2016.RS2016.paddock.Manager folder
        Irrigation
        SurfaceOrganicMatter Surface Organic Matter: same as RS_Oats_9899.Rainshelter.paddock.Surface Organic Matter
        Fertiliser
        MicroClimate: a_interception=0; b_interception=1; c_interception=0; d_interception=0; soil_albedo=0.3; sun_angle=15; soil_heat_flux_fraction=0.4; night_interception_fraction=0.5; refheight=2; albedo=0.293662; emissivity=0.96; RadIntTotal=0
        Plant Oats: CropType=Oats
        Report DailyReport
        Report EndTrialReport: EventNames=[Clock].EndOfSimulation
          VariableNames:
            [Oats].Structure.LeafTipsAppeared
            [Oats].Structure.MainStemFinalNodeNumber
            [Oats].Phenology.FlagLeafDAS
            [Oats].Phenology.FloweringDAS
            [Oats].Phenology.MaturityDAS
        Manager Harvesting: same as WinterSowing2015.ABlock.paddock.Harvesting
        Report SupReport: same as WinterSowing2015.ABlock.paddock.SupReport
        Soil: same as WinterSowing2016.RS2016.paddock.Soil
        Report EnviroReport: EventNames=[Clock].DoReport
          VariableNames:
            [Clock].Today
            [Weather].MeanT
            [Weather].Radn
            [Oats].Phenology.ThermalTime
            [Oats].Phenology.ThermalTime.MaximumFunction
            [Oats].Phenology.ThermalTime.MaximumFunction.DivideFunction
            [Oats].Phenology.ThermalTime.MaximumFunction.DivideFunction.PP7
            [Oats].Phenology.Photoperiod
            [Oats].Phenology.PhotoperiodDeltaFunction
            [Oats].Structure.LeafTipsAppeared
      SoilArbitrator Soil Arbitrator
  Experiment SowingDate2003
    Factors
      Factor Sow
        Factor HokMar
          Specifications:
            [Operations]
            [Fertilise].Script.SDSwitch = 1.0
          Operations
            2003-03-14  [Oats].Sow(population:200, cultivar:"Hokunui", depth:40, rowSpacing:150);
        Factor HokMay
          Specifications:
            [Operations]
            [Fertilise].Script.SDSwitch = 0.0
          Operations
            2003-05-21  [Oats].Sow(population:200, cultivar:"Hokunui", depth:40, rowSpacing:150);
        Factor HokSep
          Specifications:
            [Operations]
            [Fertilise].Script.SDSwitch = 2.0
          Operations
            2003-09-02  [Oats].Sow(population:200, cultivar:"Hokunui", depth:40, rowSpacing:150);
        Factor StamMar
          Specifications:
            [Operations]
            [Fertilise].Script.SDSwitch = 1.0
          Operations
            2003-03-14  [Oats].Sow(population:200, cultivar:"Stampede", depth:40, rowSpacing:150);
        Factor StamMay
          Specifications:
            [Operations]
            [Fertilise].Script.SDSwitch = 0.0
          Operations
            2003-05-21  [Oats].Sow(population:200, cultivar:"Stampede", depth:40, rowSpacing:150);
        Factor StamSep
          Specifications:
            [Operations]
            [Fertilise].Script.SDSwitch = 0.0
          Operations
            2003-09-02  [Oats].Sow(population:200, cultivar:"Stampede", depth:40, rowSpacing:150);
    Simulation PaddockS2
      Clock: StartDate=2003-03-01; EndDate=2004-02-01
      Summary summaryfile
      Weather: FileName=%root%\Examples\WeatherFiles\lincoln.met
      Zone paddock: Area=1; Slope=0
        Folder Manager folder
          Operations
          Manager Fertilise: same as WinterSowing2015.ABlock.paddock.Manager folder.Fertilise
          Operations Fertilize
            2015-06-01  [Fertiliser].Apply(0, Fertiliser.Types.UreaN, 10);
          Manager CalcVals
            SowMonth = 5
```csharp
using System;
using Models.Core;
using System.Collections.Generic;
using System.Text;
using Models.PMF;
using Models;
using System.Xml.Serialization;
using APSIM.Shared.Utilities;

namespace Models
{
	[Serializable] 
	public class Script : Model
	{
		[Link] Plant Oats;
		[Link] Clock clock;
		[Description("Sowing Month")]

		public int SowMonth { get; set; }

		[EventSubscribe("DoSowing")]
		private void OnDoSowing(object sender, EventArgs e)
		{
			SowMonth = clock.Today.DayOfYear;
				
		}
						
			
	}
}
```
        Irrigation
        SurfaceOrganicMatter Surface Organic Matter: same as RS_Oats_9899.Rainshelter.paddock.Surface Organic Matter
        Fertiliser
        MicroClimate: a_interception=0; b_interception=1; c_interception=0; d_interception=0; soil_albedo=0.3; sun_angle=15; soil_heat_flux_fraction=0.4; night_interception_fraction=0.5; refheight=2; albedo=0.293662; emissivity=0.96; RadIntTotal=0
        Plant Oats: CropType=Oats
        Report DailyReport
        Report EndTrialReport: EventNames=[Clock].EndOfSimulation
          VariableNames:
            [Oats].Structure.LeafTipsAppeared
            [Oats].Structure.MainStemFinalNodeNumber
            [Oats].Phenology.FlagLeafDAS
            [Oats].Phenology.FloweringDAS
            [Oats].Phenology.MaturityDAS
        Manager Harvesting: same as WinterSowing2015.ABlock.paddock.Harvesting
        Report SupReport: same as WinterSowing2015.ABlock.paddock.SupReport
        Soil: same as WinterSowing2016.RS2016.paddock.Soil
      SoilArbitrator Soil Arbitrator
  Experiment SowingDate2004
    Factors
      Factor Sow
        Factor HokMar
          Specifications:
            [Operations]
            [Fertilise].Script.SDSwitch = 1.0
          Operations
            2004-03-23  [Oats].Sow(population:200, cultivar:"Hokunui", depth:40, rowSpacing:150);
        Factor HokMay
          Specifications:
            [Operations]
            [Fertilise].Script.SDSwitch = 0.0
          Operations
            2004-05-28  [Oats].Sow(population:200, cultivar:"Hokunui", depth:40, rowSpacing:150);
        Factor HokSep
          Specifications:
            [Operations]
            [Fertilise].Script.SDSwitch = 2.0
          Operations
            2004-09-06  [Oats].Sow(population:200, cultivar:"Hokunui", depth:40, rowSpacing:150);
        Factor StamMar
          Specifications:
            [Operations]
            [Fertilise].Script.SDSwitch = 1.0
          Operations
            2004-03-23  [Oats].Sow(population:200, cultivar:"Stampede", depth:40, rowSpacing:150);
        Factor StamMay
          Specifications:
            [Operations]
            [Fertilise].Script.SDSwitch = 0.0
          Operations
            2004-05-28  [Oats].Sow(population:200, cultivar:"Stampede", depth:40, rowSpacing:150);
        Factor StamSep
          Specifications:
            [Operations]
            [Fertilise].Script.SDSwitch = 0.0
          Operations
            2004-09-06  [Oats].Sow(population:200, cultivar:"Stampede", depth:40, rowSpacing:150);
    Simulation PaddockS3
      Clock: StartDate=2004-03-20; EndDate=2005-02-01
      Summary summaryfile
      Weather: FileName=%root%\Examples\WeatherFiles\lincoln.met
      Zone paddock: Area=1; Slope=0
        Folder Manager folder: same as WinterSowing2016.RS2016.paddock.Manager folder
        Irrigation
        SurfaceOrganicMatter Surface Organic Matter: same as RS_Oats_9899.Rainshelter.paddock.Surface Organic Matter
        Fertiliser
        MicroClimate: a_interception=0; b_interception=1; c_interception=0; d_interception=0; soil_albedo=0.3; sun_angle=15; soil_heat_flux_fraction=0.4; night_interception_fraction=0.5; refheight=2; albedo=0.293662; emissivity=0.96; RadIntTotal=0
        Plant Oats: CropType=Oats
        Report DailyReport
        Report EndTrialReport: EventNames=[Clock].EndOfSimulation
          VariableNames:
            [Oats].Structure.LeafTipsAppeared
            [Oats].Structure.MainStemFinalNodeNumber
            [Oats].Phenology.FlagLeafDAS
            [Oats].Phenology.FloweringDAS
            [Oats].Phenology.MaturityDAS
        Manager Harvesting: same as WinterSowing2015.ABlock.paddock.Harvesting
        Report SupReport: same as WinterSowing2015.ABlock.paddock.SupReport
        Soil: same as WinterSowing2016.RS2016.paddock.Soil
      SoilArbitrator Soil Arbitrator
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