Simulations: Version=100
  Memo TitlePage
    # The APSIM Pinus Model
  Memo Introduction
    # Pinus Model Notes

    ## Plant Modelling Framework

    The APSIM Pinus model has been developed using the Plant Modelling Framework (PMF) of [brown_plant_2014] within  APSIM Next Generation [holzworth_apsim_2014]. This new framework provides a library of plant organ and process submodels that can be coupled, at runtime, to construct a model in much the same way that models can be coupled to construct a simulation. This means that dynamic composition of lower level processes and organ classes (e.g. photosynthesis, leaf) into larger constructions (e.g. maize, wheat, eucalyptus) can be achieved by the model developer without additional coding.

    ##Pecularities of Pinus and This Model

    The Pinus model consists of:

    * a phenology model to simulate development through sequential growth phases
    * a collection of organs to simulate the various plant parts
    * an arbitrator to allocate resources (N, biomass) to the various plant organs

    This work builds upon earlier APSIM forest models such as described by [Huthetal2002],[zerger_integrating_2001] and [huth_managing_2008].

    Pinus is a reasonably straight forward perennial crop to model. This model has been set up for simulation of even-aged plantations (transplanted seedlings) or native forests (also assumed to start the simulation as a transplanted seedling, but in practice it would be sown from naturally distributed seed). Plants grow in accordance with available resources and conditions, which in this version of the model are temperature, radiation, available soil water, and available soil nitrogen. Leaf, branch and roots senesce, remain attached for some time, then detach to produce litter. Above-ground biomass is the main target of production, which is made up of organs that develop from default partitioniing targets that is modified daily due to organ demand. Forest managers also deal with tree size, which are set in the model as a function of aboveground biomass. During model development, we found that Pinus model performance (plant or stand development) was particularly sensitive to leaf lifespan/longevity, specific leaf area, dead leaf detachment, partitioning to roots and shoots, mortality and thinning, and weeds (if present).

    There are many Pinus genotypes (species, closely related genera, provenances, families, clones, and hybrids) that can behave differently in response to their growing environment. This build of the Pinus model was calbirated on datasets of three species (E. globulus, E. saligna, E. grandis), one hybrid (E. grandis x E. urophylla), and two clones of this hybrid.

    ##Including a Pinus crop in an APSIM simulation

    There is a Pinus example simulation available by clicking the "Open an Example" icon available on the second tab displayed when APSIM Next Gen is opened.  This provides a useful demonstration of how to simulate a Pinus crop and provides some useful graphs for viewing model behaviour and performance.

    To incluce a Pinus crop in a simulation the "Pinus" model needs to be added to the paddock, field or zone in which it is to be grown.  This can be done by (a) right clicking on the "Paddock", selecting "Add" from the drop down menu and then selecting "Pinus" from the list that comes up, or (b) dragging or copying and pasting the model up from the standard toolbox.  A TreeSowingRule needs to be set up to start the crop off. So far, no harvesting or replanting is included in this simulation, but that option will be needed in the future, e.g. for simulation of multiple rotations.

    This document elsewhere provides a more detailed description of the model, describes the validation and test datasets, and model performance.
  Replacements
    Report: EventNames=[Clock].DoReport
      VariableNames:
        [Clock].Today
        [Pinus].Age
        [Pinus].AboveGround.Wt
        [Pinus].BelowGround.Wt
        [Pinus].Leaf.Dead.Wt
        [Pinus].Leaf.Live.Wt
        [Pinus].Branch.Live.Wt
        [Pinus].Leaf.Detached.Wt
        [Pinus].Stem.Live.Wt
        [Pinus].Total.N
        [Pinus].Leaf.Live.N
        [Pinus].Wood.Wt
        [Pinus].Leaf.CoverGreen
        [Pinus].Leaf.LAI
        [Pinus].TotalLive.Wt
        [Pinus].IndividualTreeLiveWt
        [Pinus].IndividualTreeStemWt
        [Pinus].Stem.DBH
        [Pinus].Stem.Ht
        [Pinus].RootShootRatio
        [Pinus].Stem.Vol
        [Pinus].Stem.MAI
    Report HarvestReport: EventNames=[Pinus].Harvesting
      VariableNames:
        [Clock].Today
        [Pinus].Stem.DBH
        [Pinus].Stem.Ht
        [Pinus].RootShootRatio
        [Pinus].Stem.Vol
        [Pinus].Stem.MAI
    Report SCRUMReport: EventNames=[Clock].DoReport
      VariableNames:
        [Clock].Today
        [SCRUM].Stover.LAI
        [SCRUM].Stover.Wt
    Plant Pinus: CropType=Eucalyptus; IsAlive=false; IsEnding=false; DaysAfterEnding=0
      Memo
        Root:shoot ratio, and allometric relationships for height (Ht, m), stem diameter (DBH, cm, over bark at 1.3 m height), and their derivatives (stem volume Vol, and mean annual increment MAI) were developed as a function of above-ground biomass from [almeida2003application], [almeida2004parameterisation], [borges2009parametrizaccao], [cromer1993response], and [norgueira2005estadonutricional]. Similarly, above-ground biomass as a function of stem weight or wood weight was developed from the same datasets plus [turner1986organic], [byrne1989above], [bradstock1981biomass], [polglase1995mineralization], [snow1999nitrogen], [snow1999modelling], [myers1996growth], [myers1998response], and [melo2015responses].
      AccumulateFunction Age: StartStageName=Emergence; EndStageName=Old; FractionRemovedOnCut=0; FractionRemovedOnHarvest=0; FractionRemovedOnGraze=0; FractionRemovedOnPrune=0
        Constant day: FixedValue=0.00273973; Units=years
          Memo
            This converts days of growth to age in years.
      Phenology
        StageBasedInterpolation StageCode: Stages=[Emergence, EndJuvenile, Maturity, Old]; Codes=[1, 2, 3, 4]; Proportional=true
        Constant ThermalTime: FixedValue=1; Units=^od
        GerminatingPhase Germinating: Start=Sowing; End=Germination
          Memo
            We make no distinction between sowing and transplanting in this model, but all sites used transplants not sown seeds. Initial weights are specified for leaf (1 g/plant) and fine root (0.2 g/plant), which implies these are transplants. Germinating and emerging phenology phases are included in case they are needed by later users. No planting shock is included, but this could be considered in future versions, e.g. delay in commencement of root downward growth.
        EmergingPhase Emerging: ShootLag=1; ShootRate=0; Start=Germination; End=Emergence; TTForTimeStep=0
          VariableReference ThermalTime: VariableName=[Phenology].ThermalTime
        GenericPhase Juvenile: Start=Emergence; End=EndJuvenile
          Constant Progression: FixedValue=1; Units=^od
          Constant Target: FixedValue=365; Units=^o
        GenericPhase Mature: Start=EndJuvenile; End=Maturity
          Constant Progression: FixedValue=1; Units=^od
          Constant Target: FixedValue=1825; Units=^o
        GenericPhase Declining: Start=Maturity; End=Old
          Constant Progression: FixedValue=1; Units=^od
          Constant Target: FixedValue=27010; Units=^o
        EndPhase Old: Start=Old; End=Unused
          Constant ThermalTime: FixedValue=1; Units=^od
      OrganArbitrator Arbitrator
        BiomassTypeArbitrator DMArbitration
          Folder PotentialPartitioningMethods
            ReallocationMethod
            AllocateFixationMethod
            RetranslocationMethod
            SendPotentialDMAllocationsMethod
          Folder AllocationMethods
            NutrientConstrainedAllocationMethod
            DryMatterAllocationsMethod
          RelativeAllocation ArbitrationMethod
        BiomassTypeArbitrator NArbitration
          Folder PotentialPartitioningMethods
            ReallocationMethod
          Folder ActualPartitioningMethods
            AllocateFixationMethod
            RetranslocationMethod
          Folder AllocationMethods
            NitrogenAllocationsMethod
          RelativeAllocation ArbitrationMethod
          AllocateUptakesMethod
        WaterUptakeMethod
        NitrogenUptakeMethod
      CompositeBiomass AboveGround: DMDOfStructural=0.6
        Propertys=[[Branch].Live, [Branch].Dead, [Leaf].Live, [Leaf].Dead, [Stem].Live, [Stem].Dead]
      CompositeBiomass BelowGround: DMDOfStructural=0.6
        Propertys=[[FineRoot].Live, [FineRoot].Dead, [CoarseRoot].Live, [CoarseRoot].Dead]
      CompositeBiomass Wood: Propertys=[[Stem].Live, [Stem].Dead, [Branch].Live, [Branch].Dead]; DMDOfStructural=0.6
      CompositeBiomass Total: DMDOfStructural=0.6
        Propertys=[[Leaf].Live, [Leaf].Dead, [Stem].Live, [Stem].Dead, [FineRoot].Live, [FineRoot].Dead, [CoarseRoot].Live, [CoarseRoot].Dead]
        Memo
          Note that this  property does not include branches.
      CompositeBiomass TotalLive: DMDOfStructural=0.6
        Propertys=[[Leaf].Live, [Stem].Live, [FineRoot].Live, [CoarseRoot].Live, [Branch].Live]
        Memo
          Note that this  property does not include branches, and it is used to calculate IndividualTreeLiveWt.
      CompositeBiomass TotalDead: DMDOfStructural=0.6
        Propertys=[[Leaf].Dead, [Stem].Dead, [FineRoot].Dead, [CoarseRoot].Dead]
        Memo
          Note that this  property does not include branches.
      DivideFunction IndividualTreeLiveWt
        VariableReference LiveWt: VariableName=[Pinus].TotalLive.Wt
        VariableReference Population: VariableName=[Pinus].Population
        Memo
          Note that this  property does not include branches. It is used in calculating DM Demands of several plant components.
      DivideFunction IndividualTreeStemWt
        VariableReference LiveWt: VariableName=[Pinus].Stem.Wt
        VariableReference Population: VariableName=[Pinus].Population
      PerennialLeaf Leaf: MaintenanceRespiration=0; GrowthRespiration=0; Albedo=0.15; Gsmax350=0.005; R50=200; LAI=0; Height=0; FRGR=0; PotentialEP=0; WaterDemand=0
        ExpressionFunction CO2internal: Expression=(163 - [IWeather].MeanT)/(5 - 0.1*[IWeather].MeanT)
        DivideFunction StomatalConductanceCO2Modifier
          VariableReference FCO2: VariableName=[Leaf].Photosynthesis.FCO2
          ExpressionFunction RelativeCO2Gradient
            Expression=([IWeather].CO2 - [Leaf].CO2internal)/(350 - [Leaf].CO2internal)
        MultiplyFunction InitialWtFunction
          Constant InitialPlantWt: FixedValue=1; Units=g/plant
            Memo
              This value is nominally low to reflect the dry weight of leaves on a transplanted seedling.
          VariableReference Population: VariableName=[Plant].Population
        Constant LaiDeadFunction: FixedValue=0; Units=m^2/m^2
        MinimumFunction FRGRFunction
          AirTemperatureFunction FRGRFunctionTemp: agregationMethod=0
            XYPairs TemperatureResponse: X=[5, 20, 25, 35]; Y=[0, 1, 1, 0]
              Memo
                This is an assumed temperature response function.
            ThreeHourSin InterpolationMethod
        ExpressionFunction ExtinctionCoefficient
          Expression=([ExtinctionCoefficient].KMatureTrees+([ExtinctionCoefficient].KYoungTrees-[ExtinctionCoefficient].KMatureTrees)*Exp((0-2)*([Pinus].Leaf.LAI/[ExtinctionCoefficient].LAIIntermediateK)^[ExtinctionCoefficient].ShapeCurve))
          Constant KYoungTrees: FixedValue=0.5
          Constant KMatureTrees: FixedValue=0.5
          Constant LAIIntermediateK: FixedValue=0.7
          Constant ShapeCurve: FixedValue=2
          Memo
            A value of 0.50 is commonly used for Pinus ([macfarlane2007estimation]).
        Constant ExtinctionCoefficientDead: FixedValue=0.5
        Constant MaximumNConc: FixedValue=0.03; Units=g/g
          Memo
            Foliar N concentrations are based on [leuning1991spatial].
        Constant MinimumNConc: FixedValue=0.01; Units=g/g
          Memo
            This is an assumed value.
        Constant NReallocationFactor: FixedValue=0; Units=/d
          Memo
            A value of zero assumes there is no N reallocation.
        WeightedTemperatureFunction SenescenceRate: MaximumTemperatureWeighting=0
          XYPairs: X=[-5, -2, 0, 2, 2.1]; Y=[0, 0, 0, 0, 0]
        BiomassRemoval BiomassRemovalDefaults
          OrganBiomassRemovalType Harvest: FractionLiveToRemove=0; FractionDeadToRemove=0; FractionLiveToResidue=0.99; FractionDeadToResidue=0.99
          OrganBiomassRemovalType Cut: FractionLiveToRemove=0.8; FractionDeadToRemove=0; FractionLiveToResidue=0; FractionDeadToResidue=0
          OrganBiomassRemovalType Prune: FractionLiveToRemove=0; FractionDeadToRemove=0; FractionLiveToResidue=0.6; FractionDeadToResidue=0
          Memo
            Values in this table reflect the live and dead fractions that are either removed from the system or transferred to the residue pool. Harvest, Cut and Prune methods will affect these values, but default values assume for Harvest assume delimbing at the stump.
        Constant DMConversionEfficiency: FixedValue=1; Units=g/g
        Constant LeafDetachmentTime: FixedValue=14; Units=d
          Memo
            A value here is the number of days between senseence and detachment. A value of 14 days is assumed.
        Constant DetachmentRateFunction: FixedValue=0; Units=/d
          Memo
            A value for DetachmentRateFunction is required in Leaf, Branch, Stem and CoarseRoot components of the model, but a zero value means that immediate detachment has been triggered. A non-zero option might be useful in the future for defining some genotypes.

            The same explanation applies to zero values below for retranslocation factors.
        Constant DMRetranslocationFactor: FixedValue=0; Units=/d
        Constant NRetranslocationFactor: FixedValue=0; Units=/d
        RUEModel Photosynthesis
          Constant RUE: FixedValue=1.4; Units=g/MJ
            Memo
              Aboveground RUE for Gliricidia was measured as 1.06 g/MJ by [harrington1995radiation]. Adding c. 0.3 for belowground allocation provides a value of 1.4 g/MJ.
          MinimumFunction FT
            WeightedTemperatureFunction FTDaytime: MaximumTemperatureWeighting=0.75
              XYPairs: X=[5, 20, 25, 35]; Y=[0, 1, 1, 0]
            WeightedTemperatureFunction FTFrost: MaximumTemperatureWeighting=0
              XYPairs: X=[-5, 0, 2]; Y=[1, 1, 1]
          LinearInterpolationFunction FVPD
            XYPairs: X=[0, 10, 50]; Y=[1, 1, 0]
            VariableReference XValue: VariableName=[Leaf].Photosynthesis.VPD
          LinearInterpolationFunction FN
            XYPairs: X=[0, 1, 1.5]; Y=[0, 1, 1]
            VariableReference XValue: VariableName=[Leaf].Fn
          LinearInterpolationFunction FW
            XYPairs: X=[0, 1, 1.5]; Y=[0, 1, 1]
            VariableReference XValue: VariableName=[Leaf].Fw
          RUECO2Function FCO2: PhotosyntheticPathway=C3
          VariableReference RadnInt: VariableName=[Leaf].RadIntTot
        Constant LeafKillFraction: FixedValue=0; Units=0-1
          Memo
            A value of zero assumes that no leaves are killed initially, but this value could be reset in an Operation to reflect, for example, an insect browsing attack, frost kill of foliage, or a pruning operation that removes leaves.
        Constant MinimumLAI: FixedValue=0.01; Units=m^2/m^2
        MultiplyFunction SpecificLeafAreaFunction
          LinearInterpolationFunction SpecificLeafAreaPot
            XYPairs: X=[0, 1, 2, 3, 8]; Y=[0.016, 0.0105, 0.0089, 0.0085, 0.0073]
            Memo
              Data for SLA (m^2/g)came from [borges2009parametrizaccao] and [almeida2003comparison]. Values and trends were similar. A generalised pattern should suffice for many applicatinos, but cultivar-specific patterns are available for some cultivars and could be used to slighly refine their simulation. These data are also similar to those in [rance2014assessment].
            VariableReference XValue: VariableName=[Pinus].Age
          LinearInterpolationFunction CO2Modifier
            XYPairs: X=[350, 850]; Y=[1, 0.8]
            VariableReference XValue: VariableName=[IWeather].CO2
        LinearInterpolationFunction LeafResidenceTime
          XYPairs: X=[0, 1, 2, 3, 8]; Y=[100, 140, 180, 220, 280]
          Memo
            This function specifies that lead residence time increases with age. Values are based on [laclau2009influence].
          VariableReference XValue: VariableName=[Pinus].Age
        MultiplyFunction LeafDevelopmentRate
          Constant LDR: FixedValue=1; Units=0-1
          WeightedTemperatureFunction FT: MaximumTemperatureWeighting=1
            XYPairs: X=[10, 26, 33, 34]; Y=[0, 1, 1, 0]
              Memo
                This is an assumed and tuned function of leaf development rate in relation to weighted air temperature.
        Constant CarbonConcentration: FixedValue=0.45; Units=g/g
          Memo
            This value is based on [ribeiro2015aboveground].
        ExpressionFunction HeightFunction: Expression=[Stem].Ht*1000
          Memo
            This converts stem height in m to mm for use else where in the model.
        BiomassDemand DMDemands
          Memo
            DM demands are set in a similar ways for each organ, but with different values: structural (default specified), metabolic (value = 0), and storage functions (1 - structural). Values measured range from about 5 to 50% for eucalyptus leaves ([quentin2015non]), which also covers the range of 1-20% for other species and plant parts ([hoch2003non]). Metabolic demand is set to zero, because RUE is a value for net growth for which a respiration calculation is not needed. These values may become an important focus if one attempts to use the model for coppicing, as is already the case in several other APSIM models, e.g. lucerne and gliricidia.
          MultiplyFunction Structural
            PartitionFractionDemandFunction DMDemandFunction
              LinearInterpolationFunction PartitionFraction
                XYPairs: X=[0, 1000, 10000]; Y=[0.19, 0.19, 0.2]
                VariableReference XValue: VariableName=[Pinus].IndividualTreeLiveWt
            Constant StructuralFraction: FixedValue=0.99; Units=0-1
          Constant Metabolic: FixedValue=0
          Constant Storage: FixedValue=0
        BiomassDemand NDemands
          Memo
            N demands are set in a similar ways to DM demands, which are described above.
          MultiplyFunction Structural
            VariableReference MinNconc: VariableName=[Leaf].minimumNconc
            VariableReference PotentialDMAllocation: VariableName=[Leaf].potentialDMAllocation.Structural
          Constant Metabolic: FixedValue=0
          StorageNDemandFunction Storage
            VariableReference MaxNconc: VariableName=[Leaf].MaximumNconc
            Constant NitrogenDemandSwitch: FixedValue=1
      GenericOrgan Branch: IsAboveGround=true
        Memo
          For many of the parameters in this organ, see comments for similar parameters in the leaf organ.
        Constant NReallocationFactor: FixedValue=0; Units=/d
        Constant NRetranslocationFactor: FixedValue=0.05; Units=/d
        PhaseBasedSwitch NitrogenDemandSwitch: Start=Emergence; End=Old
        Constant DMRetranslocationFactor: FixedValue=0; Units=/d
        Constant SenescenceRate: FixedValue=0; Units=/d
        Constant MaximumNConc: FixedValue=0.01; Units=g/g
        Constant MinimumNConc: FixedValue=0.0014; Units=g/g
        Constant DetachmentRateFunction: FixedValue=0; Units=/d
        Constant MaintenanceRespirationFunction: FixedValue=0; Units=0-1
        Constant DMConversionEfficiency: FixedValue=1; Units=0-1
        BiomassRemoval BiomassRemovalDefaults
          OrganBiomassRemovalType Harvest: FractionLiveToRemove=0; FractionDeadToRemove=0; FractionLiveToResidue=1; FractionDeadToResidue=1
          OrganBiomassRemovalType Cut: FractionLiveToRemove=0.8; FractionDeadToRemove=0; FractionLiveToResidue=0; FractionDeadToResidue=0
          OrganBiomassRemovalType Prune: FractionLiveToRemove=0; FractionDeadToRemove=0; FractionLiveToResidue=0.6; FractionDeadToResidue=0
          OrganBiomassRemovalType Thin: FractionLiveToRemove=0; FractionDeadToRemove=0; FractionLiveToResidue=0.05; FractionDeadToResidue=0
        Constant DMReallocationFactor: FixedValue=0; Units=/d
        VariableReference CriticalNConc: VariableName=[Branch].MinimumNConc
        Constant RemobilisationCost: FixedValue=0
        Constant CarbonConcentration: FixedValue=0.45; Units=g/g
        BiomassDemand DMDemands
          Memo
            DM or N demands here are set in a similar way to those described above for the leaf organ.
          MultiplyFunction Structural
            PartitionFractionDemandFunction DMDemandFunction
              LinearInterpolationFunction PartitionFraction
                XYPairs: X=[0, 1000, 10000]; Y=[0.06, 0.06, 0.06]
                VariableReference XValue: VariableName=[Pinus].IndividualTreeLiveWt
            Constant StructuralFraction: FixedValue=0.99; Units=0-1
          Constant Metabolic: FixedValue=0
          StorageDMDemandFunction Storage
            SubtractFunction StorageFraction
              Constant One: FixedValue=1
              VariableReference StructuralFraction: VariableName=[Branch].DMDemands.Structural.StructuralFraction
        BiomassDemand NDemands
          Memo
            DM or N demands here are set in a similar way to those described above for the leaf organ.
          MultiplyFunction Structural
            VariableReference MinNconc: VariableName=[Branch].minimumNconc
            VariableReference PotentialDMAllocation: VariableName=[Branch].potentialDMAllocation.Structural
          MultiplyFunction Metabolic
            SubtractFunction MetabolicNconc
              VariableReference CritNconc: VariableName=[Branch].criticalNConc
              VariableReference MinNconc: VariableName=[Branch].minimumNconc
            VariableReference PotentialDMAllocation: VariableName=[Branch].potentialDMAllocation.Structural
          StorageNDemandFunction Storage
            VariableReference NitrogenDemandSwitch: VariableName=[Branch].nitrogenDemandSwitch
            VariableReference MaxNconc: VariableName=[Branch].maximumNconc
        RetranslocateNonStructural RetranslocateNitrogen
        BiomassDemand InitialWt
          Constant Structural: FixedValue=0; Units=g
          Constant Metabolic: FixedValue=0
          Constant Storage: FixedValue=0
      GenericOrgan Stem: IsAboveGround=true
        Memo
          For many of the parameters in this organ, see comments for similar parameters in the leaf organ.
        Constant NReallocationFactor: FixedValue=0; Units=/d
        Constant NRetranslocationFactor: FixedValue=0.05; Units=/d
        PhaseBasedSwitch NitrogenDemandSwitch: Start=Emergence; End=Old
        Constant DMRetranslocationFactor: FixedValue=0; Units=/d
        Constant SenescenceRate: FixedValue=0; Units=/d
        Constant MaximumNConc: FixedValue=0.01; Units=g/g
          Memo
            Branch, stem and coarse root minimum N concentrations are based on [raymond2000effect].
        Constant MinimumNConc: FixedValue=0.0014; Units=g/g
        Constant DetachmentRateFunction: FixedValue=0; Units=/d
        Constant MaintenanceRespirationFunction: FixedValue=0; Units=0-1
        Constant DMConversionEfficiency: FixedValue=1; Units=0-1
        BiomassRemoval BiomassRemovalDefaults
          OrganBiomassRemovalType Harvest: FractionLiveToRemove=1; FractionDeadToRemove=1; FractionLiveToResidue=0; FractionDeadToResidue=0
          OrganBiomassRemovalType Cut: FractionLiveToRemove=0.8; FractionDeadToRemove=0; FractionLiveToResidue=0; FractionDeadToResidue=0
          OrganBiomassRemovalType Prune: FractionLiveToRemove=0; FractionDeadToRemove=0; FractionLiveToResidue=0.6; FractionDeadToResidue=0
          OrganBiomassRemovalType Thin: FractionLiveToRemove=0; FractionDeadToRemove=0; FractionLiveToResidue=0.05; FractionDeadToResidue=0
        Constant DMReallocationFactor: FixedValue=0; Units=/d
        VariableReference CriticalNConc: VariableName=[Stem].MinimumNConc
        Constant CarbonConcentration: FixedValue=0.45; Units=g/g
        Constant RemobilisationCost: FixedValue=0
        ExpressionFunction DBH: Expression=0.685*([Pinus].AboveGround.Wt^0.3262)
        MaximumFunction Ht
          ExpressionFunction HeightFunction: Expression=0.5201*([Pinus].Stem.DBH^1.3604)
          Constant MinimumHeight: FixedValue=0.1; Units=m
        LessThanFunction Vol
          VariableReference Height: VariableName=[Stem].Ht
          Constant MinimumHeight: FixedValue=2
          Constant Zero: FixedValue=0
          ExpressionFunction VolumeEquation
            Expression=(((((([Pinus].Stem.DBH)/2)^2)*3.14159)/3)*([Pinus].Stem.Ht*100))*[Pinus].Population*10000/1000000
            Memo
              Stem volume is calculated as concical volume with the base of the cone the same diameter as at breast height (1.3 m height). Units are m3 stem/ha.
        ExpressionFunction MAI: Expression=[Pinus].Stem.Vol/[Pinus].Age
          Memo
            MAI = Mean Annual Increment (m3/ha/year) of stem

            MAI, which is based on stem volume, depends entirely on the allometric equation used for DBH, and on which Ht in-turn is direclty based. The Brazilian dataset on which these relationships were based did not include large trees. It is likely that the relationships over-predict DBH, Ht, Vol and MAI at larger sizes than included in the calibration dataset, which may have been a problem for the Gympie and Coffs sites. Although Coffs in the validation dataset included large trees, DBH and Ht data were not avialable from that site to include in the calibration. The developers of this model encourage redefinition of the DBH, Ht and Vol functions for specific future applications that include large trees.
        BiomassDemand DMDemands
          Memo
            DM or N demands here are set in a similar way to those described above for the leaf organ.
          MultiplyFunction Structural
            PartitionFractionDemandFunction DMDemandFunction
              LinearInterpolationFunction PartitionFraction
                XYPairs: X=[0, 2000, 10000]; Y=[0.35, 0.45, 0.58]
                VariableReference XValue: VariableName=[Pinus].IndividualTreeLiveWt
            Constant StructuralFraction: FixedValue=0.99; Units=0-1
          Constant Metabolic: FixedValue=0
          StorageDMDemandFunction Storage
            SubtractFunction StorageFraction
              Constant One: FixedValue=1
              VariableReference StructuralFraction: VariableName=[Stem].DMDemands.Structural.StructuralFraction
        BiomassDemand NDemands
          Memo
            DM or N demands here are set in a similar way to those described above for the leaf organ.
          MultiplyFunction Structural
            VariableReference MinNconc: VariableName=[Stem].minimumNconc
            VariableReference PotentialDMAllocation: VariableName=[Stem].potentialDMAllocation.Structural
          MultiplyFunction Metabolic
            SubtractFunction MetabolicNconc
              VariableReference CritNconc: VariableName=[Stem].criticalNConc
              VariableReference MinNconc: VariableName=[Stem].minimumNconc
            VariableReference PotentialDMAllocation: VariableName=[Stem].potentialDMAllocation.Structural
          StorageNDemandFunction Storage
            VariableReference NitrogenDemandSwitch: VariableName=[Stem].nitrogenDemandSwitch
            VariableReference MaxNconc: VariableName=[Stem].maximumNconc
        RetranslocateNonStructural RetranslocateNitrogen
        BiomassDemand InitialWt
          Constant Structural: FixedValue=0; Units=g
          Constant Metabolic: FixedValue=0
          Constant Storage: FixedValue=0
      GenericOrgan CoarseRoot: IsAboveGround=true
        Memo
          For many of the parameters in this organ, see comments for similar parameters in the leaf organ.
        Constant NReallocationFactor: FixedValue=0; Units=/d
        Constant NRetranslocationFactor: FixedValue=0.05; Units=/d
        PhaseBasedSwitch NitrogenDemandSwitch: Start=Emergence; End=Old
        Constant DMRetranslocationFactor: FixedValue=0; Units=0-1
        Constant SenescenceRate: FixedValue=0; Units=/d
        Constant MaximumNConc: FixedValue=0.01; Units=g/g
        Constant MinimumNConc: FixedValue=0.0014; Units=g/g
        Constant DetachmentRateFunction: FixedValue=0; Units=/d
        Constant MaintenanceRespirationFunction: FixedValue=0; Units=0-1
        Constant DMConversionEfficiency: FixedValue=1; Units=0-1
        BiomassRemoval BiomassRemovalDefaults: same as Replacements.Pinus.Branch.BiomassRemovalDefaults
        Constant DMReallocationFactor: FixedValue=0; Units=0-1
        VariableReference CriticalNConc: VariableName=[Stem].MinimumNConc
        Constant RemobilisationCost: FixedValue=0
        Constant CarbonConcentration: FixedValue=0.45; Units=g/g
        BiomassDemand DMDemands
          Memo
            DM or N demands here are set in a similar way to those described above for the leaf organ.
          MultiplyFunction Structural
            PartitionFractionDemandFunction DMDemandFunction
              LinearInterpolationFunction PartitionFraction
                XYPairs: X=[0, 1000, 10000]; Y=[0.01, 0.03, 0.05]
                VariableReference XValue: VariableName=[Pinus].IndividualTreeLiveWt
            Constant StructuralFraction: FixedValue=0.99; Units=0-1
          Constant Metabolic: FixedValue=0
          StorageDMDemandFunction Storage
            SubtractFunction StorageFraction
              Constant One: FixedValue=1
              VariableReference StructuralFraction: VariableName=[CoarseRoot].DMDemands.Structural.StructuralFraction
        BiomassDemand NDemands
          Memo
            DM or N demands here are set in a similar way to those described above for the leaf organ.
          MultiplyFunction Structural
            VariableReference MinNconc: VariableName=[CoarseRoot].minimumNconc
            VariableReference PotentialDMAllocation: VariableName=[CoarseRoot].potentialDMAllocation.Structural
          MultiplyFunction Metabolic
            SubtractFunction MetabolicNconc
              VariableReference CritNconc: VariableName=[CoarseRoot].criticalNConc
              VariableReference MinNconc: VariableName=[CoarseRoot].minimumNconc
            VariableReference PotentialDMAllocation: VariableName=[CoarseRoot].potentialDMAllocation.Structural
          StorageNDemandFunction Storage
            VariableReference NitrogenDemandSwitch: VariableName=[CoarseRoot].nitrogenDemandSwitch
            VariableReference MaxNconc: VariableName=[CoarseRoot].maximumNconc
        RetranslocateNonStructural RetranslocateNitrogen
        BiomassDemand InitialWt
          Constant Structural: FixedValue=0; Units=g
          Constant Metabolic: FixedValue=0
          Constant Storage: FixedValue=0
      Root FineRoot: GrowthRespiration=0; MaintenanceRespiration=0
        RootShapeCylindre RootShape
        Memo
          For many of the parameters in this organ, see comments for similar parameters in the leaf organ.
        PhaseBasedSwitch NitrogenDemandSwitch: Start=Emergence; End=Old
        Constant RootFrontVelocity: FixedValue=10; Units=mm/d
          Memo
            [huth_managing_2008] measured a constant root front velocity of 24.3 mm/d down to 1.4 m depth under favourable growing conditions, which was similar to wheat. [goncalves2013integrating] report eucalypt root front velocities averaging 19 mm/day for the first 1.5 years to 12 mm/day by 3.5 years in conditions of little impedence to root growth. The value of 10 mm/d used here is lower to reflect more common limiting conditions.
        Constant SenescenceRate: FixedValue=0.005; Units=/d
        Constant MaxDailyNUptake: FixedValue=6; Units=kg/ha/d
        Constant MaximumNConc: FixedValue=0.01; Units=g/g
          Memo
            Fine root N concentrations are based on [gordon2000nutrient].
        Constant MinimumNConc: FixedValue=0.003; Units=g/g
        Constant MaximumRootDepth: FixedValue=10000; Units=mm
        Constant KLModifier: FixedValue=1
        Constant KNO3: FixedValue=0.03
        Constant KNH4: FixedValue=3e-06
        LinearInterpolationFunction NUptakeSWFactor
          XYPairs: X=[0, 1]; Y=[0, 1]
          VariableReference XValue: VariableName=[Root].RWC
        Constant SpecificRootLength: FixedValue=40; Units=m/g
          Memo
            Specific root length was based on [jourdan2008fine].
        BiomassRemoval BiomassRemovalDefaults
          OrganBiomassRemovalType Harvest: FractionLiveToRemove=0; FractionDeadToRemove=0; FractionLiveToResidue=1; FractionDeadToResidue=1
          OrganBiomassRemovalType Cut: FractionLiveToRemove=0.8; FractionDeadToRemove=0; FractionLiveToResidue=0; FractionDeadToResidue=0
          OrganBiomassRemovalType Prune: FractionLiveToRemove=0; FractionDeadToRemove=0; FractionLiveToResidue=0.6; FractionDeadToResidue=0
        Constant DMConversionEfficiency: FixedValue=1; Units=0-1
        Constant MaintenanceRespirationFunction: FixedValue=0; Units=0-1
        Constant RemobilisationCost: FixedValue=0
        Constant CarbonConcentration: FixedValue=0.45; Units=g/g
        BiomassDemand DMDemands
          Memo
            DM or N demands here are set in a similar way to those described above for the leaf organ.
          MultiplyFunction Structural
            PartitionFractionDemandFunction DMDemandFunction
              Constant PartitionFraction: FixedValue=0.25
            Constant StructuralFraction: FixedValue=1
          Constant Metabolic: FixedValue=0
          StorageDMDemandFunction Storage
            SubtractFunction StorageFraction
              Constant One: FixedValue=1
              VariableReference StructuralFraction: VariableName=[FineRoot].DMDemands.Structural.StructuralFraction
        BiomassDemand NDemands
          Memo
            DM or N demands here are set in a similar way to those described above for the leaf organ.
          MultiplyFunction Structural
            VariableReference MinNconc: VariableName=[FineRoot].minimumNconc
            VariableReference PotentialDMAllocation: VariableName=[FineRoot].potentialDMAllocation.Structural
          MultiplyFunction Metabolic
            SubtractFunction MetabolicNconc
              VariableReference CritNconc: VariableName=[FineRoot].criticalNConc
              VariableReference MinNconc: VariableName=[FineRoot].minimumNconc
            VariableReference PotentialDMAllocation: VariableName=[FineRoot].potentialDMAllocation.Structural
          StorageNDemandFunction Storage
            VariableReference NitrogenDemandSwitch: VariableName=[FineRoot].nitrogenDemandSwitch
            VariableReference MaxNconc: VariableName=[FineRoot].maximumNconc
        VariableReference CriticalNConc: VariableName=[Root].MinimumNConc
        BiomassDemand InitialWt
          Constant Structural: FixedValue=0.2; Units=g/plant
          Constant Metabolic: FixedValue=0
          Constant Storage: FixedValue=0
      DivideFunction RootShootRatio
        VariableReference Numerator: VariableName=[Pinus].BelowGround.Wt
        VariableReference Denominator: VariableName=[Pinus].AboveGround.Wt
      CultivarFolder grandis
        Cultivar grandis
          Memo Genotype note
            This genotype specification was originally planned to be for the species E. grandis in general, but we did not actually provide any specific parameters. As no parameter values were changed here, generic Pinus parameters were used where this genotype was specified in a simulation.
        Cultivar grandisCoffsHarbour
          Memo Genotype note
            This genotype specification is for a Coffs Harbour provenance of E. grandis, but as no actually genotype-specific parameters are specified, simulations using this genotype use the unchanged parameter set of the main Pinus model.
        Cultivar grandisC15
          Command:
            [CoarseRoot].DMDemands.Structural.DMDemandFunction.PartitionFraction.XYPairs.X=0,1000,10000
            [CoarseRoot].DMDemands.Structural.DMDemandFunction.PartitionFraction.XYPairs.Y=0,0.03,0.04
            [Leaf].DMDemands.Structural.DMDemandFunction.PartitionFraction.XYPairs.X=0,1000,10000,20000,50000,80000
            [Leaf].DMDemands.Structural.DMDemandFunction.PartitionFraction.XYPairs.Y=0.24,0.2,0.2,.23,0.2,.12
            [Branch].DMDemands.Structural.DMDemandFunction.PartitionFraction.XYPairs.X=0,1000,10000,20000,50000,80000
            [Branch].DMDemands.Structural.DMDemandFunction.PartitionFraction.XYPairs.Y=.06,.06,.06,.05,.04,.03
            [FineRoot].DMDemands.Structural.DMDemandFunction.PartitionFraction.FixedValue=0.2
            [Stem].DMDemands.Structural.DMDemandFunction.PartitionFraction.XYPairs.X=0,1000,10000,20000,30000,80000
            [Stem].DMDemands.Structural.DMDemandFunction.PartitionFraction.XYPairs.Y=0.2,0.45,0.7,0.99,0.99,.99
          Memo Genotype note
            This genotype specification was used to specifiy partitioning to for the C15 clone used by the Aracruz company (now Fibria), in order to approximate the root:shoot ratios reported in [almeida].
        Cultivar grandisC22
          Command:
            [CoarseRoot].DMDemands.Structural.DMDemandFunction.PartitionFraction.XYPairs.X=0,1000,10000
            [CoarseRoot].DMDemands.Structural.DMDemandFunction.PartitionFraction.XYPairs.Y=0,0.08,0.08
            [Leaf].DMDemands.Structural.DMDemandFunction.PartitionFraction.XYPairs.X=0,1000,10000,20000,50000,80000
            [Leaf].DMDemands.Structural.DMDemandFunction.PartitionFraction.XYPairs.Y=0.22,0.2,0.19,0.13,0.10,.06
          Memo Genotype note
            This genotype specification was used to specifiy partitioning to for the C22 clone used by the Aracruz company (now Fibria), in order to approximate the root:shoot ratios reported in [almeida].
      CultivarFolder grandisXurophylla
        Cultivar grandisXurophylla
          Memo Genotype note
            This genotype specification was originally planned to be for a cline of grandisXurophylla, but we did not actually provide any specific parameters. As no parameter values were changed here, generic Pinus parameters were used where this genotype was specified in a simulation.
        Cultivar grandisXurophyllaC3334
          Memo Genotype note
            This genotype specification was originally planned to be for the clone C3334, but we did not actually provide any specific parameters. As no parameter values were changed here, generic Pinus parameters were used where this genotype was specified in a simulation.
        Cultivar grandisXurophyllaC3336
          Memo Genotype note
            This genotype specification was originally planned to be for the clone C3336, but we did not actually provide any specific parameters. As no parameter values were changed here, generic Pinus parameters were used where this genotype was specified in a simulation.
      CultivarFolder urophyllaXglobulus
        Cultivar urophyllaXglobulus
          Memo Genotype note
            This genotype specification was originally planned to be for the urophyllaXglobulus hybird of E. grandis, but we did not actually provide any specific parameters. As no parameter values were changed here, generic Pinus parameters were used where this genotype was specified in a simulation.
      CultivarFolder BrazilClones
        Cultivar BrazilPlasticClone
          Command:
            [Leaf].Photosynthesis.RUE.FixedValue = 1.51
            [Leaf].ExtinctionCoefficient.KYoungTrees.FixedValue = 0.34
            [Leaf].ExtinctionCoefficient.KMatureTrees.FixedValue = 0.60
            [Stem].DMDemands.Structural.DMDemandFunction.PartitionFraction.XYPairs.X=0,2000,10000
            [Stem].DMDemands.Structural.DMDemandFunction.PartitionFraction.XYPairs.Y=0.15, 0.39, 0.61
            [Branch].DMDemands.Structural.DMDemandFunction.PartitionFraction.XYPairs.X=0,2000,10000
            [Branch].DMDemands.Structural.DMDemandFunction.PartitionFraction.XYPairs.Y=0.09,0.09,0.09
            [Leaf].DMDemands.Structural.DMDemandFunction.PartitionFraction.XYPairs.X=0,2000,10000
            [Leaf].DMDemands.Structural.DMDemandFunction.PartitionFraction.XYPairs.Y= 0.2, 0.17, 0.15
            [Leaf].Photosynthesis.FT.FTDaytime.XYPairs.X=  8, 18, 23, 40
            [Leaf].Photosynthesis.FT.FTDaytime.XYPairs.Y 0, 1, 1, 0
            [Leaf].Photosynthesis.FT.FTFrost.XYPairs.X= -5, -2, -1, 0, 1, 2, 2.1
            [Leaf].Photosynthesis.FT.FTFrost.XYPairs.Y = 0, 0, 0, 0, 0, 0.9, 1
            [Leaf].SenescenceRate.XYPairs.X=  -5,  -2,  0,    2,  2.1
            [Leaf].SenescenceRate.XYPairs.Y = 0.7, 0.5, 0.2, 0.1, 0
            [CoarseRoot].DMDemands.Structural.DMDemandFunction.PartitionFraction.XYPairs.X=0,2000,10000
            [CoarseRoot].DMDemands.Structural.DMDemandFunction.PartitionFraction.XYPairs.Y=0.005,0.03,0.04
            [FineRoot].DMDemands.Structural.DMDemandFunction.PartitionFraction.FixedValue = 0.26
        Cultivar BrazilTropicalClone
          Command:
            [Leaf].Photosynthesis.RUE.FixedValue = 1.69
            [Leaf].ExtinctionCoefficient.KYoungTrees.FixedValue = 0.30
            [Leaf].ExtinctionCoefficient.KMatureTrees.FixedValue = 0.56
            [Stem].DMDemands.Structural.DMDemandFunction.PartitionFraction.XYPairs.X=0,2000,10000
            [Stem].DMDemands.Structural.DMDemandFunction.PartitionFraction.XYPairs.Y=0.15,0.40, 0.64
            [Branch].DMDemands.Structural.DMDemandFunction.PartitionFraction.XYPairs.X=0,2000,10000
            [Branch].DMDemands.Structural.DMDemandFunction.PartitionFraction.XYPairs.Y=0.08,0.08,0.08
            [Leaf].DMDemands.Structural.DMDemandFunction.PartitionFraction.XYPairs.X=0,2000,10000
            [Leaf].DMDemands.Structural.DMDemandFunction.PartitionFraction.XYPairs.Y= 0.19, 0.17, 0.17
            [Leaf].Photosynthesis.FT.FTDaytime.XYPairs.X=  8, 18, 23, 40
            [Leaf].Photosynthesis.FT.FTDaytime.XYPairs.Y 0, 1, 1, 0
            [Leaf].Photosynthesis.FT.FTFrost.XYPairs.X= -5, -2, -1, 0, 1, 2, 2.1
            [Leaf].Photosynthesis.FT.FTFrost.XYPairs.Y = 0, 0, 0, 0, 0, 0.9, 1
            [Leaf].SenescenceRate.XYPairs.X=  -5,  -2,  0,    2,  2.1
            [Leaf].SenescenceRate.XYPairs.Y = 0.7, 0.5, 0.2, 0.1, 0
            [CoarseRoot].DMDemands.Structural.DMDemandFunction.PartitionFraction.XYPairs.X=0,2000,10000
            [CoarseRoot].DMDemands.Structural.DMDemandFunction.PartitionFraction.XYPairs.Y=0.03,0.1,0.1
            [FineRoot].DMDemands.Structural.DMDemandFunction.PartitionFraction.FixedValue = 0.35
            [Leaf].SpecificLeafAreaFunction.SpecificLeafAreaPot.XYPairs.X= 0, 1, 2, 3, 4, 80
            [Leaf].SpecificLeafAreaFunction.SpecificLeafAreaPot.XYPairs.Y= 0.018, 0.014, 0.011, 0.009, 0.008, 0.007
        Cultivar BrazilSubTropicalClone
          Command:
            [Leaf].Photosynthesis.RUE.FixedValue = 1.57
            [Leaf].ExtinctionCoefficient.KYoungTrees.FixedValue = 0.26
            [Leaf].ExtinctionCoefficient.KMatureTrees.FixedValue = 0.55
            [Stem].DMDemands.Structural.DMDemandFunction.PartitionFraction.XYPairs.X=0,2000,10000
            [Stem].DMDemands.Structural.DMDemandFunction.PartitionFraction.XYPairs.Y=0.15, 0.30, 0.57
            [Branch].DMDemands.Structural.DMDemandFunction.PartitionFraction.XYPairs.X=0,2000,10000
            [Branch].DMDemands.Structural.DMDemandFunction.PartitionFraction.XYPairs.Y=0.09,0.09,0.09
            [Leaf].DMDemands.Structural.DMDemandFunction.PartitionFraction.XYPairs.X=0,2000,10000
            [Leaf].DMDemands.Structural.DMDemandFunction.PartitionFraction.XYPairs.Y= 0.20, 0.16, 0.15
            [Leaf].Photosynthesis.FT.FTDaytime.XYPairs.X=  6, 17, 22, 38
            [Leaf].Photosynthesis.FT.FTDaytime.XYPairs.Y 0, 1, 1, 0
            [Leaf].Photosynthesis.FT.FTFrost.XYPairs.X= -5, -2, -1, 0, 1, 2, 2.1
            [Leaf].Photosynthesis.FT.FTFrost.XYPairs.Y = 0.5, 1, 1, 1, 1, 1, 1
            [Leaf].SenescenceRate.XYPairs.X=  -5,  -2,  0,    2,  2.1
            [Leaf].SenescenceRate.XYPairs.Y = 0.7, 0.5, 0.2, 0.1, 0
            [CoarseRoot].DMDemands.Structural.DMDemandFunction.PartitionFraction.XYPairs.X=0,2000,10000
            [CoarseRoot].DMDemands.Structural.DMDemandFunction.PartitionFraction.XYPairs.Y=0.02,0.05,0.06
            [FineRoot].DMDemands.Structural.DMDemandFunction.PartitionFraction.FixedValue = 0.24
            [Leaf].SpecificLeafAreaFunction.SpecificLeafAreaPot.XYPairs.X= 0, 1, 2, 3, 4, 80
            [Leaf].SpecificLeafAreaFunction.SpecificLeafAreaPot.XYPairs.Y= 0.015, 0.013, 0.009, 0.008, 0.007, 0.007
      CultivarFolder saligna
        Cultivar saligna
          Memo Genotype note
            This genotype specification was originally planned to be for the species E. saligna, but we did not actually provide any specific parameters. As no parameter values were changed here, generic Pinus parameters were used where this genotype was specified in a simulation.
  DataStore
    ExcelInput Observed: SheetNames=[Observed]
      FileNames=[C:\Users\sme016\OneDrive - CSIRO\1. FWPA Next Gen Resource Assessment\APSIM Pinus\Pinus\Observed.xlsx]
    PredictedObserved: PredictedTableName=Report; ObservedTableName=Observed; FieldNameUsedForMatch=Clock.Today
  Folder Validation
    Memo ValidationIntro
      Validation datasets have been included to assist with validation during model development. Validation datasets cover a range of environmental (soil and climate) conditions, management options (populations, nitrogen rates, irrigation) and genetic backgrounds (different regions, provenence, clones).  These datasets have been grouped and ordered in this simulation by country, and alphebetically within country.  Graphs of model performance are provided for biomass production and canopy development. Where a dataset did not include aboveground biomass, but instead a related parameter like stem volume or biomass, the latter was converted to aboveground biomass by a regression based on the rest of the validation dataset.

      Observed data are shown compared to predictions.
    Memo Genotype note
      This genotype specification was used to specifiy partitioning to roots and shoots for the C15 clone used by the Aracruz company (then Fibria, and now Suzano), in order to approximate the root:shoot ratios reported in [almeida].
    Memo
      This map shows the location of all datasets.
  Folder Gympie
    Memo
      This experiment is described in [cromer1993response] and [cromer1993responseN]. Some soil input data are from [ross1991soils]. Experimental treatments were factorial combinations of two levels each of irrigation and fertilisation applied to _E. grandis._ Most growth response was to fertiliser, which included NPK, but only N is simulated, which assumes that other nutrients were present at adequate levels.
    Experiment Gympie
      Factors
        Factor Treatment: Specification=[Operations]
          Operations C
            1989-04-19  [TreeThinning].Script.DoThin(0.03);
            1993-06-02  [TreeThinning].Script.DoThin(0.03);
            1995-07-02  [TreeThinning].Script.DoThin(0.03);
          Operations I
            1987-02-08  [Irrigation].Apply(amount: 2.2533);
            1987-02-15  [Irrigation].Apply(amount: 2.2533);
            1987-02-22  [Irrigation].Apply(amount: 2.2533);
            1987-03-01  [Irrigation].Apply(amount: 2.2533);
            1987-03-08  [Irrigation].Apply(amount: 25.5633);
            1987-03-15  [Irrigation].Apply(amount: 25.5633);
            1987-03-22  [Irrigation].Apply(amount: 25.5633);
            1987-03-29  [Irrigation].Apply(amount: 25.5633);
            1987-04-08  [Irrigation].Apply(amount: 21.5229);
            1987-04-15  [Irrigation].Apply(amount: 21.5229);
            1987-04-22  [Irrigation].Apply(amount: 21.5229);
            1987-04-29  [Irrigation].Apply(amount: 21.5229);
            1987-05-08  [Irrigation].Apply(amount: 13.6752);
            1987-05-15  [Irrigation].Apply(amount: 13.6752);
            1987-05-22  [Irrigation].Apply(amount: 13.6752);
            1987-05-29  [Irrigation].Apply(amount: 13.6752);
            1987-06-08  [Irrigation].Apply(amount: 0);
            1987-06-15  [Irrigation].Apply(amount: 0);
            1987-06-22  [Irrigation].Apply(amount: 0);
            1987-06-29  [Irrigation].Apply(amount: 0);
            1987-07-08  [Irrigation].Apply(amount: 17.6379);
            1987-07-15  [Irrigation].Apply(amount: 17.6379);
            1987-07-22  [Irrigation].Apply(amount: 17.6379);
            1987-07-29  [Irrigation].Apply(amount: 17.6379);
            1987-08-08  [Irrigation].Apply(amount: 7.77);
            1987-08-15  [Irrigation].Apply(amount: 7.77);
            1987-08-22  [Irrigation].Apply(amount: 7.77);
            1987-08-29  [Irrigation].Apply(amount: 7.77);
            1987-09-08  [Irrigation].Apply(amount: 16.58895);
            1987-09-15  [Irrigation].Apply(amount: 16.58895);
            1987-09-22  [Irrigation].Apply(amount: 16.58895);
            1987-09-29  [Irrigation].Apply(amount: 16.58895);
            1987-10-08  [Irrigation].Apply(amount: 15.8508);
            1987-10-15  [Irrigation].Apply(amount: 15.8508);
            1987-10-22  [Irrigation].Apply(amount: 15.8508);
            1987-10-29  [Irrigation].Apply(amount: 15.8508);
            1987-11-08  [Irrigation].Apply(amount: 20.47395);
            1987-11-15  [Irrigation].Apply(amount: 20.47395);
            1987-11-22  [Irrigation].Apply(amount: 20.47395);
            1987-11-29  [Irrigation].Apply(amount: 20.47395);
            1987-12-08  [Irrigation].Apply(amount: 19.425);
            1987-12-15  [Irrigation].Apply(amount: 19.425);
            1987-12-22  [Irrigation].Apply(amount: 19.425);
            1987-12-29  [Irrigation].Apply(amount: 19.425);
            1988-01-08  [Irrigation].Apply(amount: 15.6954);
            1988-01-15  [Irrigation].Apply(amount: 15.6954);
            1988-01-22  [Irrigation].Apply(amount: 15.6954);
            1988-01-29  [Irrigation].Apply(amount: 15.6954);
            1988-02-08  [Irrigation].Apply(amount: 39.0054);
            1988-02-15  [Irrigation].Apply(amount: 39.0054);
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            1988-03-08  [Irrigation].Apply(amount: 42.56018);
            1988-09-08  [Irrigation].Apply(amount: 9.965025);
            1988-10-08  [Irrigation].Apply(amount: 40.404);
            1988-11-08  [Irrigation].Apply(amount: 49.55318);
            1988-12-08  [Irrigation].Apply(amount: 12.91763);
            1989-01-08  [Irrigation].Apply(amount: 11.8881);
            1989-02-08  [Irrigation].Apply(amount: 15.9285);
            1989-03-08  [Irrigation].Apply(amount: 23.7762);
            1989-07-08  [Irrigation].Apply(amount: 0.2331);
            1989-09-08  [Irrigation].Apply(amount: 51.70935);
            1989-10-08  [Irrigation].Apply(amount: 61.4607);
            1989-11-08  [Irrigation].Apply(amount: 31.21598);
            1989-12-08  [Irrigation].Apply(amount: 13.73348);
            1990-01-08  [Irrigation].Apply(amount: 69.50265);
            1990-02-08  [Irrigation].Apply(amount: 77.19495);
            1990-03-08  [Irrigation].Apply(amount: 30.6915);
            1990-08-08  [Irrigation].Apply(amount: 24.82515);
            1990-09-08  [Irrigation].Apply(amount: 59.9844);
            1990-10-08  [Irrigation].Apply(amount: 60.70313);
            1990-11-08  [Irrigation].Apply(amount: 42.22995);
            1990-12-08  [Irrigation].Apply(amount: 61.0722);
            1991-01-08  [Irrigation].Apply(amount: 16.02563);
            1991-02-08  [Irrigation].Apply(amount: 10.29525);
            1991-03-08  [Irrigation].Apply(amount: 23.73735);
            1991-04-08  [Irrigation].Apply(amount: 15.54);
            1991-08-08  [Irrigation].Apply(amount: 16.51125);
            1991-09-08  [Irrigation].Apply(amount: 61.63553);
            1991-10-08  [Irrigation].Apply(amount: 31.7016);
            1991-11-08  [Irrigation].Apply(amount: 29.04038);
            1991-12-08  [Irrigation].Apply(amount: 31.08);
            1992-01-08  [Irrigation].Apply(amount: 46.7754);
            1992-02-08  [Irrigation].Apply(amount: 7.7);
            1992-07-08  [Irrigation].Apply(amount: 6.41);
            1992-08-08  [Irrigation].Apply(amount: 34.965);
            1992-09-08  [Irrigation].Apply(amount: 3.885);
            1992-10-08  [Irrigation].Apply(amount: 41.35583);
            1992-11-08  [Irrigation].Apply(amount: 3.69075);
            1993-01-08  [Irrigation].Apply(amount: 11.79098);
            1993-02-08  [Irrigation].Apply(amount: 26.37915);
            1993-03-08  [Irrigation].Apply(amount: 9.51825);
            1993-04-08  [Irrigation].Apply(amount: 47.64953);
            1993-06-08  [Irrigation].Apply(amount: 20.70705);
            1993-07-08  [Irrigation].Apply(amount: 17.19113);
            1993-08-08  [Irrigation].Apply(amount: 30.56625);
            1993-09-08  [Irrigation].Apply(amount: 7.724925);
            1993-10-08  [Irrigation].Apply(amount: 30.381);
            1993-12-08  [Irrigation].Apply(amount: 10.50368);
            1994-01-08  [Irrigation].Apply(amount: 15.38898);
            1994-03-08  [Irrigation].Apply(amount: 7.7805);
          Operations F
            1988-10-17  [TreeThinning].Script.DoThin(0.03);
            1990-01-17  [TreeThinning].Script.DoThin(0.03);
            1995-07-02  [TreeThinning].Script.DoThin(0.03);
            1987-02-09  [Fertiliser].Apply(50, Fertiliser.Types.NH4N, 0);
            1987-05-20  [Fertiliser].Apply(50, Fertiliser.Types.NH4N, 0);
            1987-08-28  [Fertiliser].Apply(20, Fertiliser.Types.NH4N, 0);
            1987-12-06  [Fertiliser].Apply(70, Fertiliser.Types.NH4N, 0);
            1988-02-29  [Fertiliser].Apply(70, Fertiliser.Types.NH4N, 0);
            1988-07-18  [Fertiliser].Apply(50, Fertiliser.Types.NH4N, 0);
            1988-10-26  [Fertiliser].Apply(150, Fertiliser.Types.NH4N, 0);
            1989-06-09  [Fertiliser].Apply(100, Fertiliser.Types.NH4N, 0);
            1989-10-27  [Fertiliser].Apply(96, Fertiliser.Types.NH4N, 0);
          Operations IF
            1988-10-19  [TreeThinning].Script.DoThin(0.06);
            1989-01-19  [TreeThinning].Script.DoThin(0.03);
            1988-07-19  [TreeThinning].Script.DoThin(0.24);
            1988-10-17  [TreeThinning].Script.DoThin(0.09);
            1991-10-17  [TreeThinning].Script.DoThin(0.05);
            // 1987-02-09  [Fertiliser].Apply(192, Fertiliser.Types.NH4N, 0);
            // 1987-05-20  [Fertiliser].Apply(192, Fertiliser.Types.NH4N, 0);
            // 1987-08-28  [Fertiliser].Apply(96, Fertiliser.Types.NH4N, 0);
            // 1987-12-06  [Fertiliser].Apply(256, Fertiliser.Types.NH4N, 0);
            // 1988-02-29  [Fertiliser].Apply(256, Fertiliser.Types.NH4N, 0);
            // 1988-07-18  [Fertiliser].Apply(128, Fertiliser.Types.NH4N, 0);
            // 1988-10-26  [Fertiliser].Apply(192, Fertiliser.Types.NH4N, 0);
            // 1989-06-09  [Fertiliser].Apply(128, Fertiliser.Types.NH4N, 0);
            // 1989-10-27  [Fertiliser].Apply(96, Fertiliser.Types.NH4N, 0);
            1987-02-09  [Fertiliser].Apply(50, Fertiliser.Types.NH4N, 0);
            1987-05-20  [Fertiliser].Apply(50, Fertiliser.Types.NH4N, 0);
            1987-08-28  [Fertiliser].Apply(20, Fertiliser.Types.NH4N, 0);
            1987-12-06  [Fertiliser].Apply(70, Fertiliser.Types.NH4N, 0);
            1988-02-29  [Fertiliser].Apply(70, Fertiliser.Types.NH4N, 0);
            1988-07-18  [Fertiliser].Apply(50, Fertiliser.Types.NH4N, 0);
            1988-10-26  [Fertiliser].Apply(150, Fertiliser.Types.NH4N, 0);
            1989-06-09  [Fertiliser].Apply(100, Fertiliser.Types.NH4N, 0);
            1989-10-27  [Fertiliser].Apply(96, Fertiliser.Types.NH4N, 0);
            1987-02-08  [Irrigation].Apply(amount: 2.2533);
            1987-02-15  [Irrigation].Apply(amount: 2.2533);
            1987-02-22  [Irrigation].Apply(amount: 2.2533);
            1987-03-01  [Irrigation].Apply(amount: 2.2533);
            1987-03-08  [Irrigation].Apply(amount: 25.5633);
            1987-03-15  [Irrigation].Apply(amount: 25.5633);
            1987-03-22  [Irrigation].Apply(amount: 25.5633);
            1987-03-29  [Irrigation].Apply(amount: 25.5633);
            1987-04-08  [Irrigation].Apply(amount: 21.5229);
            1987-04-15  [Irrigation].Apply(amount: 21.5229);
            1987-04-22  [Irrigation].Apply(amount: 21.5229);
            1987-04-29  [Irrigation].Apply(amount: 21.5229);
            1987-05-08  [Irrigation].Apply(amount: 13.6752);
            1987-05-15  [Irrigation].Apply(amount: 13.6752);
            1987-05-22  [Irrigation].Apply(amount: 13.6752);
            1987-05-29  [Irrigation].Apply(amount: 13.6752);
            1987-06-08  [Irrigation].Apply(amount: 0);
            1987-06-15  [Irrigation].Apply(amount: 0);
            1987-06-22  [Irrigation].Apply(amount: 0);
            1987-06-29  [Irrigation].Apply(amount: 0);
            1987-07-08  [Irrigation].Apply(amount: 17.6379);
            1987-07-15  [Irrigation].Apply(amount: 17.6379);
            1987-07-22  [Irrigation].Apply(amount: 17.6379);
            1987-07-29  [Irrigation].Apply(amount: 17.6379);
            1987-08-08  [Irrigation].Apply(amount: 7.77);
            1987-08-15  [Irrigation].Apply(amount: 7.77);
            1987-08-22  [Irrigation].Apply(amount: 7.77);
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            1987-09-08  [Irrigation].Apply(amount: 16.58895);
            1987-10-08  [Irrigation].Apply(amount: 15.8508);
            1987-11-08  [Irrigation].Apply(amount: 20.47395);
            1987-12-08  [Irrigation].Apply(amount: 19.425);
            1988-01-08  [Irrigation].Apply(amount: 15.6954);
            1988-02-08  [Irrigation].Apply(amount: 39.0054);
            1988-03-08  [Irrigation].Apply(amount: 42.56018);
            1988-09-08  [Irrigation].Apply(amount: 9.965025);
            1988-10-08  [Irrigation].Apply(amount: 40.404);
            1988-11-08  [Irrigation].Apply(amount: 49.55318);
            1988-12-08  [Irrigation].Apply(amount: 12.91763);
            1989-01-08  [Irrigation].Apply(amount: 11.8881);
            1989-02-08  [Irrigation].Apply(amount: 15.9285);
            1989-03-08  [Irrigation].Apply(amount: 23.7762);
            1989-07-08  [Irrigation].Apply(amount: 0.2331);
            1989-09-08  [Irrigation].Apply(amount: 51.70935);
            1989-10-08  [Irrigation].Apply(amount: 61.4607);
            1989-11-08  [Irrigation].Apply(amount: 31.21598);
            1989-12-08  [Irrigation].Apply(amount: 13.73348);
            1990-01-08  [Irrigation].Apply(amount: 69.50265);
            1990-02-08  [Irrigation].Apply(amount: 77.19495);
            1990-03-08  [Irrigation].Apply(amount: 30.6915);
            1990-08-08  [Irrigation].Apply(amount: 24.82515);
            1990-09-08  [Irrigation].Apply(amount: 59.9844);
            1990-10-08  [Irrigation].Apply(amount: 60.70313);
            1990-11-08  [Irrigation].Apply(amount: 42.22995);
            1990-12-08  [Irrigation].Apply(amount: 61.0722);
            1991-01-08  [Irrigation].Apply(amount: 16.02563);
            1991-02-08  [Irrigation].Apply(amount: 10.29525);
            1991-03-08  [Irrigation].Apply(amount: 23.73735);
            1991-04-08  [Irrigation].Apply(amount: 15.54);
            1991-08-08  [Irrigation].Apply(amount: 16.51125);
            1991-09-08  [Irrigation].Apply(amount: 61.63553);
            1991-10-08  [Irrigation].Apply(amount: 31.7016);
            1991-11-08  [Irrigation].Apply(amount: 29.04038);
            1991-12-08  [Irrigation].Apply(amount: 31.08);
            1992-01-08  [Irrigation].Apply(amount: 46.7754);
            1992-02-08  [Irrigation].Apply(amount: 7.7);
            1992-07-08  [Irrigation].Apply(amount: 6.41);
            1992-08-08  [Irrigation].Apply(amount: 34.965);
            1992-09-08  [Irrigation].Apply(amount: 3.885);
            1992-10-08  [Irrigation].Apply(amount: 41.35583);
            1992-11-08  [Irrigation].Apply(amount: 3.69075);
            1993-01-08  [Irrigation].Apply(amount: 11.79098);
            1993-02-08  [Irrigation].Apply(amount: 26.37915);
            1993-03-08  [Irrigation].Apply(amount: 9.51825);
            1993-04-08  [Irrigation].Apply(amount: 47.64953);
            1993-06-08  [Irrigation].Apply(amount: 20.70705);
            1993-07-08  [Irrigation].Apply(amount: 17.19113);
            1993-08-08  [Irrigation].Apply(amount: 30.56625);
            1993-09-08  [Irrigation].Apply(amount: 7.724925);
            1993-10-08  [Irrigation].Apply(amount: 30.381);
            1993-12-08  [Irrigation].Apply(amount: 10.50368);
            1994-01-08  [Irrigation].Apply(amount: 15.38898);
            1994-03-08  [Irrigation].Apply(amount: 7.7805);
      Simulation GympieBase
        Weather: FileName=toolara8797.met
        Clock: Start=1987-02-04; End=1992-09-10
        Summary
        SoilArbitrator Soil Arbitrator
        Zone Plantation: Area=1; Slope=0; AspectAngle=0; Altitude=50
          Soil: NearestTown=Toolara State Forest; State=Queensland; Latitude=0; Longitude=0
            Comments:
              Soil properties are based on Ross and Thompson (1991)  SOILS AT SITES SELECTED FOR
              EUCALYPT RESEARCH IN TOOLARA
               STATE FOREST, GYMPIE, QUEENSLAND CSIRO DIVISION OF SOILS
               Divisional Report No. 111
            InitialWater Initial water: PercentMethod=1; FractionFull=0.5
            Physical
              Thickness  BD   AirDry  LL15  DUL   SAT
              100        1.2  0.01    0.08  0.4   0.5
              300        1.2  0.01    0.08  0.4   0.5
              600        1.3  0.01    0.08  0.4   0.5
              1000       1.4  0.02    0.08  0.4   0.47
              1000       1.5  0.05    0.08  0.3   0.4
              1000       1.5  0.05    0.08  0.2   0.3
              1000       1.5  0.05    0.08  0.15  0.2
              1000       1.5  0.05    0.08  0.15  0.2
              SoilCrop PinusSoil: LL=[0.1, 0.1, 0.1, 0.1, 0.1, 0.1, 0.1, 0.1]; KL=[0.05, 0.04, 0.03, 0.03, 0.03, 0.03, 0.03, 0.03]; XF=[1, 1, 1, 1, 1, 0, 0, 0]
            WaterBalance SoilWater: SummerDate=1-Nov; SummerU=2; SummerCona=3.5; WinterDate=1-Apr; WinterU=2; WinterCona=3.5; DiffusConst=88; DiffusSlope=35.4; Salb=0.13; CN2Bare=65; CNRed=20; CNCov=0.8; Slope=0; DischargeWidth=0; CatchmentArea=0
              Thickness  SWCON  KLAT
              100        0.7    0
              300        0.7    0
              600        0.6    0
              1000       0.5    0
              1000       0.4    0
              1000       0.3    0
              1000       0.2    0
              1000       0.2    0
            Organic: FOMCNRatio=60
              Thickness  Carbon  SoilCNRatio  FBiom  FInert  FOM
              100        1.8     30           0.03   0.5     0.29407
              300        0.7     30           0.02   0.5     0.253108
              600        0.4     30           0.02   0.6     0.187507
              1000       0.1     30           0.01   0.7     0.113729
              1000       0.01    30           0.01   0.8     0.06898
              1000       0.01    30           0.01   0.9     0.0418385
              1000       0.01    30           0.01   0.9     0.0253763
              1000       0.01    30           0.01   0.9     0.0153915
            Chemical
              Thickness  NO3N  NH4N  PH
              100        0.1   0.01  5.8
              300        0.1   0.01  5.7
              600        0.1   0.01  5.7
              1000       0.01  0.01  5.9
              1000       0.01  0.01  5.7
              1000       0.01  0.01  5.7
              1000       0.01  0.01  5.7
              1000       0.01  0.01  5.7
            Sample Initial nitrogen: Thickness=[100, 300, 600, 1000, 1000, 1000, 1000, 1000]; SWUnits=Volumetric; OCUnits=Total; PHUnits=Water
            CERESSoilTemperature
            Nutrient
          Irrigation
          Fertiliser
          SurfaceOrganicMatter: InitialResidueName=Wheat; InitialResidueType=Wheat; InitialResidueMass=2000; InitialStandingFraction=0; InitialCPR=0; InitialCNR=80
          MicroClimate: a_interception=0; b_interception=1; c_interception=0; d_interception=0; soil_albedo=0.13; SoilHeatFluxFraction=0; MinimumHeightDiffForNewLayer=0; NightInterceptionFraction=0; ReferenceHeight=0
          Plant Pinus
          Operations: same as Gympie.Gympie.Factors.Treatment.I
          Report: VariableNames=[Clock].Today; EventNames=[Clock].DoReport
          Manager TreeThinning
```csharp
using System.Xml.Serialization;
using Models.PMF.Interfaces;
using Models.PMF;
using Models.Core;
using System.Collections.Generic;
using System;

namespace Models
{
    [Serializable] 
    [System.Xml.Serialization.XmlInclude(typeof(Model))]
    public class Script : Model
    {
        [Link] Plant Pinus;
        [Link] Clock Clock;

        [XmlIgnore] private RemovalFractions Remove { get; set; }
        
        [EventSubscribe("StartOfSimulation")]
        private void OnSimulationCommencing(object sender, EventArgs e)
        {
            Remove = new RemovalFractions();
        }
        
        [EventSubscribe("DoManagement")]
        public void DoThin(double ThinFr)
        {
            //Set up  array of remove fractions to send with Cut method.  Each member in the array corresponds to an organ in the same order they are set up in.

                //Harvest with manager specified removal fractions
                Remove.SetFractionToRemove("Leaf", 0);
                Remove.SetFractionToRemove("Stem", 0);
                Remove.SetFractionToRemove("Branch", 0);
                Remove.SetFractionToRemove("FineRoot", 0);
                Remove.SetFractionToRemove("CoarseRoot", 0);
                Remove.SetFractionToResidue("Leaf", ThinFr);
                Remove.SetFractionToResidue("Stem", ThinFr);
                Remove.SetFractionToResidue("Branch", ThinFr);
                Remove.SetFractionToResidue("FineRoot", ThinFr);
                Remove.SetFractionToResidue("CoarseRoot", ThinFr);
                Remove.SetThinningProportion = ThinFr;
                Pinus.RemoveBiomass("Thin", Remove);
        }
    }
}
```
          Report HarvestReport: EventNames=[Pinus].Harvesting
            VariableNames:
              [Clock].Today
              [Pinus].AboveGround.Wt
          Manager TreeManagement
            TimeSincePlanting = 0
            RowSpace = 2.65
            RowWidth = 3.4
            CultivarName = grandisCoffsHarbour
            PlantingDate = 04-Feb
            HarvestAge = 5.6
            FertAmount = 0
```csharp
using APSIM.Shared.Utilities;
using Models.PMF;
using Models.Core;
using System;

namespace Models
{
    [Serializable] 
    [System.Xml.Serialization.XmlInclude(typeof(Model))]
    public class Script : Model
    {
        [Link] Plant Plant;
        [Link] Clock Clock;
        [Link] Fertiliser Fertiliser;

        public double TimeSincePlanting {get; set;}

        [Description("Spacing (m) between plants within rows")]
        public double RowSpace { get; set; }

        [Description("Spacing (m) between rows")]
        public double RowWidth { get; set; }

        [Description("Cultivar")]
        [Display(Type=DisplayType.CultivarName)]
        public string CultivarName { get; set; }

        [Description("Planting Date (dd-mmm)")]
        public String PlantingDate { get; set; }

        [Description("Harvest Age (years)")]
        public double HarvestAge { get; set; }

        [Description("Amount of fertiliser N to be applied at planting (kg N/ha)")]
        public double FertAmount { get; set; }

        [EventSubscribe("DoManagement")]
        private void OnDoManagement(object sender, EventArgs e)
        {
            double PlantPopulation = 1 / (RowWidth * RowSpace);
            double RowWidthmm = RowWidth * 1000;

            if (DateUtilities.WithinDates(PlantingDate, Clock.Today, PlantingDate) && !Plant.IsAlive)
            {
                Plant.Sow(population: PlantPopulation, 
                    cultivar: CultivarName, 
                    depth: 100, 
                    rowSpacing: RowWidthmm);
                TimeSincePlanting = 0;
                Fertiliser.Apply(Amount: FertAmount, Type: Fertiliser.Types.NO3N);
            }

            if (TimeSincePlanting > HarvestAge && Plant.IsAlive)
            {
               Plant.Harvest();
               Plant.EndCrop();         
               TimeSincePlanting = 0;  
            }

            TimeSincePlanting += 1.0/365.0;
        }
    }
}
```
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