Simulations: Version=147
  DataStore
  Folder LowerBoundaryConditions
    Memo Memo Lower BC
      https://www.apsim.info/documentation/model-documentation/soil-modules-documentation/swimv2-1/

      # Overview

      SWIM3 allows three of the four lower boundary conditions described in Verburg et al. (1996) as described below. Note that the zero flux lower boundary condition has not been enabled.

      All referenes to "SWIM" here refer to the highly detailed documentation by Verburg et al. (1996) of the standalone model that has morphed over the years into SWIM3. Verburg et al. remains the definitive documentation and should be referred to for detail.

      See the "SetLowerBC" Manager script for examples of how to change lower boundary conditions.

      ## SetLowerBCForGradient(bbcGradient)

      A constant gradient in soil water potential with depth in the soil is the default lower boundary condition and is applicable to most 'open field' simulations where there is free drainage from
      the soil. This option is ibbc = 0 in SWIM. This lower boundary condition setting must be accompanied by the value of that gradient. This is done using a command in a Manager script along the
      lines of:

      	SetLowerBCForGradient(bbcGradient);

      where bbcGradient is a double (real) variable with the value of the required gradient in soil water potential with depth in the soil. The set value remains in place until the user resets it.
      Gravity is added to bbcGradient so the most common setting is
      bbcGradient = 0.0 which means that there is no graident of soil water potential. In this case  water moves under the influence of gravity alone.
      Setting bbcGradient = -1.0 will set the soil water potential gradient to counteract the effect of gravity and will essentially set a no-flow lower boundary. **I think**

      ## SetLowerBCForGivenPotential(bbcPotential)

      This lower boundary condition sets a constant soil water potential at the lowest node in the simulation. Note that in SWIM and SWIM3, soil water potential is in units of cm and is negative in unsaturated soils. This option can be useful for mimicing the effect of a water table at the base of the simulation by setting a positivie value equal to the height difference between the
      water table and the bottom of the simulated soil profile. Note that in this setting, water will be added to the simulation as needed to maintain the user set soil water potential potential.
      See the Manager script "SetLowerBC" for an example:

      	SetLowerBCForGivenPotential(bbcPotential);

      where bbcPotential is the required potential as a double variable in cm. this setting is equivalent to ibbc = 1 in SWIM.

      ## SetLowerBCForSeepage(bbcPotentialSeepage)

      A seepage lower boundary is a condition where no drainage can occur until a user-set head of water (i.e., a depth of saturated soil) of bbcPotentialSeepage accumulates at the base of the soil profile. Once that head is reached drainage occurrs at the rate allowed by the saturated soil water conductivity under gravity only until the head falls below the user-set value. This lower boundary condition is that of ibbc = 3 in SWIM. A common usage of this boundary condition is when simulating a zero-tension (i.e., free to the atmosphere) lysimeter and in this case bbcPotentialSeepage = 0.0. See an example in  "SetLowerBC":

      	SetLowerBCForSeepage(bbcPotentialSeepage);

      where bbcPotentialSeepage is in cm.

      ## Testing

      Do they do what is expected?

      And is there a test for this?

      Does the mass balance with these options?
    Experiment Experiment1
      Factors
        Factor Gradient: Specification=[SetLowerBoundaryCondition].Script.LowerBCType=gradient
        Factor Seepage: Specification=[SetLowerBoundaryCondition].Script.LowerBCType=seepage
        Factor Potential: Specification=[SetLowerBoundaryCondition].Script.LowerBCType=potential50
      Simulation Base_LowerBC
        Weather: FileName=C:\aaUnderVC\ApsimNextGen\Examples\WeatherFiles\lincoln.met
        Clock: Start=2000-01-01; End=2005-12-30
        Summary summaryfile
        SoilArbitrator
        MicroClimate: a_interception=0; b_interception=0; c_interception=0; d_interception=0; SoilHeatFluxFraction=0; MinimumHeightDiffForNewLayer=0; NightInterceptionFraction=0; ReferenceHeight=2
        Forages
          Parameters:
            Name                          IsLive  DigestibilityString  FractionConsumable  MinimumAmount  UseDigestibilityFromModel
            SurfaceOrganicMatter.Residue  true    0.7                  0                   100            false
            SurfaceOrganicMatter.Residue  false   0.3                  0                   0              false
            AGPRyegrass.Leaf              true    0.7                  1                   100            false
            AGPRyegrass.Leaf              false   0.3                  1                   0              false
            AGPRyegrass.Stem              true    0.7                  1                   100            false
            AGPRyegrass.Stem              false   0.3                  1                   0              false
            AGPRyegrass.Stolon            true    0.7                  1                   100            false
            AGPRyegrass.Stolon            false   0.3                  1                   0              false
            AGPWhiteClover.Leaf           true    0.7                  1                   100            false
            AGPWhiteClover.Leaf           false   0.3                  1                   0              false
            AGPWhiteClover.Stem           true    0.7                  1                   100            false
            AGPWhiteClover.Stem           false   0.3                  1                   0              false
            AGPWhiteClover.Stolon         true    0.7                  1                   100            false
            AGPWhiteClover.Stolon         false   0.3                  1                   0              false
        Zone paddock: Area=1; Slope=0; AspectAngle=0; Altitude=50
          Memo To do and notes
            The first few lines in IrrigationSchedule
            // these are only here to get the soil above saturation -

            // not working all that well because the upper BC is causing all the excess water to runoff anyway

            // can delete this probably once pond is fixed.

            Add with and without plants to the experiment. Need a more flexible Manager first? Or add and kill?

            Could be nice to be able to swap from weather to controlled environment without having to change the links in "CalculateRollingWaterBalance"
          Manager CalculateRollingWaterBalance
```csharp
using Models.Climate;
using APSIM.Shared.Utilities;
using Models.Soils.Nutrients;
using Models.Soils;
using Models.PMF;
using Models.Core;
using System.Xml.Serialization;
using System;
using Models.AgPasture;
using Models.Interfaces;
using System.Linq;

namespace Models
{
    [Serializable] 
    [System.Xml.Serialization.XmlInclude(typeof(Model))]
    public class Script : Model
    {
        [Link] Clock clock;
        [Link] ISummary summary;
        [Link] IWeather weather;
        [Link] Irrigation irrigation;
        [Link] private Swim3 swim;  // I know that we are concerned with SWIM3 but should this be generic and sub in SoilWater?
        [Link] private IPlant[] plants;

  
        // add water uptake and (no3+nh4) uptake as N uptake to IPlant

        public double WaterBalanceCumulative  { get; set; }
        public double WaterBalanceToday  { get; set; }

        public double SoilWaterAtInitialisation  { get; set; }
        public double SoilWaterYesterday  { get; set; }
		public double SoilWaterNow  { get; set; }

		public double PlantWaterUptake { get; set; }

        public double WaterAddedToday  { get; set; }
        public double WaterRemovedToday  { get; set; }
        public double WaterAddedCumulative  { get; set; }
        public double WaterRemovedCumulative  { get; set; }



        [EventSubscribe("DoDailyInitialisation")]
        private void DoDailyInitialisation(object sender, EventArgs e)
        {
        	if (clock.Today == clock.StartDate) 
        	// capture the water in and on the soil as a starting point
        	// doing this here as need the models to have intialised first
        	{
	        	SoilWaterAtInitialisation = swim.pond;
    	    	for (int i = 0; i < swim.SWmm.Length; i++)
        			SoilWaterAtInitialisation += swim.SWmm[i];

        		SoilWaterYesterday = SoilWaterAtInitialisation;		
        		WaterAddedCumulative = 0.0;
        		WaterRemovedCumulative = 0.0;
        		SoilWaterNow = 0.0;
        	}
        	else
        	{
        		SoilWaterYesterday = SoilWaterNow;		// SoilWaterNow holds the value calculated at reporting yesterday
        		WaterAddedToday = 0.0;
        		WaterRemovedToday = 0.0;
        	}
		}

        [EventSubscribe("DoReportCalculations")]
        private void DoReportCalculations(object sender, EventArgs e)
        {
        	// All the WaterBalance variables should be zero. A positive value is a generation of water.
        	SoilWaterNow = swim.pond;
        	for (int i = 0; i < swim.SWmm.Length; i++)
        		SoilWaterNow += swim.SWmm[i]; // so all the water stored in or on the soil

        	WaterAddedToday = weather.Rain + irrigation.IrrigationApplied;   // Can there be runon? Probably not but this will throw an error if that ever happens
        	WaterAddedCumulative+= WaterAddedToday;

        	WaterRemovedToday = swim.Drainage + swim.Es + swim.Runoff;
        	PlantWaterUptake = 0.0;
        	foreach (var plant in plants)
        		PlantWaterUptake += plant.WaterUptake.Sum();

        	WaterRemovedToday += PlantWaterUptake;
        	// Need to add subsurface drainage here

        	WaterRemovedCumulative += WaterRemovedToday;

        	WaterBalanceToday = WaterAddedToday - WaterRemovedToday - (SoilWaterNow - SoilWaterYesterday);
        	WaterBalanceCumulative = WaterAddedCumulative - WaterRemovedCumulative - (SoilWaterNow - SoilWaterAtInitialisation);
        	// need to add a warning value and a crash value and make a crash

		}

        [EventSubscribe("DoManagement")]
        private void DoDailyCalculations(object sender, EventArgs e)
        {
        }
    }
}
```
          Manager SetLowerBoundaryCondition
            LowerBCType = gradient
```csharp
using Models.Climate;
using APSIM.Shared.Utilities;
using Models.Soils.Nutrients;
using Models.Soils;
using Models.PMF;
using Models.Core;
using System.Xml.Serialization;
using System;
using Models.AgPasture;
using Models.Interfaces;

namespace Models
{
    [Serializable] 
    [System.Xml.Serialization.XmlInclude(typeof(Model))]
    public class Script : Model
    {
        [Link] Clock clock;
        [Link] ISummary summary;
        [Link] private Swim3 swim;
        //[Link] private PastureSpecies ryegrass;
        //[Link] private SimpleGrazing grazing;

        [Description("What lower BC? Current options gradient/seepage/potential")] public string LowerBCType { get; set; }

        public double SoilWaterStart  { get; set; }
        public double SoilWaterEnd  { get; set; }

        [EventSubscribe("DoDailyInitialisation")]
        private void DoDailyInitialisation(object sender, EventArgs e)
        {
        }

        [EventSubscribe("DoReportCalculations")]
        private void DoReportCalculations(object sender, EventArgs e)
        {
        }

        [EventSubscribe("DoManagement")]
        private void DoDailyCalculations(object sender, EventArgs e)
        {
            if (clock.Today == clock.StartDate)
            {
                summary.WriteMessage(this, "Script is setting lower boundary condition to " + LowerBCType, MessageType.Diagnostic);
                if (LowerBCType.ToLower() == "gradient")
                    swim.SetLowerBCForGradient(bbcGradient: 0.0);   // in cm/cm (ibbc=0) Note that this is the default setting
                else if (LowerBCType.ToLower() == "potential50")
                    swim.SetLowerBCForGivenPotential(bbcPotential: -50.0);    //  in cm (ibbc=1), DUL is -100 cm so this is quite wet but not saturated
                else if (LowerBCType.ToLower() == "seepage")
                    swim.SetLowerBCForSeepage(bbcPotentialSeepage: 0.0);  // in cm (ibbc=3)
            }
        }
    }
}
```
          Manager AutomaticIrrigation
            allowIrrigation = True
            seasonStart = 1-sep
            seasonEnd = 30-mar
            seasonsAllocation = 10000
            triggerDeficit = 80
            targetDeficit = 100
            returndays = 3
            maximumAmount = 30
            depthPAWC = 300
```csharp
using Newtonsoft.Json;
using APSIM.Shared.Utilities;
using System.Xml.Serialization;
using Models.Soils;
using Models.PMF;
using Models.Core;
using System;
using Models.Interfaces;



        
namespace Models
{
    [Serializable] 
    [System.Xml.Serialization.XmlInclude(typeof(Model))]
    public class Script : Model
    {
        [Link] private ISummary summary;
        [Link] private Irrigation Irrigation;
        [Link] private Clock Clock;
        [Link] private Soil Soil;
        [Link(IsOptional = true)] private IPlant existingCrop;
        private DateTime StartDate;
        private DateTime EndDate;
        private double TopDUL;
        private double TopLL;
        private int nLayers;
        [Link]
        private IPhysical soilPhysical;
        [Link]
        private ISoilWater waterBalance;
        //Communication to other modules
       
        //User inputs from properties tab
        [Description("Turn irrigation on?")]
        public bool allowIrrigation { get; set; }
        [Description("Start of irrigation season (dd-MMM)")]
        public string seasonStart { get; set; }
        [Description("End of irrigation season (dd-MMM)")]
        public string seasonEnd { get; set; }
        [Description("Season allocation (mm)")]
        public double seasonsAllocation { get; set; }
        [Description("Deficit to trigger irrigation (% PAWC)")]
        public double triggerDeficit { get; set; }
        [Description("Deficit to stop irrigaton (% PAWC)")]
        public double targetDeficit { get; set; }
        [Description("Minimum days for irrigation to return")]
        public double returndays { get; set; }
        [Description("Maximum irrigation application (mm/day)")]
        public double maximumAmount { get; set; }
        [Description("Depth to calculate PAWC (mm)")]
        public double depthPAWC { get; set; }

        //Class members
        [JsonIgnore] public double TopSWdeficit { get; set; }
        [JsonIgnore] public double TopSWC { get; set; }
        [JsonIgnore] public double DaysSinceIrrigation { get; set; }
        [JsonIgnore] public double AmountToApply { get; set; }
        [JsonIgnore] public double SeasonAppliedAmount { get; set; }
        
        private bool IrrigationIsAllowed { get; set; }
        private bool SeasonIsOpen { get; set; }
        private bool CropIsActive { get; set; }
        private bool IrrigatorIsAvailable { get; set; }
        private bool SoilIsDry { get; set; }

    
        //Calculate static soil variables
        [EventSubscribe("StartOfSimulation")]
        private void OnStartOfSimulation(object sender, EventArgs e)
        {   
            //Set the season dates
            StartDate = DateTime.Parse(seasonStart + "-" + Clock.Today.Year.ToString());
            EndDate = DateTime.Parse(seasonEnd + "-" + Clock.Today.Year.ToString());
            
            //Can we irrigate at all?
            IrrigationIsAllowed = false; 
            if (allowIrrigation)
                IrrigationIsAllowed = true; 

            //Calculate soil water variables
            double depthFromSurface = 0.0;
            double fracLayer = 0.0;
            nLayers = soilPhysical.Thickness.Length;
            for (int layer = 0; layer < nLayers; layer++)
            {
                fracLayer = Math.Min(1.0, (depthPAWC - depthFromSurface) / soilPhysical.Thickness[layer]);
                TopLL += soilPhysical.LL15mm[layer] * fracLayer;
                TopDUL += soilPhysical.DULmm[layer] * fracLayer;
                depthFromSurface += soilPhysical.Thickness[layer];
                if (depthFromSurface >= depthPAWC)
                    layer = nLayers;
            }
        }
             
        //Determine daily requirement for irrigation
        [EventSubscribe("StartOfDay")]
        private void OnStartOfDay(object sender, EventArgs e)
        {
            //Can we irrigate today?          
            SeasonIsOpen = isBetween(Clock.Today, StartDate, EndDate);
            if (!SeasonIsOpen)
                SeasonAppliedAmount = 0;

            //Is there a crop in the ground that needs irrigation?
            CropIsActive = false;
            if ((existingCrop != null) && (existingCrop.IsAlive))
                CropIsActive = true;
            //if ((existingCrop.Phenology.Stage >= 3.0) && (existingCrop.Phenology.Stage < 6.0))
          
            //Is the irrigator available?
            IrrigatorIsAvailable = false;
            DaysSinceIrrigation += 1;
            if (DaysSinceIrrigation >= returndays)
                IrrigatorIsAvailable = true;
          
            //Is the soil dry enough to require irrigation?
            SoilIsDry = false;
            double depthFromSurface = 0.0;
            double fracLayer = 0.0;
            TopSWC = 0.0;
            for (int layer = 0; layer < nLayers; layer++)
            //for (int layer = 0; depthFromSurface < depthPAWC + soilPhysical.Thickness[layer]; layer++)
            {
                fracLayer = Math.Min(1.0, (depthPAWC - depthFromSurface) / soilPhysical.Thickness[layer]);
                TopSWC += waterBalance.SWmm[layer] * fracLayer;
                depthFromSurface += soilPhysical.Thickness[layer];
                if (depthFromSurface >= depthPAWC)
                    layer = nLayers;
            }
            
            TopSWdeficit = TopSWC - TopDUL;
            if (Math.Max(0.0, -TopSWdeficit) >= (TopDUL - TopLL) * (100 - triggerDeficit) / 100)
                SoilIsDry = true;
                
            //Are all the conditions ratifying irrigation
            if (IrrigationIsAllowed && SeasonIsOpen && CropIsActive && IrrigatorIsAvailable && SoilIsDry)
            {
                //Lets bloody well irrigate then!!!!
                AmountToApply = TopDUL * targetDeficit / 100 - TopSWC;
                AmountToApply = Math.Max(0.0, Math.Min(AmountToApply, seasonsAllocation - SeasonAppliedAmount));
                AmountToApply = Math.Min(AmountToApply,maximumAmount);
                Irrigation.Apply(AmountToApply);
                DaysSinceIrrigation = 0;
                SeasonAppliedAmount += AmountToApply;
            }
        }
        
        ///Checks whether theDate is between iniDate and endDate (non-year specific)
        private bool isBetween(DateTime theDay, DateTime iniDate, DateTime endDate)
        {
            bool result = false;
            if (iniDate.DayOfYear < endDate.DayOfYear)
            {
                // period is within one year, ex: summer in the northern hemisphere
                if ((theDay.DayOfYear >= iniDate.DayOfYear) && (theDay.DayOfYear <= endDate.DayOfYear))
                    result = true;
            }
            else
            {
                // period goes over the end of the year, ex: summer in the southern hemisphere
                if ((theDay.DayOfYear >= iniDate.DayOfYear) || (theDay.DayOfYear <= endDate.DayOfYear))
                    result = true;
            }
            
            return result;
        }
    }
}
```
          Operations IrrigationSchedule (disabled)
            // 2000-01-01  [Irrigation].Apply(amount:100,duration:60);
            // 2000-01-02  [Irrigation].Apply(amount:100,duration:60);
            // 2000-01-03  [Irrigation].Apply(amount:100,duration:60);
            // 2000-01-04  [Irrigation].Apply(amount:100,duration:60);
            2000-01-21  [Irrigation].Apply(amount:100,duration:60);
            2000-01-22  [Irrigation].Apply(amount:100,duration:60);
            // 2000-01-23  [Irrigation].Apply(amount:100,duration:60);
            // 2000-01-24  [Irrigation].Apply(amount:100,duration:60);
            2000-02-21  [Irrigation].Apply(amount:100,duration:60);
            2000-02-22  [Irrigation].Apply(amount:100,duration:60);
            // 2000-02-23  [Irrigation].Apply(amount:100,duration:60);
            // 2000-02-24  [Irrigation].Apply(amount:100,duration:60);
            2001-02-21  [Irrigation].Apply(amount:100,duration:60);
            2001-02-22  [Irrigation].Apply(amount:100,duration:60);
          Soil: Latitude=0; Longitude=0
            Physical
              Thickness  ParticleSizeClay  ParticleSizeSand  ParticleSizeSilt  Rocks  BD     AirDry  LL15   DUL    SAT   KS
              60         17.61             33.77             48.62             0      0.865  0.077   0.231  0.565  0.58  216
              110        17.61             33.77             48.62             0      0.865  0.077   0.231  0.565  0.58  216
              140        17.61             33.77             48.62             0      0.865  0.077   0.231  0.565  0.58  216
              240        17.61             33.77             48.62             0      0.865  0.077   0.231  0.565  0.58  216
              150        17.61             33.77             48.62             0      0.865  0.077   0.231  0.565  0.58  216
              SoilCrop AgPRyegrassSoil: LL=[0.231, 0.231, 0.231, 0.231, 0.231]; KL=[0.1, 0.1, 0.1, 0.1, 0]; XF=[1, 1, 1, 1, 0]
              SoilCrop AgPWhiteCloverSoil: LL=[0.231, 0.231, 0.231, 0, 0]; KL=[0.1, 0.1, 0.1, 0, 0]; XF=[1, 1, 1, 0, 0]
            Nutrient
            Organic: FOMCNRatio=40
              Thickness  Carbon  SoilCNRatio  FBiom  FInert  FOM
              60         8.2     12.5         0.08   0.58    92.873
              110        5.5     12.5         0.02   0.7     57.963
              140        3.3     12.5         0.015  0.77    31.811
              240        1.7     12.5         0.01   0.9     11.373
              150        1.7     12.5         0.01   0.99    0
            Chemical
              Thickness  NO3N   NH4N   PH   CL
              60         6.503  0.599  6.5  10
              110        2.101  0.1    6.5  10
              140        2.101  0.1    6.5  10
              240        1.701  0.1    6.5  10
              150        1.701  0.1    6.5  10
            Sample Initial values: SWUnits=Volumetric; OCUnits=Total; PHUnits=Water
              Thickness  NO3    NH4    SW     CL  PH
              60         6.503  0.599  0.565  10  5.7
              110        2.101  0.1    0.565  10  5.3
              140        2.101  0.1    0.565  10  5.9
              240        1.701  0.1    0.565  10  6.6
              150        1.701  0.1    0.565  10  6.7
            Swim3: PrecipitationInterception=0; Salb=0.13; CN2Bare=50; CNRed=20; CNCov=0.8; KDul=1; PSIDul=-100; VC=true; DTMin=0; DTMax=1440; MaxWaterIncrement=10; SpaceWeightingFactor=0; SoluteSpaceWeightingFactor=1; Dis=0; Disp=1; A=2; DTHC=0.1; DTHP=2; Diagnostics=false; WaterTable=0
              SwimSoluteParameters Urea: WaterTableConcentration=0; D0=0.05
                Thickness  Exco  FIP
                60         0     1
                110        0     1
                140        0     1
                240        0     1
                150        0     1
              SwimSoluteParameters NH4: WaterTableConcentration=0; D0=0.05
                Thickness  Exco  FIP
                60         1     1
                110        1     1
                140        1     1
                240        1     1
                150        1     1
              SwimSoluteParameters NO3: WaterTableConcentration=0; D0=0.05
                Thickness  Exco  FIP
                60         0     1
                110        0     1
                140        0     1
                240        0     1
                150        0     1
              SwimSoluteParameters CL: WaterTableConcentration=0; D0=0.05
                Thickness  Exco  FIP
                60         0     1
                110        0     1
                140        0     1
                240        0     1
                150        0     1
              SwimSoluteParameters PlantAvailableNH4: WaterTableConcentration=0; D0=0.05
                Thickness  Exco  FIP
                60         1     1
                110        1     1
                140        1     1
                240        1     1
                150        1     1
              SwimSoluteParameters PlantAvailableNO3: WaterTableConcentration=0; D0=0.05
                Thickness  Exco  FIP
                60         0     1
                110        0     1
                140        0     1
                240        0     1
                150        0     1
              SwimSoluteParameters LabileP: WaterTableConcentration=0; D0=0.05
                Thickness  Exco  FIP
                60         0     1
                110        0     1
                140        0     1
                240        0     1
                150        0     1
              SwimSoluteParameters UnavailableP: WaterTableConcentration=0; D0=0.05
                Thickness  Exco  FIP
                60         0     1
                110        0     1
                140        0     1
                240        0     1
                150        0     1
            Solute CL
            LayerStructure: Thickness=[10, 20, 30, 40, 50, 50, 50, 50, 100, 100, 50, 50, 50, 50]
            SoilTemperature
          Irrigation
          Fertiliser
          SurfaceOrganicMatter: InitialResidueName=grass; InitialResidueType=grass; InitialResidueMass=20; InitialStandingFraction=0; InitialCPR=0; InitialCNR=17
          SimpleGrazing: GrazingRotationType=0; SimpleGrazingFrequencyString=end of month; SimpleMinGrazable=0; SimpleGrazingResidual=1200; FlexibleGrazePostDM=0; FractionDefoliatedNToSoil=[90]; FractionExcretedNToDung=[0.4]; CNRatioDung=0; DepthUrineIsAdded=150; FractionPopulationDecline=0; TramplingOn=false; MaximumPropLitterMovedToSoil=0.1; PastureConsumedAtMaximumRateOfLitterRemoval=1200
          PastureSpecies AGPRyegrass: InitialShootDM=2500; InitialRootDM=500; InitialRootDepth=350
          PastureSpecies AGPWhiteClover: InitialShootDM=500; InitialRootDM=250; InitialRootDepth=300
          Report: EventNames=[Clock].EndOfDay
            VariableNames:
              [SetLowerBoundaryCondition].Script.LowerBCType
              [Clock].Today as Date
              [CalculateRollingWaterBalance].Script.WaterAddedToday as WaterAddedToday
              [CalculateRollingWaterBalance].Script.WaterRemovedToday as WaterRemovedToday
              [Soil].Swim3.Drainage as Drainage
              [Soil].Swim3.Runoff as Runoff
              sum([Soil].Swim3.SWmm) as WaterStored
              [Soil].Swim3.Pond as PondDepth
              [CalculateRollingWaterBalance].Script.WaterBalanceCumulative
              [CalculateRollingWaterBalance].Script.WaterBalanceToday
              [CalculateRollingWaterBalance].Script.PlantWaterUptake
              [Soil].Swim3.psi as Psi
              [Soil].Swim3.SW as SW
              [Irrigation].IrrigationApplied as Irrigation
  Folder PotentialLowerBoundaryCondition
    Memo Memo Lower BC Potentials: same as LowerBoundaryConditions.Memo Lower BC
    Experiment Experiment2
      Factors
        Factor Potential
          Specification=[SetLowerBoundaryCondition].Script.LowerBCValue = -129 to -128 step 1
      Simulation Base_LowerBC_Potentials
        Weather: FileName=C:\aaUnderVC\ApsimNextGen\Examples\WeatherFiles\lincoln.met
        Clock: Start=2000-11-01; End=2001-02-22
        Summary summaryfile
        SoilArbitrator
        MicroClimate: a_interception=0; b_interception=0; c_interception=0; d_interception=0; SoilHeatFluxFraction=0; MinimumHeightDiffForNewLayer=0; NightInterceptionFraction=0; ReferenceHeight=2
        Forages: same as LowerBoundaryConditions.Experiment1.Base_LowerBC.Forages
        Zone paddock: Area=1; Slope=0; AspectAngle=0; Altitude=50
          Memo To do and notes: same as LowerBoundaryConditions.Experiment1.Base_LowerBC.paddock.To do and notes
          Manager CalculateRollingWaterBalance: same as LowerBoundaryConditions.Experiment1.Base_LowerBC.paddock.CalculateRollingWaterBalance
          Manager SetLowerBoundaryCondition
            LowerBCType = potential
            LowerBCValue = -50
```csharp
using Models.Climate;
using APSIM.Shared.Utilities;
using Models.Soils.Nutrients;
using Models.Soils;
using Models.PMF;
using Models.Core;
using System.Xml.Serialization;
using System;
using Models.AgPasture;
using Models.Interfaces;

namespace Models
{
    [Serializable] 
    [System.Xml.Serialization.XmlInclude(typeof(Model))]
    public class Script : Model
    {
        [Link] Clock clock;
        [Link] ISummary summary;
        [Link] private Swim3 swim;
        //[Link] private PastureSpecies ryegrass;
        //[Link] private SimpleGrazing grazing;

        [Description("What lower BC? Current options gradient/seepage/potential")] public string LowerBCType { get; set; }
        [Description("If the lower BC is potential, what value should be set? (cm)")] public double LowerBCValue { get; set; }

        public double SoilWaterStart  { get; set; }
        public double SoilWaterEnd  { get; set; }

        [EventSubscribe("DoDailyInitialisation")]
        private void DoDailyInitialisation(object sender, EventArgs e)
        {
        }

        [EventSubscribe("DoReportCalculations")]
        private void DoReportCalculations(object sender, EventArgs e)
        {
        }

        [EventSubscribe("DoManagement")]
        private void DoDailyCalculations(object sender, EventArgs e)
        {
            if (clock.Today == clock.StartDate)
            {
                summary.WriteMessage(this, "Script is setting lower boundary condition to " + LowerBCType, MessageType.Diagnostic);
                if (LowerBCType.ToLower() == "gradient")
                    swim.SetLowerBCForGradient(bbcGradient: 0.0);   // in cm/cm (ibbc=0) Note that this is the default setting
                else if (LowerBCType.ToLower() == "potential")
                    swim.SetLowerBCForGivenPotential(bbcPotential: LowerBCValue);    //  in cm (ibbc=1), DUL is -100 cm so this is quite wet but not saturated
                else if (LowerBCType.ToLower() == "seepage")
                    swim.SetLowerBCForSeepage(bbcPotentialSeepage: 0.0);  // in cm (ibbc=3)
            }
        }
    }
}
```
          Manager AutomaticIrrigation: same as LowerBoundaryConditions.Experiment1.Base_LowerBC.paddock.AutomaticIrrigation
          Operations IrrigationSchedule
            // 2000-01-01  [Irrigation].Apply(amount:100,duration:60);
            // 2000-01-02  [Irrigation].Apply(amount:100,duration:60);
            // 2000-01-03  [Irrigation].Apply(amount:100,duration:60);
            // 2000-01-04  [Irrigation].Apply(amount:100,duration:60);
            // 2000-01-21  [Irrigation].Apply(amount:100,duration:60);
            // 2000-01-22  [Irrigation].Apply(amount:100,duration:60);
            // 2000-01-23  [Irrigation].Apply(amount:100,duration:60);
            // 2000-01-24  [Irrigation].Apply(amount:100,duration:60);
            // 2000-02-21  [Irrigation].Apply(amount:100,duration:60);
            // 2000-02-22  [Irrigation].Apply(amount:100,duration:60);
            // 2000-02-23  [Irrigation].Apply(amount:100,duration:60);
            // 2000-02-24  [Irrigation].Apply(amount:100,duration:60);
            2001-02-21  [Irrigation].Apply(amount:1,duration:60);
            // 2001-02-22  [Irrigation].Apply(amount:800,duration:60);
            // 2000-12-01  [Irrigation].Apply(amount:10,duration:60);
          Soil: Latitude=0; Longitude=0
            Physical: same as LowerBoundaryConditions.Experiment1.Base_LowerBC.paddock.Soil.Physical
            Nutrient
            Organic: same as LowerBoundaryConditions.Experiment1.Base_LowerBC.paddock.Soil.Organic
            Chemical: same as LowerBoundaryConditions.Experiment1.Base_LowerBC.paddock.Soil.Chemical
            Sample Initial values: same as LowerBoundaryConditions.Experiment1.Base_LowerBC.paddock.Soil.Initial values
            Swim3: PrecipitationInterception=0; Salb=0.13; CN2Bare=0; CNRed=0; CNCov=0.8; KDul=1; PSIDul=-100; VC=true; DTMin=0; DTMax=1440; MaxWaterIncrement=10; SpaceWeightingFactor=0; SoluteSpaceWeightingFactor=1; Dis=0; Disp=1; A=2; DTHC=0.1; DTHP=2; Diagnostics=false; WaterTable=0
              SwimSoluteParameters Urea: WaterTableConcentration=0; D0=0.05
                Thickness  Exco  FIP
                60         0     1
                110        0     1
                140        0     1
                240        0     1
                150        0     1
              SwimSoluteParameters NH4: WaterTableConcentration=0; D0=0.05
                Thickness  Exco  FIP
                60         1     1
                110        1     1
                140        1     1
                240        1     1
                150        1     1
              SwimSoluteParameters NO3: WaterTableConcentration=0; D0=0.05
                Thickness  Exco  FIP
                60         0     1
                110        0     1
                140        0     1
                240        0     1
                150        0     1
              SwimSoluteParameters CL: WaterTableConcentration=0; D0=0.05
                Thickness  Exco  FIP
                60         0     1
                110        0     1
                140        0     1
                240        0     1
                150        0     1
              SwimSoluteParameters PlantAvailableNH4: WaterTableConcentration=0; D0=0.05
                Thickness  Exco  FIP
                60         1     1
                110        1     1
                140        1     1
                240        1     1
                150        1     1
              SwimSoluteParameters PlantAvailableNO3: WaterTableConcentration=0; D0=0.05
                Thickness  Exco  FIP
                60         0     1
                110        0     1
                140        0     1
                240        0     1
                150        0     1
              SwimSoluteParameters LabileP: WaterTableConcentration=0; D0=0.05
                Thickness  Exco  FIP
                60         0     1
                110        0     1
                140        0     1
                240        0     1
                150        0     1
              SwimSoluteParameters UnavailableP: WaterTableConcentration=0; D0=0.05
                Thickness  Exco  FIP
                60         0     1
                110        0     1
                140        0     1
                240        0     1
                150        0     1
            Solute CL
            LayerStructure: Thickness=[10, 20, 30, 40, 50, 50, 50, 50, 100, 100, 50, 50, 50, 50]
            SoilTemperature
          Irrigation
          Fertiliser
          SurfaceOrganicMatter: InitialResidueName=grass; InitialResidueType=grass; InitialResidueMass=20; InitialStandingFraction=0; InitialCPR=0; InitialCNR=17
          SimpleGrazing: same as LowerBoundaryConditions.Experiment1.Base_LowerBC.paddock.SimpleGrazing
          PastureSpecies AGPRyegrass: InitialShootDM=2500; InitialRootDM=500; InitialRootDepth=350
          PastureSpecies AGPWhiteClover: InitialShootDM=500; InitialRootDM=250; InitialRootDepth=300
          Report: EventNames=[Clock].EndOfDay
            VariableNames:
              [SetLowerBoundaryCondition].Script.LowerBCType
              [Clock].Today as Date
              [CalculateRollingWaterBalance].Script.WaterAddedToday as WaterAddedToday
              [CalculateRollingWaterBalance].Script.WaterRemovedToday as WaterRemovedToday
              [Soil].Swim3.Drainage as Drainage
              [Soil].Swim3.Runoff as Runoff
              sum([Soil].Swim3.SWmm) as WaterStored
              [Soil].Swim3.Pond as PondDepth
              [CalculateRollingWaterBalance].Script.WaterBalanceCumulative
              [CalculateRollingWaterBalance].Script.WaterBalanceToday
              [CalculateRollingWaterBalance].Script.PlantWaterUptake
              [Irrigation].IrrigationApplied as Irrigation
              [Weather].Rain as Rainfall
              [Soil].Swim3.psi as Psi
              [Soil].Swim3.SW as SW
              [Soil].Physical.DUL as DUL
  Folder Storage (disabled)
    Soil OriginalConvertedBuckthought: SoilType=Black Vertosol; Site=Jimbour; NearestTown=Jimbour, Q 4352; Region=South East Queensland; NaturalVegetation=Grassland, mainly Qld bluegrass; Latitude=0; Longitude=0
      Physical
        Thickness  ParticleSizeClay  ParticleSizeSand  ParticleSizeSilt  BD     AirDry  LL15   DUL    SAT    KS
        60         17.61             33.77             48.62             0.865  0.077   0.231  0.565  0.58   216
        110        16.36             33.91             49.73             0.835  0.069   0.207  0.515  0.606  1188
        140        16.42             35.91             47.67             0.805  0.068   0.205  0.514  0.617  2160
        240        29.03             46.26             24.71             0.83   0.088   0.264  0.475  0.62   3528
        150        18.44             53.54             28.02             0.82   0.097   0.29   0.481  0.625  5376
        SoilCrop AGPRyegrassSoil: LL=[0.231, 0.207, 0.205, 0.264, 0.29]; KL=[0.1, 0.1, 0.1, 0.1, 0]; XF=[1, 1, 1, 1, 0]
      Swim3 Swim: Salb=0.13; CNRed=20; CNCov=0.8; KDul=1; PSIDul=-100; VC=true; DTMax=1440; MaxWaterIncrement=10; Diagnostics=false
        zero: PrecipitationInterception, CN2Bare, DTMin, SpaceWeightingFactor, SoluteSpaceWeightingFactor, Dis, Disp, A, DTHC, DTHP, WaterTable
        SwimSoluteParameters: WaterTableConcentration=0; D0=0; Thickness=[200, 180, 100, 140, 80, 999999]
      SoilNitrogen: fom_types=[default, manure, mucuna, lablab, shemp, stable]; fract_carb=[0.2, 0.3, 0.54, 0.57, 0.45, 0]; fract_cell=[0.7, 0.3, 0.37, 0.37, 0.47, 0.1]; fract_lign=[0.1, 0.4, 0.09, 0.06, 0.08, 0.9]; NPartitionApproach=0
        SoilNitrogenNO3 NO3
        SoilNitrogenNH4 NH4
        SoilNitrogenUrea Urea
      CERESSoilTemperature Temperature
      InitialWater Initial water: PercentMethod=0; FractionFull=0.86; RelativeTo=LL15
      Organic: FOMCNRatio=40
        Thickness  Carbon  SoilCNRatio  FBiom  FInert  FOM
        60         8.2     12.5         0.08   0.58    92.8733
        110        5.5     12.5         0.02   0.7     57.9632
        140        3.3     12.5         0.015  0.77    31.8109
        240        1.7     12.5         0.01   0.9     11.3729
        150        1.7     12.5         0.01   0.99    5.97975
      Chemical
        Thickness  NO3N   NH4N      PH
        60         6.503  0.599004  5.7
        110        2.101  0.100001  5.3
        140        2.101  0.100001  5.9
        240        1.701  0.100001  6.6
        150        1.701  0.1       6.7
      LayerStructure: Thickness=[10, 20, 30, 40, 50, 50, 50, 50, 100, 100, 50, 50, 50, 50]
      Sample Initial conditions: Depth=[0-180]; Thickness=[1800]; NH4=[1]; SWUnits=Volumetric; OCUnits=Total; PHUnits=Water
    Folder Manager folder
      Manager Exp1_Urine
      Manager nh3_volatilisation
      Manager Fert
      Manager Exp1Report
      Manager Seepage
```csharp
using Models.PMF;
using Models.Core;
using System;
namespace Models
{
    [Serializable]
    [System.Xml.Serialization.XmlInclude(typeof(Model))]
    public class Script : Model
    {
        [Link] Clock Clock;

        [EventSubscribe("DoManagement")]
        private void OnDoManagement(object sender, EventArgs e)
        {
            /*
                if day = 349 then
   ! set seepage when bottom boundary is saturated
   bbc_seepage_potential = 0
endif
            */
        }
    }
}
```
      Operations Cutting
        0001-01-01
        2010-12-21  // agpasture graze type = residue, amount = 1600.00 (kg/ha)
        2011-01-06  // agpasture graze type = residue, amount = 1600.00 (kg/ha)
        2011-02-20  // agpasture graze type = residue, amount = 1600.00 (kg/ha)
        2011-03-23  // agpasture graze type = residue, amount = 1600.00 (kg/ha)
        2011-04-29  // agpasture graze type = residue, amount = 1600.00 (kg/ha)
        2011-04-11  // agpasture graze type = residue, amount = 1600.00 (kg/ha)
        2011-05-31  // agpasture graze type = residue, amount = 1600.00 (kg/ha)
        2011-06-27  // agpasture graze type = residue, amount = 1600.00 (kg/ha)
        2011-07-28  // agpasture graze type = residue, amount = 1600.00 (kg/ha)
        2011-09-06  // agpasture graze type = residue, amount = 1600.00 (kg/ha)
        2011-09-28  // agpasture graze type = residue, amount = 1600.00 (kg/ha)
        2011-10-16  // agpasture graze type = residue, amount = 1600.00 (kg/ha)
        2011-11-03  // agpasture graze type = residue, amount = 1600.00 (kg/ha)
        2011-11-17  // agpasture graze type = residue, amount = 1600.00 (kg/ha)
        2011-12-05  // agpasture graze type = residue, amount = 1600.00 (kg/ha)
        2011-12-19  // agpasture graze type = residue, amount = 1600.00 (kg/ha)
        2012-01-12  // agpasture graze type = residue, amount = 1600.00 (kg/ha)
        2012-02-07  // agpasture graze type = residue, amount = 1600.00 (kg/ha)
        2012-03-13  // agpasture graze type = residue, amount = 1600.00 (kg/ha)
        2012-04-13  // agpasture graze type = residue, amount = 1600.00 (kg/ha)
        2012-05-17  // agpasture graze type = residue, amount = 1600.00 (kg/ha)
        2012-07-02  // agpasture graze type = residue, amount = 1600.00 (kg/ha)
        2012-08-24  // agpasture graze type = residue, amount = 1600.00 (kg/ha)
      Operations NonTrt_Fert
        2010-12-21  [Fertiliser].Apply(10, Fertiliser.Types., 1);
        2010-12-21  [Fertiliser].Apply(10, Fertiliser.Types., 10);
        2010-12-21  [Fertiliser].Apply(5, Fertiliser.Types., 20);
        0001-01-01
        0001-01-01
        0001-01-01
      Operations Irrig
        2010-12-27  [Irrigation].Apply(5.3);
        2010-12-31  [Irrigation].Apply(5.3);
        2011-01-03  [Irrigation].Apply(5.3);
        2011-01-05  [Irrigation].Apply(5.3);
        2011-01-07  [Irrigation].Apply(5.3);
        2011-01-11  [Irrigation].Apply(5.3);
        2011-01-12  [Irrigation].Apply(95.4);
        2011-01-13  [Irrigation].Apply(53.0);
        2011-01-14  [Irrigation].Apply(106.0);
        2011-01-17  [Irrigation].Apply(79.5);
        2011-01-18  [Irrigation].Apply(106.0);
        2011-01-19  [Irrigation].Apply(106.0);
        2011-01-20  [Irrigation].Apply(106.0);
        2011-01-25  [Irrigation].Apply(79.5);
        2011-01-26  [Irrigation].Apply(53);
        2011-02-21  [Irrigation].Apply(10);
        2011-03-28  [Irrigation].Apply(10);
        2011-05-04  [Irrigation].Apply(10);
        2011-05-31  [Irrigation].Apply(10);
        2011-08-31  [Irrigation].Apply(10);
        2011-09-29  [Irrigation].Apply(10);
        2011-11-07  [Irrigation].Apply(10);
        2011-12-05  [Irrigation].Apply(10);
        2012-02-28  [Irrigation].Apply(10);
        2012-03-30  [Irrigation].Apply(10);
        2012-04-30  [Irrigation].Apply(10);
        2012-05-31  [Irrigation].Apply(10);
        0001-01-01
        0001-01-01
        0001-01-01
    Simulation T1_f0u0
      Manager Trt
      Weather
        FileName=C:\aaUnderVC\APSIMX\ApsimX\Examples\WeatherFiles\lincoln.met
      Clock: Start=2010-12-15; End=2012-08-27
      Summary summaryfile
      SoilArbitrator
      MicroClimate: a_interception=0; b_interception=0; c_interception=0; d_interception=0; SoilHeatFluxFraction=0; MinimumHeightDiffForNewLayer=0; NightInterceptionFraction=0; ReferenceHeight=2
      Zone paddock: Area=1; Slope=0; AspectAngle=0; Altitude=50
        SlopeEffectsOnWeather: SurroundsAlbedo=0.2; dRain=-100; A_diffuseRadn=-3.664; B_diffuseRadn=7.011; TurbidityCoefficient=0.95; a_ki=0.98; b_ki=0.00146; c_ki=0.075; d_ki=0.4; a_pw=2.1; b_pw=0.14; aT0=1.61; bT=0.88; cT=0.12; FN=0.81; FM=0.5; RainMeasured=-0.1; WindSpeedMeasured=-0.1; VPMeasured=-0.1
          zero: FracRadnDirect, dWind, dVapPressure, RadnMeasured, RadnDirect, RadnDiffuse, RadnReflected, ExtraterrestrialRadn, MaxDirSunlightLength, ActualDirSunlightLength, ClearnessIndex, DiffuseRadnFraction, DirRadnRatio, DiffRadnRatio, FracRadnDiffuse, FracRadnReflected, TminMeasured, TmaxMeasured, dltTmin, dltTmax, AtmosphericPressure
        Manager AutomaticIrrigation
          allowIrrigation = False
          seasonStart = 15-Aug
          seasonEnd = 30-May
          seasonsAllocation = 10000
          triggerDeficit = 50
          targetDeficit = 99
          returndays = 1
          maximumAmount = 30
          depthPAWC = 300
```csharp
using Newtonsoft.Json;
using Models.PMF.Phen;
using System;
using Models.Core;
using Models.PMF;
using Models.Soils;
using System.Xml.Serialization;
using APSIM.Shared.Utilities;
using Models.Interfaces;

        
namespace Models
{
    [Serializable] 
    [System.Xml.Serialization.XmlInclude(typeof(Model))]
    public class Script : Model
    {
        [Link] private ISummary summary;
        [Link] private Irrigation Irrigation;
        [Link] private Clock Clock;
        [Link] private Soil Soil;
        [Link(IsOptional = true)] private IPlant existingCrop;
        private DateTime StartDate;
        private DateTime EndDate;
        private double TopDUL;
        private double TopLL;
        private int nLayers;
        [Link(IsOptional = true)]
        private Phenology phenology;
        [Link]
        private IPhysical soilPhysical;
        [Link]
        private ISoilWater waterBalance;
        //Communication to other modules
       
        //User inputs from properties tab
        [Description("Turn irrigation on?")]
        public bool allowIrrigation { get; set; }
        [Description("Start of irrigation season (dd-MMM)")]
        public string seasonStart { get; set; }
        [Description("End of irrigation season (dd-MMM)")]
        public string seasonEnd { get; set; }
        [Description("Season allocation (mm)")]
        public double seasonsAllocation { get; set; }
        [Description("Deficit to trigger irrigation (% PAWC)")]
        public double triggerDeficit { get; set; }
        [Description("Deficit to stop irrigaton (% PAWC)")]
        public double targetDeficit { get; set; }
        [Description("Minimum days for irrigation to return")]
        public double returndays { get; set; }
        [Description("Maximum irrigation application (mm/day)")]
        public double maximumAmount { get; set; }
        [Description("Depth to calculate PAWC (mm)")]
        public double depthPAWC { get; set; }

        //Class members
        [JsonIgnore] public double TopSWdeficit { get; set; }
        [JsonIgnore] public double TopSWC { get; set; }
        [JsonIgnore] public double DaysSinceIrrigation { get; set; }
        [JsonIgnore] public double AmountToApply { get; set; }
        [JsonIgnore] public double SeasonAppliedAmount { get; set; }
        
        private bool IrrigationIsAllowed { get; set; }
        private bool SeasonIsOpen { get; set; }
        private bool CropIsActive { get; set; }
        private bool IrrigatorIsAvailable { get; set; }
        private bool SoilIsDry { get; set; }

    
        //Calculate static soil variables
        [EventSubscribe("StartOfSimulation")]
        private void OnStartOfSimulation(object sender, EventArgs e)
        {   
            //Set the season dates
            StartDate = DateTime.Parse(seasonStart + "-" + Clock.Today.Year.ToString());
            EndDate = DateTime.Parse(seasonEnd + "-" + Clock.Today.Year.ToString());
            
            //Can we irrigate at all?
            IrrigationIsAllowed = false; 
            if (allowIrrigation)
                IrrigationIsAllowed = true; 

            //Calculate soil water variables
            double depthFromSurface = 0.0;
            double fracLayer = 0.0;
            nLayers = soilPhysical.Thickness.Length;
            for (int layer = 0; layer < nLayers; layer++)
            {
                fracLayer = Math.Min(1.0, (depthPAWC - depthFromSurface) / soilPhysical.Thickness[layer]);
                TopLL += soilPhysical.LL15mm[layer] * fracLayer;
                TopDUL += soilPhysical.DULmm[layer] * fracLayer;
                depthFromSurface += soilPhysical.Thickness[layer];
                if (depthFromSurface >= depthPAWC)
                    layer = nLayers;
            }
        }
             
        //Determine daily requirement for irrigation
        [EventSubscribe("StartOfDay")]
        private void OnStartOfDay(object sender, EventArgs e)
        {
            //Can we irrigate today?          
            SeasonIsOpen = isBetween(Clock.Today, StartDate, EndDate);

            //Is there a crop in the ground that needs irrigation?
            CropIsActive = false;
            if ((existingCrop != null) && (existingCrop.IsAlive))
                CropIsActive = true;
            //if ((phenology.Stage >= 3.0) && (phenology.Stage < 6.0))
          
            //Is the irrigator available?
            IrrigatorIsAvailable = false;
            DaysSinceIrrigation += 1;
            if (DaysSinceIrrigation >= returndays)
                IrrigatorIsAvailable = true;
          
            //Is the soil dry enough to require irrigation?
            SoilIsDry = false;
            double depthFromSurface = 0.0;
            double fracLayer = 0.0;
            TopSWC = 0.0;
            for (int layer = 0; layer < nLayers; layer++)
            //for (int layer = 0; depthFromSurface < depthPAWC + soilPhysical.Thickness[layer]; layer++)
            {
                fracLayer = Math.Min(1.0, (depthPAWC - depthFromSurface) / soilPhysical.Thickness[layer]);
                TopSWC += waterBalance.SWmm[layer] * fracLayer;
                depthFromSurface += soilPhysical.Thickness[layer];
                if (depthFromSurface >= depthPAWC)
                    layer = nLayers;
            }
            
            TopSWdeficit = TopSWC - TopDUL;
            if (Math.Max(0.0, -TopSWdeficit) >= (TopDUL - TopLL) * (100 - triggerDeficit) / 100)
                SoilIsDry = true;
                
            //Are all the conditions ratifying irrigation
            if (IrrigationIsAllowed && SeasonIsOpen && CropIsActive && IrrigatorIsAvailable && SoilIsDry)
            {
                //Lets bloody well irrigate then!!!!
                AmountToApply = TopDUL * targetDeficit / 100 - TopSWC;
                AmountToApply = Math.Max(0.0, Math.Min(AmountToApply, seasonsAllocation - SeasonAppliedAmount));
                Irrigation.Apply(AmountToApply);
                DaysSinceIrrigation = 0;
                SeasonAppliedAmount += AmountToApply;
            }
        }
        
        ///Checks whether theDate is between iniDate and endDate (non-year specific)
        private bool isBetween(DateTime theDay, DateTime iniDate, DateTime endDate)
        {
            bool result = false;
            if (iniDate.DayOfYear < endDate.DayOfYear)
            {
                // period is within one year, ex: summer in the northern hemisphere
                if ((theDay.DayOfYear >= iniDate.DayOfYear) && (theDay.DayOfYear <= endDate.DayOfYear))
                    result = true;
            }
            else
            {
                // period goes over the end of the year, ex: summer in the southern hemisphere
                if ((theDay.DayOfYear >= iniDate.DayOfYear) || (theDay.DayOfYear <= endDate.DayOfYear))
                    result = true;
            }
            
            return result;
        }
    }
}
```
        Operations IrrigationSchedule
          2010-12-17  [Irrigation].Apply(100);
          2010-12-18  [Irrigation].Apply(100);
          2010-12-19  [Irrigation].Apply(100);
        Manager SetLowerBC
```csharp
using Models.Climate;
using APSIM.Shared.Utilities;
using Models.Soils.Nutrients;
using Models.Soils;
using Models.PMF;
using Models.Core;
using System.Xml.Serialization;
using System;
using Models.AgPasture;
using Models.Interfaces;

namespace Models
{
    [Serializable] 
    [System.Xml.Serialization.XmlInclude(typeof(Model))]
    public class Script : Model
    {
        [Link] Clock clock;
        [Link] ISummary summary;
        [Link] private Swim3 swim;
        //[Link] private PastureSpecies ryegrass;
        [Link] private SimpleGrazing grazing;

        public double SoilWaterStart  { get; set; }
        public double SoilWaterEnd  { get; set; }

        [EventSubscribe("DoDailyInitialisation")]
        private void DoDailyInitialisation(object sender, EventArgs e)
        {
            SoilWaterStart = 0.0;
            for (int i = 0; i < swim.SWmm.Length; i++)
                SoilWaterStart += swim.SWmm[i];
        }

        [EventSubscribe("DoReportCalculations")]
        private void DoReportCalculations(object sender, EventArgs e)
        {
            SoilWaterEnd = 0.0;
            for (int i = 0; i < swim.SWmm.Length; i++)
                SoilWaterEnd += swim.SWmm[i];
        }



        [EventSubscribe("DoManagement")]
        private void DoDailyCalculations(object sender, EventArgs e)
        {
            if (clock.Today == clock.StartDate)
            {
                summary.WriteMessage(this, "setting bbc potential", MessageType.Diagnostic);
                swim.bbc_seepage_potential = 0;
                //grazing.GrazeToResidual(0.0);
                //ryegrass.KillCrop(1.0);
            }
        }
    }
}
```
        Soil: Latitude=0; Longitude=0
          Physical
            Thickness  ParticleSizeClay  ParticleSizeSand  ParticleSizeSilt  Rocks  BD     AirDry  LL15   DUL    SAT    KS
            60         17.61             33.77             48.62             0      0.865  0.077   0.231  0.565  0.58   216
            110        16.36             33.91             49.73             0      0.835  0.069   0.207  0.515  0.606  1188
            140        16.42             35.91             47.67             0      0.805  0.068   0.205  0.514  0.617  2160
            240        29.03             46.26             24.71             0      0.83   0.088   0.264  0.475  0.62   3528
            150        18.44             53.54             28.02             0      0.82   0.097   0.29   0.481  0.625  5376
            SoilCrop AgPRyegrassSoil: LL=[0.231, 0.207, 0.205, 0.264, 0.29]; KL=[0.1, 0.1, 0.1, 0.1, 0]; XF=[1, 1, 1, 1, 0]
          SoilNitrogen: same as Storage.OriginalConvertedBuckthought.SoilNitrogen
          Organic: FOMCNRatio=40
            Thickness  Carbon  SoilCNRatio  FBiom  FInert  FOM
            60         8.2     12.5         0.08   0.58    92.873
            110        5.5     12.5         0.02   0.7     57.963
            140        3.3     12.5         0.015  0.77    31.811
            240        1.7     12.5         0.01   0.9     11.373
            150        1.7     12.5         0.01   0.99    5.98
          Chemical
            Thickness  NO3N   NH4N   PH   CL
            60         6.503  0.599  5.7  10
            110        2.101  0.1    5.3  10
            140        2.101  0.1    5.9  10
            240        1.701  0.1    6.6  10
            150        1.701  0.1    6.7  10
          Sample Initial water: Thickness=[60, 110, 140, 240, 150]; SW=[0.58, 0.606, 0.617, 0.62, 0.625]; SWUnits=Volumetric; OCUnits=Total; PHUnits=Water
          CERESSoilTemperature Temperature
          Swim3: PrecipitationInterception=0; Salb=0.13; CN2Bare=0; CNRed=20; CNCov=0.8; KDul=0.1; PSIDul=-100; VC=true; DTMin=0; DTMax=30; MaxWaterIncrement=1; SpaceWeightingFactor=0; SoluteSpaceWeightingFactor=1; Dis=0; Disp=1; A=2; DTHC=0.1; DTHP=2; Diagnostics=true; WaterTable=0
            SwimSoluteParameters Urea: WaterTableConcentration=0; D0=0.05
              Thickness  Exco  FIP
              60         0     1
              110        0     1
              140        0     1
              240        0     1
              150        0     1
            SwimSoluteParameters NH4: WaterTableConcentration=0; D0=0.05
              Thickness  Exco  FIP
              60         1     1
              110        1     1
              140        1     1
              240        1     1
              150        1     1
            SwimSoluteParameters NO3: WaterTableConcentration=0; D0=0.05
              Thickness  Exco  FIP
              60         0     1
              110        0     1
              140        0     1
              240        0     1
              150        0     1
            SwimSoluteParameters CL: WaterTableConcentration=0; D0=0.05
              Thickness  Exco  FIP
              60         0     1
              110        0     1
              140        0     1
              240        0     1
              150        0     1
            SwimSoluteParameters PlantAvailableNH4: WaterTableConcentration=0; D0=0.05
              Thickness  Exco  FIP
              60         1     1
              110        1     1
              140        1     1
              240        1     1
              150        1     1
            SwimSoluteParameters PlantAvailableNO3: WaterTableConcentration=0; D0=0.05
              Thickness  Exco  FIP
              60         0     1
              110        0     1
              140        0     1
              240        0     1
              150        0     1
          Solute CL
          InitialWater Initial water: PercentMethod=0; FractionFull=1
          LayerStructure: Thickness=[10, 20, 30, 40, 50, 50, 50, 50, 100, 100, 50, 50, 50, 50]
        Irrigation
        Fertiliser
        SurfaceOrganicMatter: InitialResidueName=grass; InitialResidueType=grass; InitialResidueMass=20; InitialStandingFraction=0; InitialCPR=0; InitialCNR=17
        SimpleGrazing: GrazingRotationType=2; SimpleMinGrazable=0; SimpleGrazingResidual=0; FlexibleGrazePostDM=0; FractionDefoliatedNToSoil=[0]; CNRatioDung=0; DepthUrineIsAdded=0; FractionPopulationDecline=0; TramplingOn=false; MaximumPropLitterMovedToSoil=0.1; PastureConsumedAtMaximumRateOfLitterRemoval=1200
        PastureSpecies AGPRyegrass: InitialShootDM=1500; InitialRootDM=450; InitialRootDepth=200
        PastureSpecies AGPWhiteClover: InitialShootDM=500; InitialRootDM=150; InitialRootDepth=350
        Report: EventNames=[Clock].EndOfDay
          VariableNames:
            [Clock].Today as Date
            //[Soil].Swim3.psi
            //[Soil].Swim3.SW
            [Weather].Rain
            [Irrigation].IrrigationApplied
            [Soil].Swim3.Drainage
            [Soil].Swim3.Es
            [Soil].Swim3.Runoff
            //[AgPRyegrass].WaterUptake
            [SetLowerBC].Script.SoilWaterStart
            [SetLowerBC].Script.SoilWaterEnd
            /// Water balance
            [Weather].Rain + [Irrigation].IrrigationApplied as WaterAdded
            [Soil].Swim3.Drainage + [Soil].Swim3.Es + [Soil].Swim3.Runoff as WaterRemoved // don't forget to add in plant uptake
            ([SetLowerBC].Script.SoilWaterEnd - [SetLowerBC].Script.SoilWaterStart) as WaterStoredInc
            ([Weather].Rain + [Irrigation].IrrigationApplied) - ([Soil].Swim3.Drainage + [Soil].Swim3.Es + [Soil].Swim3.Runoff) - ([SetLowerBC].Script.SoilWaterEnd - [SetLowerBC].Script.SoilWaterStart) as SoilWaterBalance
      Forages
    Experiment ExperimentLayering
      Factors
        Factor Normal: Specification=[LayerStructure]
          LayerStructure: Thickness=[10, 20, 30, 40, 50, 50, 50, 50, 100, 100, 50, 50, 50, 50]
          LayerStructure LayerStructureDetailed
            Thickness=[10, 20, 30, 40, 50, 50, 50, 50, 100, 100, 50, 50, 25, 25, 27.5, 22.5]
      Simulation BaseLayered
        Weather
          FileName=C:\aaUnderVC\APSIMX\ApsimX\Examples\WeatherFiles\lincoln.met
        ControlledEnvironment: MaxT=15; MinT=15; AirPressure=1010
          zero: Rain, Radn, PanEvap, VP, Wind, CO2, DiffuseFraction, Latitude, Longitude, DayLength, SunRise, SunSet
        Clock: Start=2000-01-01; End=2000-03-30
        Summary summaryfile
        SoilArbitrator
        MicroClimate: a_interception=0; b_interception=0; c_interception=0; d_interception=0; SoilHeatFluxFraction=0; MinimumHeightDiffForNewLayer=0; NightInterceptionFraction=0; ReferenceHeight=2
        Zone paddock: Area=1; Slope=0; AspectAngle=0; Altitude=50
          Memo To do and notes
            The first few lines in IrrigationSchedule
            // these are only here to get the soil above saturation -

            // not working all that well because the upper BC is causing all the excess water to runoff anyway

            // can delete this probably once pond is fixed.

            Add with and without plants to the experiment. Need a more flexible Manager first? Or add and kill?

            Could be nice to be able to swap from weather to controlled environment without having to change the links in "CalculateRollingWaterBalance"
          Manager CalculateRollingWaterBalance
```csharp
using Models.Climate;
using APSIM.Shared.Utilities;
using Models.Soils.Nutrients;
using Models.Soils;
using Models.PMF;
using Models.Core;
using System.Xml.Serialization;
using System;
using Models.AgPasture;
using Models.Interfaces;

namespace Models
{
    [Serializable] 
    [System.Xml.Serialization.XmlInclude(typeof(Model))]
    public class Script : Model
    {
        [Link] Clock clock;
        [Link] ISummary summary;
        [Link] IWeather weather;
        [Link] Irrigation irrigation;
        [Link] private Swim3 swim;
        //[Link] private PastureSpecies ryegrass;

        //Dean - what is a way to find out what plants are in the simulation and then get their uptake?
        // add water uptake and (no3+nh4) uptake as N uptake to IPlant

        public double WaterBalanceCumulative  { get; set; }
        //public double WaterBalanceYesterday  { get; set; }
        public double WaterBalanceToday  { get; set; }

        public double SoilWaterAtInitialisation  { get; set; }
        public double SoilWaterYesterday  { get; set; }
		public double SoilWaterNow  { get; set; }

        public double WaterAddedToday  { get; set; }
        public double WaterRemovedToday  { get; set; }
        public double WaterAddedCumulative  { get; set; }
        public double WaterRemovedCumulative  { get; set; }



        [EventSubscribe("DoDailyInitialisation")]
        private void DoDailyInitialisation(object sender, EventArgs e)
        {
        	if (clock.Today == clock.StartDate) 
        	// capture the water in and on the soil as a starting point
        	// doing this here as need the models to have intialised
        	{
	        	SoilWaterAtInitialisation = swim.pond;
    	    	for (int i = 0; i < swim.SWmm.Length; i++)
        			SoilWaterAtInitialisation += swim.SWmm[i];

        		SoilWaterYesterday = SoilWaterAtInitialisation;		// for initialisation only
        		WaterAddedCumulative = 0.0;
        		WaterRemovedCumulative = 0.0;
        		SoilWaterNow = 0.0;
        	}
        	else
        	{
        		SoilWaterYesterday = SoilWaterNow;		// this was calculated at reporting yesterday
        		WaterAddedToday = 0.0;
        		WaterRemovedToday = 0.0;
        	}
		}

        [EventSubscribe("DoReportCalculations")]
        private void DoReportCalculations(object sender, EventArgs e)
        {
        	SoilWaterNow = swim.pond;
        	for (int i = 0; i < swim.SWmm.Length; i++)
        		SoilWaterNow += swim.SWmm[i]; // so all the water stored in or on the soil

        	WaterAddedToday = weather.Rain + irrigation.IrrigationApplied;   // Can there be runon? Probably not but this will throw an error if that ever happens
        	WaterAddedCumulative+= WaterAddedToday;

        	WaterRemovedToday = swim.Drainage + swim.Es + swim.Runoff; // Need to add subsurface drainage here
        	WaterRemovedCumulative += WaterRemovedToday;
        	// Need to add uptake by plants into WaterRemoved as well but need an automated way of capturing

        	WaterBalanceToday = WaterAddedToday - WaterRemovedToday - (SoilWaterNow - SoilWaterYesterday);
        	WaterBalanceCumulative = WaterAddedCumulative - WaterRemovedCumulative - (SoilWaterNow - SoilWaterAtInitialisation);
        	// need to add a warning value and a crash value and make a crash

		}

        [EventSubscribe("DoManagement")]
        private void DoDailyCalculations(object sender, EventArgs e)
        {
        }
    }
}
```
          Manager SetLowerBC
            LowerBCType = seepage
```csharp
using Models.Climate;
using APSIM.Shared.Utilities;
using Models.Soils.Nutrients;
using Models.Soils;
using Models.PMF;
using Models.Core;
using System.Xml.Serialization;
using System;
using Models.AgPasture;
using Models.Interfaces;

namespace Models
{
    [Serializable] 
    [System.Xml.Serialization.XmlInclude(typeof(Model))]
    public class Script : Model
    {
        [Link] Clock clock;
        [Link] ISummary summary;
        [Link] private Swim3 swim;
        //[Link] private PastureSpecies ryegrass;
        //[Link] private SimpleGrazing grazing;

        [Description("What lower BC? Current options gradient/seepage/potential")] public string LowerBCType { get; set; }

        public double SoilWaterStart  { get; set; }
        public double SoilWaterEnd  { get; set; }

        [EventSubscribe("DoDailyInitialisation")]
        private void DoDailyInitialisation(object sender, EventArgs e)
        {
        }

        [EventSubscribe("DoReportCalculations")]
        private void DoReportCalculations(object sender, EventArgs e)
        {
        }

        [EventSubscribe("DoManagement")]
        private void DoDailyCalculations(object sender, EventArgs e)
        {
            if (clock.Today == clock.StartDate)
            {
                summary.WriteMessage(this, "Script is setting lower boundary condition to " + LowerBCType, MessageType.Diagnostic);
                if (LowerBCType.ToLower() == "gradient")
                    swim.SetLowerBCForGradient(bbcGradient: 0.0);   // in cm/cm (ibbc=0)
                else if (LowerBCType.ToLower() == "potential50")
                    swim.SetLowerBCForGivenPotential(bbcPotential: -10.0);    //  in cm (ibbc=1)
                else if (LowerBCType.ToLower() == "seepage")
                    swim.SetLowerBCForSeepage(bbcPotentialSeepage: 0.0);  // in cm (ibbc=3)
            }
        }
    }
}
```
          Operations IrrigationSchedule
            // 2000-01-01  [Irrigation].Apply(amount:100,duration:60);
            // 2000-01-02  [Irrigation].Apply(amount:100,duration:60);
            // 2000-01-03  [Irrigation].Apply(amount:100,duration:60);
            // 2000-01-04  [Irrigation].Apply(amount:100,duration:60);
            2000-01-21  [Irrigation].Apply(amount:100,duration:60);
            2000-01-22  [Irrigation].Apply(amount:100,duration:60);
            // 2000-01-23  [Irrigation].Apply(amount:100,duration:60);
            // 2000-01-24  [Irrigation].Apply(amount:100,duration:60);
            2000-02-21  [Irrigation].Apply(amount:100,duration:60);
            2000-02-22  [Irrigation].Apply(amount:100,duration:60);
            // 2000-02-23  [Irrigation].Apply(amount:100,duration:60);
            // 2000-02-24  [Irrigation].Apply(amount:100,duration:60);
          Soil: Latitude=0; Longitude=0
            Physical
              Thickness  ParticleSizeClay  ParticleSizeSand  ParticleSizeSilt  Rocks  BD     AirDry  LL15   DUL    SAT   KS
              60         17.61             33.77             48.62             0      0.865  0.077   0.231  0.565  0.58  216
              110        17.61             33.77             48.62             0      0.865  0.077   0.231  0.565  0.58  216
              140        17.61             33.77             48.62             0      0.865  0.077   0.231  0.565  0.58  216
              240        17.61             33.77             48.62             0      0.865  0.077   0.231  0.565  0.58  216
              150        17.61             33.77             48.62             0      0.865  0.077   0.231  0.565  0.58  216
              SoilCrop AgPRyegrassSoil: LL=[0.231, 0.231, 0.231, 0.231, 0.231]; KL=[0.1, 0.1, 0.1, 0.1, 0]; XF=[1, 1, 1, 1, 0]
            Nutrient
            Organic: FOMCNRatio=40
              Thickness  Carbon  SoilCNRatio  FBiom  FInert  FOM
              60         8.2     12.5         0.08   0.58    92.873
              110        5.5     12.5         0.02   0.7     57.963
              140        3.3     12.5         0.015  0.77    31.811
              240        1.7     12.5         0.01   0.9     11.373
              150        1.7     12.5         0.01   0.99    0
            Chemical
              Thickness  NO3N   NH4N   PH   CL
              60         6.503  0.599  6.5  10
              110        2.101  0.1    6.5  10
              140        2.101  0.1    6.5  10
              240        1.701  0.1    6.5  10
              150        1.701  0.1    6.5  10
            Sample Initial values: SWUnits=Volumetric; OCUnits=Total; PHUnits=Water
              Thickness  NO3    NH4    SW     CL  PH
              60         6.503  0.599  0.565  10  5.7
              110        2.101  0.1    0.565  10  5.3
              140        2.101  0.1    0.565  10  5.9
              240        1.701  0.1    0.565  10  6.6
              150        1.701  0.1    0.565  10  6.7
            Swim3: PrecipitationInterception=0; Salb=0.13; CN2Bare=50; CNRed=20; CNCov=0.8; KDul=1; PSIDul=-100; VC=true; DTMin=0; DTMax=60; MaxWaterIncrement=5; SpaceWeightingFactor=0; SoluteSpaceWeightingFactor=1; Dis=0; Disp=1; A=2; DTHC=0.1; DTHP=2; Diagnostics=true; WaterTable=0
              SwimSoluteParameters Urea: WaterTableConcentration=0; D0=0.05
                Thickness  Exco  FIP
                60         0     1
                110        0     1
                140        0     1
                240        0     1
                150        0     1
              SwimSoluteParameters NH4: WaterTableConcentration=0; D0=0.05
                Thickness  Exco  FIP
                60         1     1
                110        1     1
                140        1     1
                240        1     1
                150        1     1
              SwimSoluteParameters NO3: WaterTableConcentration=0; D0=0.05
                Thickness  Exco  FIP
                60         0     1
                110        0     1
                140        0     1
                240        0     1
                150        0     1
              SwimSoluteParameters CL: WaterTableConcentration=0; D0=0.05
                Thickness  Exco  FIP
                60         0     1
                110        0     1
                140        0     1
                240        0     1
                150        0     1
              SwimSoluteParameters PlantAvailableNH4: WaterTableConcentration=0; D0=0.05
                Thickness  Exco  FIP
                60         1     1
                110        1     1
                140        1     1
                240        1     1
                150        1     1
              SwimSoluteParameters PlantAvailableNO3: WaterTableConcentration=0; D0=0.05
                Thickness  Exco  FIP
                60         0     1
                110        0     1
                140        0     1
                240        0     1
                150        0     1
              SwimSoluteParameters LabileP: WaterTableConcentration=0; D0=0.05
                Thickness  Exco  FIP
                60         0     1
                110        0     1
                140        0     1
                240        0     1
                150        0     1
              SwimSoluteParameters UnavailableP: WaterTableConcentration=0; D0=0.05
                Thickness  Exco  FIP
                60         0     1
                110        0     1
                140        0     1
                240        0     1
                150        0     1
            Solute CL
            LayerStructure: Thickness=[10, 20, 30, 40, 50, 50, 50, 50, 100, 100, 50, 50, 50, 50]
            SoilTemperature
          Irrigation
          Fertiliser
          SurfaceOrganicMatter: InitialResidueName=grass; InitialResidueType=grass; InitialResidueMass=20; InitialStandingFraction=0; InitialCPR=0; InitialCNR=17
          SimpleGrazing: same as Storage.T1_f0u0.paddock.SimpleGrazing
          PastureSpecies AGPRyegrass: InitialShootDM=2500; InitialRootDM=500; InitialRootDepth=350
          PastureSpecies AGPWhiteClover: InitialShootDM=500; InitialRootDM=250; InitialRootDepth=300
          Report: EventNames=[Clock].EndOfDay
            VariableNames:
              [SetLowerBC].Script.LowerBCType
              [Clock].Today as Date
              [CalculateRollingWaterBalance].Script.WaterAddedToday as WaterAddedToday
              [CalculateRollingWaterBalance].Script.WaterRemovedToday as WaterRemovedToday
              [Soil].Swim3.Drainage as Drainage
              sum([Soil].Swim3.SWmm) as WaterStored
              [Soil].Swim3.Pond as PondDepth
              [CalculateRollingWaterBalance].Script.WaterBalanceCumulative
              [CalculateRollingWaterBalance].Script.WaterBalanceToday
              [Soil].Swim3.psi as Psi
              [Soil].Swim3.SW as SW
        Forages
    ControlledEnvironment: MaxT=15; MinT=15; AirPressure=1010
      zero: Rain, Radn, PanEvap, VP, Wind, CO2, DiffuseFraction, Latitude, Longitude, DayLength, SunRise, SunSet
    ControlledEnvironment ControlledEnvironment1: MaxT=15; MinT=15; AirPressure=1010
      zero: Rain, Radn, PanEvap, VP, Wind, CO2, DiffuseFraction, Latitude, Longitude, DayLength, SunRise, SunSet
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