Simulations: Version=18
  Replacements
    Plant Teff: CropType=Teff
      Memo TitlePage
        # The APSIM Teff Model

        The APSIM Teff model has been developed using the Plant Modelling Framework (PMF)[brown_plant_2014]. This new framework provides a library of plant organ and process submodels that can be coupled, at runtime, to construct a model in much the same way that models can be coupled to construct a simulation. This means that dynamic composition of lower level process and organ classes (e.g. photosynthesis, leaf) into larger constructions (e.g. Teff, wheat, sorghum) can be achieved by the model developer without additional coding.

        The APSIM Teff model includes components to simulate the following plant parts and processes:

        * Phenological development
        * Leaf and canopy development
        * Stem Growth
        * Panicle Growth
        * Grain Growth
        * Root Growth
      OrganArbitrator Arbitrator
        PrioritythenRelativeAllocation NArbitrator
        RelativeAllocation DMArbitrator
      Phenology: DaysAfterSowing=0
        Memo
          The phenology model used in the APSIM Teff model follows the approach used in earlier cereal models [Carberry1989CERESMaize;vanOosterom200167;Wang2002GenericCropModel].  The model predicts development of primordia on the apex of the main stem and appearance of individual leaves to predict time to flag leaf.  Other stages use thermal time targets.  After emergence and an initial juvenile phase, photoperiod effects the timing of floral initiation.
        AirTemperatureFunction ThermalTime
          Memo
            Little information is available on the impact of air temperature on the rate of development of Teff as is the case for other crops.  Therefore, cardinal temperatures (ie base temperature, optimum temperature, maximum temperature) have been taken from previous work on modelling development in millet [vanOosterom200167].
          XYPairs: X=[10, 33, 47]; Y=[0, 23, 0]
        GerminatingPhase Germinating: Start=Sowing; End=Germination
        EmergingPhase Emerging: Start=Germination; End=Emergence; ShootLag=30; ShootRate=0
          VariableReference ThermalTime: VariableName=[Phenology].ThermalTime.Value()
        GenericPhase Juvenile: Start=Emergence; End=EndJuvenile
          Memo
            Data from [vanDelden2012] showed that panicle initiation occurred at leaf number 4 or 5 for 4 varieties grown under short day lengths.  This suggests that the duration of the juvenile phase should be approximately 4-5 phyllochrons, depending on the cultivar.  The default is assumed to be 4, but this can be changed as required for other cultivars.<br/>
          Constant Target: FixedValue=100; Units=oC.d
          VariableReference ThermalTime: VariableName=[Phenology].ThermalTime.Value()
        GenericPhase Photosensitive: Start=EndJuvenile; End=FloralInitiation
          Memo
            Data from [vanDelden2012] showed that final leaf number for a selection of teff cultivars increased with increasing photoperiod.  A photoperiod response has been fitted to these data.  Cultivar Gibe showed an increase in final leaf number from 4 to 7 leaves as photoperiod increased from 10.3h to 13.5h.  Cultivar Ziquala showed an increase in final leaf number from 4 to 9 leaves as photoperiod increased from 11.5 h to 13.5h.  The photoperiod response for Dutch cultivars extended to much longer day lengths.  Cultivar Ayana showed an increase in final leaf number from 4 to 5 leaves as photoperiod increased from 10 h to 15 h. Cultivar 04T19  showed an increase in final leaf number from 4 to 7 leaves as photoperiod increased from 9.5 h to 17 h.<br/>
          VariableReference ThermalTime: VariableName=[Phenology].ThermalTime.Value()
          LinearInterpolationFunction Target: XProperty=[Phenology].Photoperiod.Value()
            XYPairs: X=[0, 10.3, 13.5, 16]; Y=[0, 0, 150, 150]
        LeafAppearancePhase LeafAppearance: Start=FloralInitiation; End=FlagLeaf
          VariableReference ThermalTime: VariableName=[Phenology].ThermalTime.Value()
        GenericPhase FlagLeafToFlowering: Start=FlagLeaf; End=Flowering
          Memo
            [vanDelden2012] explain that many teff varieties are self-polinating with flowering co-incident with heading.  We assume that heading occurs one phyllochron after flag leaf.<br/>
          Constant Target: FixedValue=100; Units=oC.d
          VariableReference ThermalTime: VariableName=[Phenology].ThermalTime.Value()
        GenericPhase FloweringToGrainFilling: Start=Flowering; End=StartGrainFill
          Memo
            Unknown?????????????????????????????????????<br/>
          Constant Target: FixedValue=120; Units=oC.d
          VariableReference ThermalTime: VariableName=[Phenology].ThermalTime.Value()
        GenericPhase GrainFilling: Start=StartGrainFill; End=EndGrainFill
          Memo
            Unknown?????????????????????????????????????<br/>
          Constant Target: FixedValue=550; Units=oC.d
          VariableReference ThermalTime: VariableName=[Phenology].ThermalTime.Value()
        GenericPhase Maturing: Start=EndGrainFill; End=Maturity
          Memo
            Unknown?????????????????????????????????????<br/>
          Constant Target: FixedValue=10; Units=oC.d
          VariableReference ThermalTime: VariableName=[Phenology].ThermalTime.Value()
        GenericPhase MaturityToHarvestRipe: Start=Maturity; End=HarvestRipe
          Memo
            Unknown?????????????????????????????????????<br/>
          Constant Target: FixedValue=10; Units=oC.d
          VariableReference ThermalTime: VariableName=[Phenology].ThermalTime.Value()
        EndPhase ReadyForHarvesting: Start=HarvestRipe; End=Unused
          VariableReference ThermalTime: VariableName=[Phenology].ThermalTime.Value()
        PhotoperiodFunction Photoperiod: Twilight=-6; DayLength=0
        OnEventFunction FloweringDAS: SetEvent=Flowering; ReSetEvent=never
          Memo
            A function is used to provide flowering date as days after sowing(DAS).
            <br/>
          Constant PreEventValue: FixedValue=0
          VariableReference PostEventValue: VariableName=[Phenology].DaysAfterSowing
        OnEventFunction MaturityDAS: SetEvent=Maturity; ReSetEvent=never
          Memo
            A function is used to provide maturity date as days after sowing(DAS).
            <br/>
          Constant PreEventValue: FixedValue=0
          VariableReference PostEventValue: VariableName=[Phenology].DaysAfterSowing
        OnEventFunction PanicleInitiationDAS: SetEvent=FloralInitiation; ReSetEvent=never
          Memo
            A function is used to provide flowering date as days after sowing(DAS).
            <br/>
          Constant PreEventValue: FixedValue=0
          VariableReference PostEventValue: VariableName=[Phenology].DaysAfterSowing
      Structure: Initialised=false; Germinated=false; Emerged=false; CohortToInitialise=0; TipToAppear=0; ApexNum=0
        VariableReference ThermalTime: VariableName=[Phenology].ThermalTime.Value()
        PhaseLookup Phyllochron
          PhaseLookupValue Phyllochron: Start=Emergence; End=FlagLeaf
            LinearInterpolationFunction Phyllochron: XProperty=[Structure].LeafTipsAppeared
              XYPairs: X=[1, 4, 5, 9]; Y=[25, 25, 50, 150]
        HeightFunction HeightModel
          LinearInterpolationFunction PotentialHeight: XProperty=[Phenology].Stage
            XYPairs: X=[3, 6]; Y=[20, 1000]
          LinearInterpolationFunction WaterStress: XProperty=[Teff].WaterSupplyDemandRatio
            XYPairs: X=[0.3, 1]; Y=[1, 1]
        MultiplyFunction BranchingRate
          PhaseLookup PotentialBranchingRate
            PhaseLookupValue Vegetative: Start=Emergence; End=FlagLeaf
              LinearInterpolationFunction PotentialBranchingRate: XProperty=[Leaf].AppearedCohortNo
                XYPairs: X=[1, 2, 9]; Y=[0, 1, 8]
            PhaseLookupValue Reproductive: Start=FlagLeaf; End=HarvestRipe
              Constant Zero: FixedValue=0
          LinearInterpolationFunction WaterStress: XProperty=[Teff].WaterSupplyDemandRatio
            XYPairs: X=[0, 1]; Y=[0, 1]
          LinearInterpolationFunction Shading: XProperty=[Leaf].CoverGreen
            XYPairs: X=[0, 0.6, 0.7]; Y=[1, 1, 0]
        Constant BranchMortality: FixedValue=0
        Constant DroughtInducedBranchMortality: FixedValue=0
        HoldFunction FinalLeafNumber: WhenToHold=FloralInitiation
          AddFunction ValueToHold
            Constant PrimordiaAtEmergence: FixedValue=6
            DivideFunction PrimordiaDuringJuvenilePhase
              AddFunction
                VariableReference JuvenilePhaseDuration: VariableName=[Phenology].Juvenile.Target.Value()
                VariableReference PhotoSensitivePhaseDuration: VariableName=[Phenology].Photosensitive.Target.Value()
              PhaseLookup MeanPlastochron
                PhaseLookupValue PreEmerg: Start=Germination; End=Emergence
                  Constant: FixedValue=15
                PhaseLookupValue PostEmerg: Start=Emergence; End=FlagLeaf
                  DivideFunction MeanPlastochron
                    AccumulateFunction AccumulatedPlastochron: StartStageName=Emergence; EndStageName=FloralInitiation; FractionRemovedOnCut=0; FractionRemovedOnHarvest=0; FractionRemovedOnGraze=0; FractionRemovedOnPrune=0
                      MultiplyFunction Plastochron
                        VariableReference Phyllochron: VariableName=[Structure].Phyllochron.Value()
                        Constant LeafTipsPerPrimordia: FixedValue=0.5
                    AccumulateFunction Days: StartStageName=Emergence; EndStageName=FloralInitiation; FractionRemovedOnCut=0; FractionRemovedOnHarvest=0; FractionRemovedOnGraze=0; FractionRemovedOnPrune=0
                      Constant: FixedValue=1
        Constant StemSenescenceAge: FixedValue=0
      ReproductiveOrgan Grain: GrowthRespiration=0; MaintenanceRespiration=0
        Constant InitialGrainProportion: FixedValue=0.05
        Constant MaximumPotentialGrainSize: FixedValue=0.0003
        PhaseLookup DMDemandFunction
          PhaseLookupValue InitialPhase: Start=Flowering; End=StartGrainFill
            FillingRateFunction
              VariableReference NumberFunction: VariableName=[Grain].NumberFunction.Value()
              VariableReference FillingDuration: VariableName=[Phenology].FloweringToGrainFilling.Target.Value()
              VariableReference ThermalTime: VariableName=[Phenology].ThermalTime.Value()
              MultiplyFunction PotentialSizeIncrement
                VariableReference InitialProportion: VariableName=[Grain].InitialGrainProportion.Value()
                VariableReference MaximumSize: VariableName=[Grain].MaximumPotentialGrainSize.Value()
          PhaseLookupValue LinearPhase: Start=StartGrainFill; End=EndGrainFill
            FillingRateFunction
              VariableReference NumberFunction: VariableName=[Grain].NumberFunction.Value()
              VariableReference FillingDuration: VariableName=[Phenology].GrainFilling.Target.Value()
              VariableReference ThermalTime: VariableName=[Phenology].ThermalTime.Value()
              MultiplyFunction PotentialSizeIncrement
                SubtractFunction ProportionLinearPhase
                  Constant One: FixedValue=1
                  VariableReference InitialProportion: VariableName=[Grain].InitialGrainProportion.Value()
                VariableReference MaximumSize: VariableName=[Grain].MaximumPotentialGrainSize.Value()
        Constant MinimumNConc: FixedValue=0.008; Units=g/g
        PhaseLookup MaximumNConc
          PhaseLookupValue InitialPhase: Start=Flowering; End=StartGrainFill
            Constant InitialNconc: FixedValue=0.05; Units=g/g
          PhaseLookupValue LinearPhase: Start=StartGrainFill; End=EndGrainFill
            Constant FinalNconc: FixedValue=0.013; Units=g/g
        Constant WaterContent: FixedValue=0.12; Units=g/g
        PhaseLookup NFillingRate
          PhaseLookupValue GrainFilling: Start=Flowering; End=EndGrainFill
            FillingRateFunction
              VariableReference NumberFunction: VariableName=[Grain].NumberFunction.Value()
              AddFunction FillingDuration
                VariableReference FloweringToGrainFilling: VariableName=[Phenology].FloweringToGrainFilling.Target.Value()
                VariableReference GrainFilling: VariableName=[Phenology].GrainFilling.Target.Value()
              VariableReference ThermalTime: VariableName=[Phenology].ThermalTime.Value()
              MultiplyFunction PotentialSizeIncrement
                Constant MaximumFinalNConc: FixedValue=0.025
                VariableReference MaximumSize: VariableName=[Grain].MaximumPotentialGrainSize.Value()
        MultiplyFunction NumberFunction
          VariableReference StemMass: VariableName=[Stem].Live.Wt
          Constant GrainsPerGramStem: FixedValue=4000; Units=/g
        BiomassRemoval BiomassRemovalDefaults
          OrganBiomassRemovalType Harvest: FractionLiveToRemove=1; FractionDeadToRemove=0; FractionLiveToResidue=0; FractionDeadToResidue=0
          OrganBiomassRemovalType Cut: FractionLiveToRemove=1; FractionDeadToRemove=0; FractionLiveToResidue=0; FractionDeadToResidue=0
          OrganBiomassRemovalType Prune: FractionLiveToRemove=0; FractionDeadToRemove=0; FractionLiveToResidue=0.8; FractionDeadToResidue=0
          OrganBiomassRemovalType Graze: FractionLiveToRemove=0.6; FractionDeadToRemove=0; FractionLiveToResidue=0.2; FractionDeadToResidue=0
        Live Biomass
        Dead Biomass
      Root: GrowthRespiration=0; MaintenanceRespiration=0
        LinearInterpolationFunction KLModifier: XProperty=[Teff].Population
          Memo
            The parameter KL is is described by Meinke et al (1993) to combine elements of soil conductivity (K) with root length (L) in determining root water uptake.  Peake et al (2013) demonstrated that in maize KL varied with plant population through impacts on root length density.  Here we adjust KL linearly with plant population.
            <br/>
          XYPairs: X=[0, 10]; Y=[1, 1]
        Constant SoilWaterEffect: FixedValue=1
          Memo
            No effect of soil water content on root growth is currently captured in the model.<br/>
        Constant TemperatureEffect: FixedValue=1
          Memo
            No effect of temperature on root growth is currently captured in the model.<br/>
        Constant MaxDailyNUptake: FixedValue=20
          Memo
            Maximum daily N uptake is set to an arbitrarily high value.<br/>
        Constant SenescenceRate: FixedValue=0.005
          Memo
            Jones and Kiniry (1986) used a constant root senescence fraction in the CERES-maize model.<br/>
        Constant StructuralFraction: FixedValue=1
        Constant MaximumNConc: FixedValue=0.01; Units=g/g
        Constant MinimumNConc: FixedValue=0.01; Units=g/g
        Constant MaximumRootDepth: FixedValue=1000000
        PhaseLookup RootFrontVelocity
          Memo
            Hammer et al (2009) used a constant extraction front velocity of 2.5cm per day in their analysis of historical maize yield trends in the US corn belt.
            <br/>
          PhaseLookupValue PreFlowering: Start=Germination; End=Flowering
            Constant Function: FixedValue=25
          PhaseLookupValue PostFlowering: Start=Flowering; End=Maturity
            Constant Function: FixedValue=0
        PhaseBasedSwitch NitrogenDemandSwitch: Start=Germination; End=Maturity
        BiomassRemoval BiomassRemovalDefaults
          OrganBiomassRemovalType Harvest: FractionLiveToRemove=0; FractionDeadToRemove=0; FractionLiveToResidue=0.2; FractionDeadToResidue=0
          OrganBiomassRemovalType Cut: FractionLiveToRemove=0; FractionDeadToRemove=0; FractionLiveToResidue=0.3; FractionDeadToResidue=0
          OrganBiomassRemovalType Prune: FractionLiveToRemove=0; FractionDeadToRemove=0; FractionLiveToResidue=0.1; FractionDeadToResidue=0
          OrganBiomassRemovalType Graze: FractionLiveToRemove=0; FractionDeadToRemove=0; FractionLiveToResidue=0.15; FractionDeadToResidue=0
        LinearInterpolationFunction KNO3: XProperty=[Root].LengthDensity
          XYPairs: X=[0, 0.003]; Y=[0, 0.03]
        LinearInterpolationFunction KNH4: XProperty=[Root].LengthDensity
          XYPairs: X=[0, 0.003]; Y=[0, 0.0003]
        LinearInterpolationFunction NUptakeSWFactor: XProperty=[Root].RWC
          XYPairs: X=[0, 1]; Y=[0, 1]
        Constant InitialDM: FixedValue=0.2; Units=g/plant
        Constant SpecificRootLength: FixedValue=40; Units=m/g
        PartitionFractionDemandFunction DMDemandFunction
          LinearInterpolationFunction PartitionFraction: XProperty=[Phenology].Stage
            XYPairs: X=[0, 2.99, 3, 6, 7]; Y=[0, 0, 0.2, 0.2, 0]
      Leaf: MaxCover=1; Albedo=0.18; Gsmax=0.012; R50=160; MicroClimatePresent=true; KDead=0.03; MaximumMainStemLeafNumber=50
        zero: GrowthRespiration, MaintenanceRespiration, CurrentExpandingLeaf, StartFractionExpanded, FractionNextleafExpanded, DeadNodesYesterday, FRGR, PotentialEP, DMConversionEfficiency, TipsAtEmergence, CohortsAtInitialisation, FractionDied
        LeafCohort InitialLeaves[1]: Rank=1; Area=380
          zero: NReallocationFactor, DMReallocationFactor, NRetranslocationFactor, DMRetranslocationFactor, ShadeInducedSenRate, SenescedFrac, DeltaPotentialArea, DeltaStressConstrainedArea, DeltaCarbonConstrainedArea, PotentialStructuralDMAllocation, PotentialMetabolicDMAllocation, MetabolicNReallocated, MetabolicWtReallocated, StorageNReallocated, StorageWtReallocated, MetabolicNRetranslocated, StorageNRetrasnlocated, DMRetranslocated, MetabolicNAllocation, StructuralDMAllocation, MetabolicDMAllocation, MaintenanceRespiration
        LeafCohort InitialLeaves[2]: Rank=2
          zero: NReallocationFactor, DMReallocationFactor, NRetranslocationFactor, DMRetranslocationFactor, ShadeInducedSenRate, SenescedFrac, DeltaPotentialArea, DeltaStressConstrainedArea, DeltaCarbonConstrainedArea, PotentialStructuralDMAllocation, PotentialMetabolicDMAllocation, MetabolicNReallocated, MetabolicWtReallocated, StorageNReallocated, StorageWtReallocated, MetabolicNRetranslocated, StorageNRetrasnlocated, DMRetranslocated, MetabolicNAllocation, StructuralDMAllocation, MetabolicDMAllocation, Area, MaintenanceRespiration
        ArrayBiomass CohortArrayLive: Propertys=[[Leaf].Live]; ArraySize=[Leaf].MaxNodeNo
        ArrayBiomass CohortArrayDead: Propertys=[[Leaf].Dead]; ArraySize=[Leaf].MaxNodeNo
        LeafCohortParameters CohortParameters
          Constant SenessingLeafRelativeSize: FixedValue=1; Units=0-1
          Constant NReallocationFactor: FixedValue=0.05
          Constant NRetranslocationFactor: FixedValue=0.1
          Constant DMReallocationFactor: FixedValue=1
          Constant DMRetranslocationFactor: FixedValue=0.5
          LinearInterpolationFunction CellDivisionStress: XProperty=[Teff].WaterSupplyDemandRatio
            XYPairs: X=[0.5, 1]; Y=[0.1, 1]
          LinearInterpolationFunction ExpansionStress: XProperty=[Teff].WaterSupplyDemandRatio
            XYPairs: X=[0.3, 1]; Y=[0, 1]
          MultiplyFunction GrowthDuration
            VariableReference Phyllochron: VariableName=[Structure].Phyllochron.Phyllochron.Value()
            Constant NumberOfExpandingLeaves: FixedValue=1
          Constant LagDuration: FixedValue=500
          Constant SenescenceDuration: FixedValue=100
          Constant DetachmentLagDuration: FixedValue=1000000
          Constant DetachmentDuration: FixedValue=1000000
          Constant RelativeBranchLeafSize: FixedValue=1
          Constant MaximumNConc: FixedValue=0.063
          Constant CriticalNConc: FixedValue=0.05
          Constant MinimumNConc: FixedValue=0.01
          AddFunction DroughtInducedLagAcceleration
            Constant One: FixedValue=1
            MultiplyFunction Stress
              Constant StressResponseCoefficient: FixedValue=1
              LinearInterpolationFunction StressFactor: XProperty=[Teff].WaterSupplyDemandRatio
                XYPairs: X=[0, 0.7]; Y=[1, 0]
          AddFunction DroughtInducedSenAcceleration: same as Replacements.Teff.Leaf.CohortParameters.DroughtInducedLagAcceleration
          LinearInterpolationFunction SpecificLeafAreaMax: XProperty=[Structure].RelativeNodeApperance
            XYPairs: X=[0, 1]; Y=[22000, 22000]
          LinearInterpolationFunction SpecificLeafAreaMin: XProperty=[Structure].RelativeNodeApperance
            XYPairs: X=[0, 0.5, 1]; Y=[10000, 20000, 20000]
          Constant InitialNConc: FixedValue=0
          Constant StructuralFraction: FixedValue=0.5
          Constant StorageFraction: FixedValue=0
          LinearInterpolationFunction ShadeInducedSenescenceRate: XProperty=[Leaf].CohortCurrentRankCoverAbove
            XYPairs: X=[0, 0.7, 0.8, 0.97, 0.98]; Y=[0, 0, 0, 0, 0]
          LinearInterpolationFunction MaxArea: XProperty=[Leaf].AppearedCohortNo
            XYPairs: X=[0, 3, 5, 7, 10]; Y=[150, 500, 800, 1300, 2000]
          Constant LeafSizeShapeParameter: FixedValue=0.01
          Constant MaintenanceRespirationFunction: FixedValue=0
          ArrayFunction LagDurationAgeMultiplier: Values=1 1 1
          ArrayFunction SenescenceDurationAgeMultiplier: Values=1 1 1
          ArrayFunction LeafSizeAgeMultiplier: Values=1 1 1 1 1 1 1 1 1 1 1 1
        RUEModel Photosynthesis
          Constant RUE: FixedValue=1.5
          WeightedTemperatureFunction FT: MaximumTemperatureWeighting=0.75
            XYPairs: X=[0, 8, 20, 35, 50]; Y=[0, 0, 1, 1, 0]
          LinearInterpolationFunction FVPD: XProperty=[Leaf].Photosynthesis.VPD
            XYPairs: X=[0, 10, 50]; Y=[1, 1, 1]
          LinearInterpolationFunction FN: XProperty=[Leaf].Fn
            XYPairs: X=[0, 1]; Y=[0.3, 1]
          LinearInterpolationFunction FW: XProperty=[Leaf].Fw
            XYPairs: X=[0, 0.3]; Y=[0, 1]
          RUECO2Function FCO2: PhotosyntheticPathway=C4
          VariableReference RadnInt: VariableName=[Leaf].RadIntTot
        MinimumFunction FRGRFunction
          VariableReference RUE_FT: VariableName=[Leaf].Photosynthesis.FT.Value()
          MinimumFunction Others
            VariableReference RUE_FN: VariableName=[Leaf].Photosynthesis.FN.Value()
            VariableReference RUE_FVPD: VariableName=[Leaf].Photosynthesis.FVPD.Value()
        MultiplyFunction ExtinctionCoeff
          Memo
            Extinction coefficient is specified in terms of a potential extinction coefficient which is then discounted during periods of water stress to account for the impact of leaf curling.
            <br/>
          LinearInterpolationFunction PotentialExtinctionCoeff: XProperty=[Leaf].LAI
            XYPairs: X=[0, 0.45]; Y=[0.65, 0.65]
          LinearInterpolationFunction WaterStressImpact: XProperty=[Teff].WaterSupplyDemandRatio
            XYPairs: X=[0, 0.7]; Y=[0.5, 1]
        LinearInterpolationFunction FrostFraction: XProperty=[IWeather].MinT
          XYPairs: X=[-10, -9]; Y=[1, 0]
        VariableReference ThermalTime: VariableName=[Phenology].ThermalTime.Value()
        BiomassRemoval BiomassRemovalDefaults
          OrganBiomassRemovalType Harvest: FractionLiveToRemove=0; FractionDeadToRemove=0; FractionLiveToResidue=0.3; FractionDeadToResidue=0
          OrganBiomassRemovalType Cut: FractionLiveToRemove=0.8; FractionDeadToRemove=0; FractionLiveToResidue=0; FractionDeadToResidue=0
          OrganBiomassRemovalType Prune: FractionLiveToRemove=0; FractionDeadToRemove=0; FractionLiveToResidue=0.6; FractionDeadToResidue=0
          OrganBiomassRemovalType Graze: FractionLiveToRemove=0.6; FractionDeadToRemove=0; FractionLiveToResidue=0.1; FractionDeadToResidue=0
        Constant StructuralFraction: FixedValue=0.5
        Constant DMConversionEfficiencyFunction: FixedValue=1
        ApexStandard
      GenericOrgan Panicle
        Constant NReallocationFactor: FixedValue=0
        Constant NRetranslocationFactor: FixedValue=0.1
        Constant MaximumNConc: FixedValue=0.01
        Constant SenescenceRate: FixedValue=0; Units=/d
        Constant MinimumNConc: FixedValue=0.01
        MultiplyFunction HeadNumber
          Constant FertileTillers: FixedValue=1
          VariableReference StemPopulation: VariableName=[Structure].TotalStemPopn
        PartitionFractionDemandFunction DMDemandFunction
          PhaseLookup PartitionFraction
            PhaseLookupValue PreFlagLeaf: Start=Emergence; End=FlagLeaf
              Constant StemFraction: FixedValue=0
            PhaseLookupValue StemElongation: Start=FlagLeaf; End=StartGrainFill
              Constant PanicleFraction: FixedValue=0.6
        BiomassRemoval BiomassRemovalDefaults
          OrganBiomassRemovalType Harvest: FractionLiveToRemove=0.5; FractionDeadToRemove=0; FractionLiveToResidue=0.1; FractionDeadToResidue=0
          OrganBiomassRemovalType Cut: FractionLiveToRemove=0.8; FractionDeadToRemove=0; FractionLiveToResidue=0; FractionDeadToResidue=0
          OrganBiomassRemovalType Prune: FractionLiveToRemove=0; FractionDeadToRemove=0; FractionLiveToResidue=0.6; FractionDeadToResidue=0
          OrganBiomassRemovalType Graze: FractionLiveToRemove=0.6; FractionDeadToRemove=0; FractionLiveToResidue=0.2; FractionDeadToResidue=0
        Constant InitialWtFunction: FixedValue=0; Units=g/m^2
        Constant StructuralFraction: FixedValue=1; Units=g/g
        Constant DetachmentRateFunction: FixedValue=0; Units=/d
        Constant MaintenanceRespirationFunction: FixedValue=0; Units=0-1
        Constant DMConversionEfficiency: FixedValue=1; Units=0-1
        Constant NitrogenDemandSwitch: FixedValue=1
        Constant DMReallocationFactor: FixedValue=0
        Constant DMRetranslocationFactor: FixedValue=0
        VariableReference CriticalNConc: VariableName=[Panicle].MinimumNConc.Value()
        Live Biomass
        Dead Biomass
      GenericOrgan Stem
        Constant SenescenceRate: FixedValue=0; Units=/d
        LinearInterpolationFunction MaximumNConc: XProperty=[Phenology].Stage
          XYPairs: X=[3, 5.3]; Y=[0.06, 0.025]
        Constant MinimumNConc: FixedValue=0.006
        PhaseBasedSwitch NitrogenDemandSwitch: Start=Emergence; End=StartGrainFill
        Constant NReallocationFactor: FixedValue=0
        Constant NRetranslocationFactor: FixedValue=0.5
        Constant DMRetranslocationFactor: FixedValue=0.5
        MinimumFunction DMDemandFunctionOLD
          MultiplyFunction PotentialDMAccumulation
            VariableReference NodesAppearing: VariableName=[Structure].DeltaTipNumber
            VariableReference Branches: VariableName=[Structure].TotalStemPopn
            LinearInterpolationFunction PotentialInternodeWt: XProperty=[Structure].RelativeNodeApperance
              XYPairs: X=[0, 0.5, 1]; Y=[0, 0.2, 16]
          MultiplyFunction HightLimitedDMAccumulation
            Constant SpecificStemLengthMax: FixedValue=500
            VariableReference Branches: VariableName=[Structure].TotalStemPopn
            VariableReference DeltaHeight: VariableName=[Structure].HeightModel.DeltaHeight
        PartitionFractionDemandFunction DMDemandFunction
          PhaseLookup PartitionFraction
            PhaseLookupValue PreStemElongation: Start=Emergence; End=FloralInitiation
              Constant StemFraction: FixedValue=0.3
            PhaseLookupValue StemElongation: Start=FloralInitiation; End=FlagLeaf
              Constant StemFraction: FixedValue=0.6
        BiomassRemoval BiomassRemovalDefaults: same as Replacements.Teff.Panicle.BiomassRemovalDefaults
        Constant InitialWtFunction: FixedValue=0; Units=g/m^2
        Constant StructuralFraction: FixedValue=1; Units=g/g
        Constant DetachmentRateFunction: FixedValue=0; Units=/d
        Constant MaintenanceRespirationFunction: FixedValue=0; Units=0-1
        Constant DMConversionEfficiency: FixedValue=1; Units=0-1
        Constant DMReallocationFactor: FixedValue=0
        VariableReference CriticalNConc: VariableName=[Stem].MinimumNConc.Value()
        Live Biomass
        Dead Biomass
      CompositeBiomass AboveGround
        Propertys=[[Leaf].Live, [Leaf].Dead, [Stem].Live, [Stem].Dead, [Grain].Live, [Grain].Dead, [Panicle].Live, [Panicle].Dead]
        Memo
          The AboveGround composite biomass object includes all organs occurring above the soil surface to allow output for total dry matter and Nutrient contents, including total structural, non-structural and metabolic pools.
          <br/>
      CompositeBiomass BelowGround: Propertys=[[Root].Live, [Root].Dead]
        Memo
          The BelowGround composite biomass object includes all root biomass pools to allow output for total dry matter and Nutrient contents, including total structural, non-structural and metabolic pools.
          <br/>
      CompositeBiomass Total
        Propertys=[[Leaf].Live, [Leaf].Dead, [Stem].Live, [Stem].Dead, [Grain].Live, [Grain].Dead, [Panicle].Live, [Panicle].Dead, [Root].Live, [Root].Dead]
        Memo
          The Total composite biomass object includes all organs (above+below ground) to allow output for total dry matter and Nutrient contents, including total structural, non-structural and metabolic pools.
          <br/>
      CompositeBiomass TotalLive
        Propertys=[[Leaf].Live, [Stem].Live, [Grain].Live, [Panicle].Live, [Root].Live]
        Memo
          The TotalLive composite biomass object includes the Live pools of all organs (above+below ground) to allow output for total dry matter and Nutrient contents, including total structural, non-structural and metabolic pools.
          <br/>
      CompositeBiomass TotalDead
        Propertys=[[Leaf].Dead, [Stem].Dead, [Grain].Dead, [Panicle].Dead, [Root].Dead]
        Memo
          The TotalDead composite biomass object includes the Dead pools of all organs (above+below ground) to allow output for total dry matter and Nutrient contents, including total structural, non-structural and metabolic pools.
          <br/>
      CompositeBiomass EarLive: Propertys=[[Grain].Live, [Panicle].Live]
        Memo
          The EarLive composite biomass object includes the Live pools of all organs within the Ear to allow output for total dry matter and Nutrient contents, including total structural, non-structural and metabolic pools.
          <br/>
      CompositeBiomass AboveGroundLive: Propertys=[[Leaf].Live, [Stem].Live, [Grain].Live, [Panicle].Live]
        Memo
          The AboveGroundLive composite biomass object includes the Live pools of all organs occurring above the soil surface to allow output for total dry matter and Nutrient contents, including total structural, non-structural and metabolic pools.
          <br/>
      CompositeBiomass AboveGroundDead: Propertys=[[Leaf].Dead, [Stem].Dead, [Grain].Dead, [Panicle].Dead]
        Memo
          The AboveGroundDead composite biomass object includes the Dead pools of all organs occurring above the soil surface to allow output for total dry matter and Nutrient contents, including total structural, non-structural and metabolic pools.
          <br/>
      Cultivar Katumani
        Command:
          [Phenology].Juvenile.Target.FixedValue = 50
          [Phenology].Photosensitive.Target.XYPairs.X = 0, 12.5, 24
          [Phenology].Photosensitive.Target.XYPairs.Y = 0, 0, 50
          [Phenology].FlagLeafToFlowering.Target.FixedValue = 10
          [Phenology].FloweringToGrainFilling.Target.FixedValue = 100
          [Phenology].GrainFilling.Target.FixedValue = 400
        Memo
          The variety Katumani Composite B was formed in 1966 and released in 1968 as part of the maize breeding work undertaken at the Katumani Research Station in Kenya which started in 1956.  Katumani Composite B was an advanced generation of Katumani Synthetic V X Katumani Synthetic VI.  It has slight photoperiod sensitivity and relatively small potential cob size.<br/>
      Cultivar Gibe
        Command:
          [Phenology].Juvenile.Target.FixedValue = 65
          [Phenology].Photosensitive.Target.XYPairs.X = 9,11, 13.5
          [Phenology].Photosensitive.Target.XYPairs.Y = 0, 0, 180
          [Phenology].FlagLeafToFlowering.Target.FixedValue = 10
          [Phenology].FloweringToGrainFilling.Target.FixedValue = 100
          [Phenology].GrainFilling.Target.FixedValue = 400
        Memo: same as Replacements.Teff.Katumani.memo
      Cultivar Ziquala
        Command:
          [Phenology].Juvenile.Target.FixedValue = 120
          [Phenology].Photosensitive.Target.XYPairs.X = 0, 11, 13.5
          [Phenology].Photosensitive.Target.XYPairs.Y = 0, 0, 150
          [Phenology].FlagLeafToFlowering.Target.FixedValue = 10
          [Phenology].FloweringToGrainFilling.Target.FixedValue = 50
          [Phenology].GrainFilling.Target.FixedValue = 200
        Memo: same as Replacements.Teff.Katumani.memo
      Cultivar Ayana
        Command:
          [Phenology].Juvenile.Target.FixedValue = 40
          [Phenology].Photosensitive.Target.XYPairs.X = 9, 16.5
          [Phenology].Photosensitive.Target.XYPairs.Y = 0, 110
          [Phenology].FlagLeafToFlowering.Target.FixedValue = 10
          [Phenology].FloweringToGrainFilling.Target.FixedValue = 50
          [Phenology].GrainFilling.Target.FixedValue = 200
        Memo: same as Replacements.Teff.Katumani.memo
      Cultivar 04T19
        Command:
          [Phenology].Juvenile.Target.FixedValue = 120
          [Phenology].Photosensitive.Target.XYPairs.X = 9, 16.5
          [Phenology].Photosensitive.Target.XYPairs.Y = 0, 110
          [Phenology].FlagLeafToFlowering.Target.FixedValue = 10
          [Phenology].FloweringToGrainFilling.Target.FixedValue = 100
          [Phenology].GrainFilling.Target.FixedValue = 400
        Memo: same as Replacements.Teff.Katumani.memo
      Cultivar Wajera
        Command:
          [Phenology].Juvenile.Target.FixedValue = 40
          [Phenology].Photosensitive.Target.XYPairs.X = 9, 16.5
          [Phenology].Photosensitive.Target.XYPairs.Y = 0, 130
          [Phenology].FlagLeafToFlowering.Target.FixedValue = 10
          [Phenology].FloweringToGrainFilling.Target.FixedValue = 50
          [Phenology].GrainFilling.Target.FixedValue = 200
          [Grain].NumberFunction.GrainsPerGramStem.FixedValue = 5000
        Memo
          A local variety used in a study by Abebe Getu (2012) which seems to mature quickly and achieve a high harvest index (e.g. 0.4).
      Cultivar DZ974
        Command:
          [Phenology].Juvenile.Target.FixedValue = 40
          [Phenology].Photosensitive.Target.XYPairs.X = 9, 16.5
          [Phenology].Photosensitive.Target.XYPairs.Y = 0, 70
          [Phenology].FlagLeafToFlowering.Target.FixedValue = 10
          [Phenology].FloweringToGrainFilling.Target.FixedValue = 50
          [Phenology].GrainFilling.Target.FixedValue = 200
        Memo
          A local variety used in a study by Abebe Getu (2012) which seems to mature quickly and achieve a high harvest index (e.g. 0.4).
      Cultivar Kuncho: same as Replacements.Teff.Gibe
  DataStore
    ExcelInput Observed: FileName=Observed.xlsx; SheetNames=[ObservedHarvestData]
    ExcelInput ObservedSW: FileName=Observed.xlsx; SheetNames=[Mekelle2008SW]
    ExcelInput ObservedMekelle08Biomass: FileName=Observed.xlsx; SheetNames=[Mekelle2008Crop]
    ExcelInput ObservedVanDelden: FileName=Observed.xlsx; SheetNames=[VanDelden]
    ExcelInput ObservedLysimeter2: FileName=Observed.xlsx; SheetNames=[ObservedLysimeter2]
    ExcelInput ObservedLysimeter4: FileName=Observed.xlsx; SheetNames=[ObservedLysimeter4]
    ExcelInput ObservedCWP2010: FileName=Observed.xlsx; SheetNames=[CWP2010]
    ExcelInput ObservedMekelleET: FileName=Observed.xlsx; SheetNames=[MekelleET]
    ExcelInput ObservedPhenology: FileName=Observed.xlsx; SheetNames=[Phenology]
    ExcelInput ObservedCanopy: FileName=Observed.xlsx; SheetNames=[Canopy]
    PredictedObserved PredictedObservedCanopy: PredictedTableName=Report; ObservedTableName=Canopy; FieldNameUsedForMatch=Clock.Today
  Folder Ethiopia
    Experiment Jamma
      Memo
        ;From

        Soil Characterization and Evaluation of Slow Release Urea Fertilizer Rates on Yield Traits and Grain Yields of Wheat and Teff on Vertisols of Jamma District of South Wollo Zone, Amhara Region b0

        By

        Abebe Getu (BSc), Hawassa University, Ethiopia
      Factors
        Factor Crop: Specifications=[Sowing]
          Operations Teff
            2011-07-25  [Teff].Sow(population:100., cultivar:"Wajera", depth:50, rowSpacing:250);
          Operations Wheat
        Factor NRate: Specifications=[NRate]
          Operations 0NUSG
            2011-08-01  [Fertiliser].Apply(0, Fertiliser.Types.UreaN, 10);
            2011-09-01  [Fertiliser].Apply(0, Fertiliser.Types.UreaN, 10);
          Operations 23NUSG
            2011-08-01  [Fertiliser].Apply(11.5, Fertiliser.Types.UreaN, 10);
            2011-09-01  [Fertiliser].Apply(11.5, Fertiliser.Types.UreaN, 10);
          Operations 46NUSG
            2011-08-01  [Fertiliser].Apply(23, Fertiliser.Types.UreaN, 10);
            2011-09-01  [Fertiliser].Apply(23, Fertiliser.Types.UreaN, 10);
          Operations 69NUSG
            2011-08-01  [Fertiliser].Apply(34.5, Fertiliser.Types.UreaN, 10);
            2011-09-01  [Fertiliser].Apply(34.5, Fertiliser.Types.UreaN, 10);
          Operations 46NUC
            2011-08-01  [Fertiliser].Apply(23, Fertiliser.Types.UreaN, 10);
            2011-09-01  [Fertiliser].Apply(23, Fertiliser.Types.UreaN, 10);
      Simulation Jamma
        Weather: FileName=%root%\Prototypes\Teff\Jamma.met
        Clock: StartDate=2011-07-25; EndDate=2012-01-14
        Summary summaryfile
        SoilArbitrator Soil Arbitrator
        Zone Field: Area=1; Slope=0
          MicroClimate: a_interception=0; b_interception=1; c_interception=0; d_interception=0; soil_albedo=0.23; sun_angle=15; soil_heat_flux_fraction=0.4; night_interception_fraction=0.5; refheight=2; albedo=0.15; emissivity=0.96; RadIntTotal=0
          Irrigation
          Fertiliser
          SurfaceOrganicMatter: PoolName=maize; type=maize; mass=500; standing_fraction=0; cnr=65; CriticalResidueWeight=2000; OptimumDecompTemp=20; MaxCumulativeEOS=20; CNRatioDecompCoeff=0.277; CNRatioDecompThreshold=25; TotalLeachRain=25; MinRainToLeach=10; CriticalMinimumOrganicC=0.004; DefaultCPRatio=0; DefaultStandingFraction=0; StandingExtinctCoeff=0.5; FractionFaecesAdded=0.5
            Pools:
              {PoolName=maize, ResidueType=maize, Mass=500, CNRatio=65, StandingFraction=0}
            ResidueTypes ResidueTypesList: LoadFromResource=ResidueTypes
          Operations Sowing
          Operations NRate
            1985-11-08  [Fertiliser].Apply(50, Fertiliser.Types.NH4NO3N, 10);
            1985-11-29  [Fertiliser].Apply(30, Fertiliser.Types.NH4NO3N, 10);
          Report: EventNames=[Clock].DoReport
            VariableNames:
              [Clock].Today
              [Soil].SoilWater.SW
              [Soil].SoilWater.Eo
              [Soil].SoilWater.Es
              [Soil].SoilWater.Drainage
              [Soil].SoilWater.Runoff
              [Soil].SoilWater.pond
              sum([Soil].SoilWater.SWmm) as ProfileWater
              [Soil].NO3N
              [MicroClimate].net_radn
              [MicroClimate].peta
              [MicroClimate].petr
          Soil: Latitude=0; Longitude=0
            Water
              Thickness  BD    AirDry  LL15  DUL   SAT
              150        1.03  0.1     0.35  0.55  0.6
              150        1.03  0.1     0.35  0.55  0.6
              300        1.03  0.26    0.35  0.55  0.6
              300        1.03  0.32    0.35  0.55  0.6
              SoilCrop TeffSoil: LL=[0.35, 0.35, 0.35, 0.35]; KL=[0.1, 0.1, 0.06, 0.06]; XF=[1, 1, 1, 0]
            SoilWater: SummerDate=1-Nov; SummerU=6; SummerCona=3.5; WinterDate=1-Apr; WinterU=6; WinterCona=3.5; DiffusConst=40; DiffusSlope=16; Salb=0.13; CN2Bare=75; CNRed=20; CNCov=0.8; max_pond=0; Thickness=[100, 100, 100, 200, 200, 200, 200, 200, 200]; SWCON=[0.5, 0.5, 0.5, 0.5, 0.5, 0.5, 0.5, 0.5, 0.5]; residueinterception=0
            SoilNitrogen: fom_type=[default, manure, mucuna, lablab, shemp, stable]; fract_carb=[0.2, 0.3, 0.54, 0.57, 0.45, 0]; fract_cell=[0.7, 0.3, 0.37, 0.37, 0.47, 0.1]; fract_lign=[0.1, 0.4, 0.09, 0.06, 0.08, 0.9]
            SoilOrganicMatter: RootCN=45; RootWt=1000; SoilCN=14.5; EnrACoeff=7.4; EnrBCoeff=0.2; OCUnits=Total
              Thickness  OC   FBiom  FInert
              150        1.4  0.02   0.42
              150        0.9  0.01   0.5
              300        0.8  0.01   0.3
              300        0.6  0.01   0.9
            Analysis: Thickness=[150, 150, 300, 300]; PH=[6.7, 6.7, 6.7, 6.7]; PHUnits=Water; BoronUnits=HotWater
            Sample InitialN: NO3Units=ppm; NH4Units=ppm; SWUnits=Volumetric; OCUnits=Total; PHUnits=Water
              Thickness  NO3   NH4
              150        14.4  0.6
              150        10    0.1
              300        2.45  0.1
              300        1.08  0.1
            Sample InitialSW: Thickness=[150, 150, 300, 300]; SW=[0.55, 0.55, 0.55, 0.55]; NO3Units=ppm; NH4Units=ppm; SWUnits=Volumetric; OCUnits=Total; PHUnits=Water
            CERESSoilTemperature
          Report HarvestReport: EventNames=[Teff].Harvesting
            VariableNames:
              [Clock].Today
              [Teff].Phenology.CurrentStageName as Stage
              [Teff].AboveGround.Wt as Biomass
              [Teff].AboveGround.N as BiomassN
              [Teff].Grain.Yield
              [Teff].Grain.Size as GrainSize
              [Teff].Grain.Live.Wt as GrainWt
              [Teff].Grain.Live.N as GrainN
              [Teff].Leaf.Live.N as LeafN
              [Teff].Structure.MainStemFinalNodeNo
              [Teff].Phenology.FloweringDAS.Value() as FloweringDAS
              [Teff].Phenology.MaturityDAS.Value()  as MaturityDAS
          Manager TeffHarvesting
```csharp
using System;
using Models.Core;
using System.Collections.Generic;
using System.Text;
using Models.Soils;
using Models.PMF;
using Models;
using System.Xml.Serialization;
using APSIM.Shared.Utilities;

namespace Models
{
	[Serializable] 
	public class Script : Model
	{
		[Link] Plant Teff;
		[Link] Zone zone;
					
        
		[EventSubscribe("Commencing")]
		private void OnSimulationCommencing(object sender, EventArgs e)
		{
		}
		
		[EventSubscribe("DoManagement")]
		private void OnDoManagement(object sender, EventArgs e)
		{
			if (Teff.Phenology.CurrentPhaseName == "ReadyForHarvesting")
			{
				Teff.Harvest();
				Teff.EndCrop();
			}
		}
		
		[EventSubscribe("DoManagementCalculations")]
		private void OnDoManagementCalculations(object sender, EventArgs e)
		{
			
		}
	}
}
```
          Plant Teff: CropType=Chickpea
          SoluteManager
    Experiment Ofla
      Memo
        SOIL FERTILITY CHARACTERIZATION AND RESPONSE OF WHEAT (iTriticum aestivum) i0AND TEFF (iEragrostis tefi0) TO DIFFERENT RATES OF SLOW RELEASE AND CONVENTIONAL UREA FERTILIZERS IN VERTISOLS OF OFLA DISTRICT, SOUTHERN TIGRAY, ETHIOPIA b0bMSc THESIS b0bOKUBAY GIDAY
      Factors
        Factor Crop: Specifications=[Sowing]
          Operations Teff
            2011-08-01  [Teff].Sow(population:100., cultivar:"Kuncho", depth:50, rowSpacing:250);
          Operations Wheat
        Factor NRate: Specifications=[NRate]
          Operations 0NUSG
            2011-08-01  [Fertiliser].Apply(0, Fertiliser.Types.UreaN, 10);
          Operations 23NUSG
            2011-08-01  [Fertiliser].Apply(23, Fertiliser.Types.UreaN, 10);
          Operations 46NUSG
            2011-08-01  [Fertiliser].Apply(46, Fertiliser.Types.UreaN, 10);
          Operations 69NUSG
            2011-08-01  [Fertiliser].Apply(69, Fertiliser.Types.UreaN, 10);
          Operations 46NUC
            2011-08-01  [Fertiliser].Apply(46, Fertiliser.Types.UreaN, 10);
      Simulation Ofla
        Weather: FileName=%root%\Prototypes\Teff\Korem.met
        Clock: StartDate=2011-08-01; EndDate=2011-12-31
        Summary summaryfile
        SoilArbitrator Soil Arbitrator
        Zone Field: Area=1; Slope=0
          MicroClimate: a_interception=0; b_interception=1; c_interception=0; d_interception=0; soil_albedo=0.23; sun_angle=15; soil_heat_flux_fraction=0.4; night_interception_fraction=0.5; refheight=2; albedo=0.15; emissivity=0.96; RadIntTotal=0
          Irrigation
          Fertiliser
          SurfaceOrganicMatter: same as Ethiopia.Jamma.Jamma.Field.SurfaceOrganicMatter
          Operations Sowing
          Operations NRate
            1985-11-08  [Fertiliser].Apply(50, Fertiliser.Types.NH4NO3N, 10);
            1985-11-29  [Fertiliser].Apply(30, Fertiliser.Types.NH4NO3N, 10);
          Report: EventNames=[Clock].DoReport
            VariableNames:
              [Clock].Today
              [Soil].SoilWater.SW
              [Soil].SoilWater.Eo
              [Soil].SoilWater.Es
              [Soil].SoilWater.Drainage
              [Soil].SoilWater.Runoff
              [Soil].SoilWater.pond
              sum([Soil].SoilWater.SWmm) as ProfileWater
              [Soil].NO3N
              [MicroClimate].net_radn
              [MicroClimate].peta
              [MicroClimate].petr
          Soil: Latitude=0; Longitude=0
            Water
              Thickness  BD    AirDry  LL15   DUL    SAT
              150        1.32  0.1     0.31   0.413  0.453
              150        1.32  0.1     0.31   0.413  0.453
              150        1.38  0.26    0.313  0.454  0.479
              300        1.33  0.32    0.376  0.495  0.498
              300        1.33  0.3     0.356  0.495  0.498
              300        1.42  0.27    0.3    0.418  0.464
              300        1.33  0.24    0.303  0.4    0.457
              300        1.35  0.31    0.31   0.37   0.435
              400        1.4   0.16    0.16   0.29   0.38
              SoilCrop WheatSoil: LL=[0.25, 0.25, 0.26, 0.32, 0.3, 0.27, 0.303, 0.31, 0.16]; KL=[0.06, 0.06, 0.06, 0.06, 0.05, 0.04, 0.02, 0.02, 0.01]; XF=[1, 1, 1, 1, 1, 1, 1, 1, 1]
              SoilCrop TeffSoil: LL=[0.25, 0.25, 0.26, 0.32, 0.3, 0.27, 0.303, 0.31, 0.16]; KL=[0.06, 0.06, 0.06, 0.06, 0.05, 0.04, 0.02, 0.02, 0.01]; XF=[1, 1, 1, 1, 1, 1, 1, 1, 1]
            SoilWater: SummerDate=1-Nov; SummerU=9; SummerCona=3; WinterDate=1-Apr; WinterU=9; WinterCona=3; DiffusConst=88; DiffusSlope=35.4; Salb=0.13; CN2Bare=50; CNRed=20; CNCov=0.8; max_pond=0; Thickness=[100, 100, 100, 200, 200, 200, 200, 200, 200]; SWCON=[0.5, 0.5, 0.5, 0.5, 0.5, 0.5, 0.5, 0.5, 0.5]; residueinterception=0
            SoilNitrogen: fom_type=[default, manure, mucuna, lablab, shemp, stable]; fract_carb=[0.2, 0.3, 0.54, 0.57, 0.45, 0]; fract_cell=[0.7, 0.3, 0.37, 0.37, 0.47, 0.1]; fract_lign=[0.1, 0.4, 0.09, 0.06, 0.08, 0.9]
            SoilOrganicMatter: RootCN=45; RootWt=1000; SoilCN=14.5; EnrACoeff=7.4; EnrBCoeff=0.2; OCUnits=Total
              Thickness  OC    FBiom  FInert
              100        1.2   0.02   0.42
              100        1     0.01   0.5
              100        0.86  0.01   0.58
              200        0.83  0.01   0.55
              200        0.58  0.01   0.86
              200        0.54  0.01   0.9
              200        0.47  0.01   0.95
              200        0.5   0.01   0.95
              200        0.5   0.01   0.95
            Analysis: Thickness=[100, 100, 100, 200, 200, 200, 200, 200, 200]; PH=[6, 6, 6, 6.2, 6.5, 6.7, 6.8, 6.8, 6.8]; PHUnits=Water; BoronUnits=HotWater
            Sample InitialN: NO3Units=ppm; NH4Units=ppm; SWUnits=Volumetric; OCUnits=Total; PHUnits=Water
              Thickness  NO3   NH4
              150        14.4  0.6
              150        6.58  0.1
              300        2.45  0.1
              300        1.08  0.1
              300        0.15  0.1
              300        0.83  0.1
              300        2.3   0.1
            Sample InitialSW: Thickness=[150, 150, 300, 300, 300, 300, 300]; SW=[0.413, 0.456, 0.408, 0.374, 0.327, 0.325, 0.371]; NO3Units=ppm; NH4Units=ppm; SWUnits=Volumetric; OCUnits=Total; PHUnits=Water
            CERESSoilTemperature
          Report HarvestReport: EventNames=[Teff].Harvesting
            VariableNames:
              [Clock].Today
              [Teff].Phenology.CurrentStageName as Stage
              [Teff].AboveGround.Wt as Biomass
              [Teff].Grain.Yield
              [Teff].Grain.Size as GrainSize
              [Teff].Grain.Live.Wt as GrainWt
              [Teff].Structure.MainStemFinalNodeNo
              [Teff].Phenology.FloweringDAS.Value() as FloweringDAS
              [Teff].Phenology.MaturityDAS.Value()  as MaturityDAS
          Manager TeffHarvesting
            script: same as in Ethiopia.Jamma.Jamma.Field.TeffHarvesting
          Plant Teff: CropType=Chickpea
          SoluteManager
    Experiment CWP2010
      Memo
        From Crop Water Productivity of Irrigated Teff in a WaterStressed RegionYenesew Mengiste Yihun & Abraham Mehari Haile &Bart Schultz & Teklu ErkossaWater Resour Manage (2013) 27:31153125
      Factors
        Factor Pop: Specifications=[Sowing]
          Operations Low
            2010-12-01  [Teff].Sow(population:100., cultivar:"Kuncho", depth:50, rowSpacing:250);
          Operations High
            2010-12-01  [Teff].Sow(population:200., cultivar:"Kuncho", depth:50, rowSpacing:250);
        Factor Treatment: Specifications=[IrrigationRate]
          Operations 1
            2010-12-21  [Irrigation].Apply(amount:4.4, depth:0,efficiency:1, willRunoff:false);
            2010-12-24  [Irrigation].Apply(amount:4.4, depth:0,efficiency:1, willRunoff:false);
            2010-12-27  [Irrigation].Apply(amount:4.4, depth:0,efficiency:1, willRunoff:false);
            2010-12-31  [Irrigation].Apply(amount:19.1, depth:0,efficiency:1, willRunoff:false);
            2011-01-03  [Irrigation].Apply(amount:19.1, depth:0,efficiency:1, willRunoff:false);
            2011-01-06  [Irrigation].Apply(amount:19.1, depth:0,efficiency:1, willRunoff:false);
            2011-01-10  [Irrigation].Apply(amount:26.2, depth:0,efficiency:1, willRunoff:false);
            2011-01-13  [Irrigation].Apply(amount:26.2, depth:0,efficiency:1, willRunoff:false);
            2011-01-16  [Irrigation].Apply(amount:26.2, depth:0,efficiency:1, willRunoff:false);
            2011-01-19  [Irrigation].Apply(amount:26.2, depth:0,efficiency:1, willRunoff:false);
            2011-01-22  [Irrigation].Apply(amount:26.2, depth:0,efficiency:1, willRunoff:false);
            2011-01-25  [Irrigation].Apply(amount:26.2, depth:0,efficiency:1, willRunoff:false);
            2011-01-29  [Irrigation].Apply(amount:17.8, depth:0,efficiency:1, willRunoff:false);
            2011-02-02  [Irrigation].Apply(amount:17.8, depth:0,efficiency:1, willRunoff:false);
            2011-02-05  [Irrigation].Apply(amount:17.8, depth:0,efficiency:1, willRunoff:false);
          Operations 2
            2010-12-21  [Irrigation].Apply(amount:3.3, depth:0,efficiency:1, willRunoff:false);
            2010-12-24  [Irrigation].Apply(amount:3.3, depth:0,efficiency:1, willRunoff:false);
            2010-12-27  [Irrigation].Apply(amount:3.3, depth:0,efficiency:1, willRunoff:false);
            2010-12-31  [Irrigation].Apply(amount:14.3, depth:0,efficiency:1, willRunoff:false);
            2011-01-03  [Irrigation].Apply(amount:14.3, depth:0,efficiency:1, willRunoff:false);
            2011-01-06  [Irrigation].Apply(amount:14.3, depth:0,efficiency:1, willRunoff:false);
            2011-01-10  [Irrigation].Apply(amount:19.7, depth:0,efficiency:1, willRunoff:false);
            2011-01-13  [Irrigation].Apply(amount:19.7, depth:0,efficiency:1, willRunoff:false);
            2011-01-16  [Irrigation].Apply(amount:19.7, depth:0,efficiency:1, willRunoff:false);
            2011-01-19  [Irrigation].Apply(amount:19.7, depth:0,efficiency:1, willRunoff:false);
            2011-01-22  [Irrigation].Apply(amount:19.7, depth:0,efficiency:1, willRunoff:false);
            2011-01-25  [Irrigation].Apply(amount:19.7, depth:0,efficiency:1, willRunoff:false);
            2011-01-29  [Irrigation].Apply(amount:13.4, depth:0,efficiency:1, willRunoff:false);
            2011-02-02  [Irrigation].Apply(amount:13.4, depth:0,efficiency:1, willRunoff:false);
            2011-02-05  [Irrigation].Apply(amount:13.4, depth:0,efficiency:1, willRunoff:false);
          Operations 3
            2010-12-21  [Irrigation].Apply(amount:2.2, depth:0,efficiency:1, willRunoff:false);
            2010-12-24  [Irrigation].Apply(amount:2.2, depth:0,efficiency:1, willRunoff:false);
            2010-12-27  [Irrigation].Apply(amount:2.2, depth:0,efficiency:1, willRunoff:false);
            2010-12-31  [Irrigation].Apply(amount:9.6, depth:0,efficiency:1, willRunoff:false);
            2011-01-03  [Irrigation].Apply(amount:9.6, depth:0,efficiency:1, willRunoff:false);
            2011-01-06  [Irrigation].Apply(amount:9.6, depth:0,efficiency:1, willRunoff:false);
            2011-01-10  [Irrigation].Apply(amount:13.1, depth:0,efficiency:1, willRunoff:false);
            2011-01-13  [Irrigation].Apply(amount:13.1, depth:0,efficiency:1, willRunoff:false);
            2011-01-16  [Irrigation].Apply(amount:13.1, depth:0,efficiency:1, willRunoff:false);
            2011-01-19  [Irrigation].Apply(amount:13.1, depth:0,efficiency:1, willRunoff:false);
            2011-01-22  [Irrigation].Apply(amount:13.1, depth:0,efficiency:1, willRunoff:false);
            2011-01-25  [Irrigation].Apply(amount:13.1, depth:0,efficiency:1, willRunoff:false);
            2011-01-29  [Irrigation].Apply(amount:8.9, depth:0,efficiency:1, willRunoff:false);
            2011-02-02  [Irrigation].Apply(amount:8.9, depth:0,efficiency:1, willRunoff:false);
            2011-02-05  [Irrigation].Apply(amount:8.9, depth:0,efficiency:1, willRunoff:false);
          Operations 4
            2010-12-21  [Irrigation].Apply(amount:1.1, depth:0,efficiency:1, willRunoff:false);
            2010-12-24  [Irrigation].Apply(amount:1.1, depth:0,efficiency:1, willRunoff:false);
            2010-12-27  [Irrigation].Apply(amount:1.1, depth:0,efficiency:1, willRunoff:false);
            2010-12-31  [Irrigation].Apply(amount:4.8, depth:0,efficiency:1, willRunoff:false);
            2011-01-03  [Irrigation].Apply(amount:4.8, depth:0,efficiency:1, willRunoff:false);
            2011-01-06  [Irrigation].Apply(amount:4.8, depth:0,efficiency:1, willRunoff:false);
            2011-01-10  [Irrigation].Apply(amount:6.6, depth:0,efficiency:1, willRunoff:false);
            2011-01-13  [Irrigation].Apply(amount:6.6, depth:0,efficiency:1, willRunoff:false);
            2011-01-16  [Irrigation].Apply(amount:6.6, depth:0,efficiency:1, willRunoff:false);
            2011-01-19  [Irrigation].Apply(amount:6.6, depth:0,efficiency:1, willRunoff:false);
            2011-01-22  [Irrigation].Apply(amount:6.6, depth:0,efficiency:1, willRunoff:false);
            2011-01-25  [Irrigation].Apply(amount:6.6, depth:0,efficiency:1, willRunoff:false);
            2011-01-29  [Irrigation].Apply(amount:4.4, depth:0,efficiency:1, willRunoff:false);
            2011-02-02  [Irrigation].Apply(amount:4.4, depth:0,efficiency:1, willRunoff:false);
            2011-02-05  [Irrigation].Apply(amount:4.4, depth:0,efficiency:1, willRunoff:false);
          Operations 5
            2010-12-21  [Irrigation].Apply(amount:1.1, depth:0,efficiency:1, willRunoff:false);
            2010-12-24  [Irrigation].Apply(amount:1.1, depth:0,efficiency:1, willRunoff:false);
            2010-12-27  [Irrigation].Apply(amount:1.1, depth:0,efficiency:1, willRunoff:false);
            2010-12-31  [Irrigation].Apply(amount:19.1, depth:0,efficiency:1, willRunoff:false);
            2011-01-03  [Irrigation].Apply(amount:19.1, depth:0,efficiency:1, willRunoff:false);
            2011-01-06  [Irrigation].Apply(amount:19.1, depth:0,efficiency:1, willRunoff:false);
            2011-01-10  [Irrigation].Apply(amount:26.2, depth:0,efficiency:1, willRunoff:false);
            2011-01-13  [Irrigation].Apply(amount:26.2, depth:0,efficiency:1, willRunoff:false);
            2011-01-16  [Irrigation].Apply(amount:26.2, depth:0,efficiency:1, willRunoff:false);
            2011-01-19  [Irrigation].Apply(amount:26.2, depth:0,efficiency:1, willRunoff:false);
            2011-01-22  [Irrigation].Apply(amount:26.2, depth:0,efficiency:1, willRunoff:false);
            2011-01-25  [Irrigation].Apply(amount:26.2, depth:0,efficiency:1, willRunoff:false);
            2011-01-29  [Irrigation].Apply(amount:17.8, depth:0,efficiency:1, willRunoff:false);
            2011-02-02  [Irrigation].Apply(amount:17.8, depth:0,efficiency:1, willRunoff:false);
            2011-02-05  [Irrigation].Apply(amount:17.8, depth:0,efficiency:1, willRunoff:false);
          Operations 6
            2010-12-21  [Irrigation].Apply(amount:4.4, depth:0,efficiency:1, willRunoff:false);
            2010-12-24  [Irrigation].Apply(amount:4.4, depth:0,efficiency:1, willRunoff:false);
            2010-12-27  [Irrigation].Apply(amount:4.4, depth:0,efficiency:1, willRunoff:false);
            2010-12-31  [Irrigation].Apply(amount:4.8, depth:0,efficiency:1, willRunoff:false);
            2011-01-03  [Irrigation].Apply(amount:4.8, depth:0,efficiency:1, willRunoff:false);
            2011-01-06  [Irrigation].Apply(amount:4.8, depth:0,efficiency:1, willRunoff:false);
            2011-01-10  [Irrigation].Apply(amount:26.2, depth:0,efficiency:1, willRunoff:false);
            2011-01-13  [Irrigation].Apply(amount:26.2, depth:0,efficiency:1, willRunoff:false);
            2011-01-16  [Irrigation].Apply(amount:26.2, depth:0,efficiency:1, willRunoff:false);
            2011-01-19  [Irrigation].Apply(amount:26.2, depth:0,efficiency:1, willRunoff:false);
            2011-01-22  [Irrigation].Apply(amount:26.2, depth:0,efficiency:1, willRunoff:false);
            2011-01-25  [Irrigation].Apply(amount:26.2, depth:0,efficiency:1, willRunoff:false);
            2011-01-29  [Irrigation].Apply(amount:17.8, depth:0,efficiency:1, willRunoff:false);
            2011-02-02  [Irrigation].Apply(amount:17.8, depth:0,efficiency:1, willRunoff:false);
            2011-02-05  [Irrigation].Apply(amount:17.8, depth:0,efficiency:1, willRunoff:false);
          Operations 7
            2010-12-21  [Irrigation].Apply(amount:4.4, depth:0,efficiency:1, willRunoff:false);
            2010-12-24  [Irrigation].Apply(amount:4.4, depth:0,efficiency:1, willRunoff:false);
            2010-12-27  [Irrigation].Apply(amount:4.4, depth:0,efficiency:1, willRunoff:false);
            2010-12-31  [Irrigation].Apply(amount:19.1, depth:0,efficiency:1, willRunoff:false);
            2011-01-03  [Irrigation].Apply(amount:19.1, depth:0,efficiency:1, willRunoff:false);
            2011-01-06  [Irrigation].Apply(amount:19.1, depth:0,efficiency:1, willRunoff:false);
            2011-01-10  [Irrigation].Apply(amount:6.6, depth:0,efficiency:1, willRunoff:false);
            2011-01-13  [Irrigation].Apply(amount:6.6, depth:0,efficiency:1, willRunoff:false);
            2011-01-16  [Irrigation].Apply(amount:6.6, depth:0,efficiency:1, willRunoff:false);
            2011-01-19  [Irrigation].Apply(amount:6.6, depth:0,efficiency:1, willRunoff:false);
            2011-01-22  [Irrigation].Apply(amount:6.6, depth:0,efficiency:1, willRunoff:false);
            2011-01-25  [Irrigation].Apply(amount:6.6, depth:0,efficiency:1, willRunoff:false);
            2011-01-29  [Irrigation].Apply(amount:17.8, depth:0,efficiency:1, willRunoff:false);
            2011-02-02  [Irrigation].Apply(amount:17.8, depth:0,efficiency:1, willRunoff:false);
            2011-02-05  [Irrigation].Apply(amount:17.8, depth:0,efficiency:1, willRunoff:false);
          Operations 8
            2010-12-21  [Irrigation].Apply(amount:4.4, depth:0,efficiency:1, willRunoff:false);
            2010-12-24  [Irrigation].Apply(amount:4.4, depth:0,efficiency:1, willRunoff:false);
            2010-12-27  [Irrigation].Apply(amount:4.4, depth:0,efficiency:1, willRunoff:false);
            2010-12-31  [Irrigation].Apply(amount:19.1, depth:0,efficiency:1, willRunoff:false);
            2011-01-03  [Irrigation].Apply(amount:19.1, depth:0,efficiency:1, willRunoff:false);
            2011-01-06  [Irrigation].Apply(amount:19.1, depth:0,efficiency:1, willRunoff:false);
            2011-01-10  [Irrigation].Apply(amount:26.2, depth:0,efficiency:1, willRunoff:false);
            2011-01-13  [Irrigation].Apply(amount:26.2, depth:0,efficiency:1, willRunoff:false);
            2011-01-16  [Irrigation].Apply(amount:26.2, depth:0,efficiency:1, willRunoff:false);
            2011-01-19  [Irrigation].Apply(amount:26.2, depth:0,efficiency:1, willRunoff:false);
            2011-01-22  [Irrigation].Apply(amount:26.2, depth:0,efficiency:1, willRunoff:false);
            2011-01-25  [Irrigation].Apply(amount:26.2, depth:0,efficiency:1, willRunoff:false);
            2011-01-29  [Irrigation].Apply(amount:4.4, depth:0,efficiency:1, willRunoff:false);
            2011-02-02  [Irrigation].Apply(amount:4.4, depth:0,efficiency:1, willRunoff:false);
            2011-02-05  [Irrigation].Apply(amount:4.4, depth:0,efficiency:1, willRunoff:false);
          Operations 9
            2010-12-21  [Irrigation].Apply(amount:2.2, depth:0,efficiency:1, willRunoff:false);
            2010-12-24  [Irrigation].Apply(amount:2.2, depth:0,efficiency:1, willRunoff:false);
            2010-12-27  [Irrigation].Apply(amount:2.2, depth:0,efficiency:1, willRunoff:false);
            2010-12-31  [Irrigation].Apply(amount:19.1, depth:0,efficiency:1, willRunoff:false);
            2011-01-03  [Irrigation].Apply(amount:19.1, depth:0,efficiency:1, willRunoff:false);
            2011-01-06  [Irrigation].Apply(amount:19.1, depth:0,efficiency:1, willRunoff:false);
            2011-01-10  [Irrigation].Apply(amount:26.2, depth:0,efficiency:1, willRunoff:false);
            2011-01-13  [Irrigation].Apply(amount:26.2, depth:0,efficiency:1, willRunoff:false);
            2011-01-16  [Irrigation].Apply(amount:26.2, depth:0,efficiency:1, willRunoff:false);
            2011-01-19  [Irrigation].Apply(amount:26.2, depth:0,efficiency:1, willRunoff:false);
            2011-01-22  [Irrigation].Apply(amount:26.2, depth:0,efficiency:1, willRunoff:false);
            2011-01-25  [Irrigation].Apply(amount:26.2, depth:0,efficiency:1, willRunoff:false);
            2011-01-29  [Irrigation].Apply(amount:17.8, depth:0,efficiency:1, willRunoff:false);
            2011-02-02  [Irrigation].Apply(amount:17.8, depth:0,efficiency:1, willRunoff:false);
            2011-02-05  [Irrigation].Apply(amount:17.8, depth:0,efficiency:1, willRunoff:false);
          Operations 10
            2010-12-21  [Irrigation].Apply(amount:4.4, depth:0,efficiency:1, willRunoff:false);
            2010-12-24  [Irrigation].Apply(amount:4.4, depth:0,efficiency:1, willRunoff:false);
            2010-12-27  [Irrigation].Apply(amount:4.4, depth:0,efficiency:1, willRunoff:false);
            2010-12-31  [Irrigation].Apply(amount:9.6, depth:0,efficiency:1, willRunoff:false);
            2011-01-03  [Irrigation].Apply(amount:9.6, depth:0,efficiency:1, willRunoff:false);
            2011-01-06  [Irrigation].Apply(amount:9.6, depth:0,efficiency:1, willRunoff:false);
            2011-01-10  [Irrigation].Apply(amount:26.2, depth:0,efficiency:1, willRunoff:false);
            2011-01-13  [Irrigation].Apply(amount:26.2, depth:0,efficiency:1, willRunoff:false);
            2011-01-16  [Irrigation].Apply(amount:26.2, depth:0,efficiency:1, willRunoff:false);
            2011-01-19  [Irrigation].Apply(amount:26.2, depth:0,efficiency:1, willRunoff:false);
            2011-01-22  [Irrigation].Apply(amount:26.2, depth:0,efficiency:1, willRunoff:false);
            2011-01-25  [Irrigation].Apply(amount:26.2, depth:0,efficiency:1, willRunoff:false);
            2011-01-29  [Irrigation].Apply(amount:17.8, depth:0,efficiency:1, willRunoff:false);
            2011-02-02  [Irrigation].Apply(amount:17.8, depth:0,efficiency:1, willRunoff:false);
            2011-02-05  [Irrigation].Apply(amount:17.8, depth:0,efficiency:1, willRunoff:false);
          Operations 11
            2010-12-21  [Irrigation].Apply(amount:4.4, depth:0,efficiency:1, willRunoff:false);
            2010-12-24  [Irrigation].Apply(amount:4.4, depth:0,efficiency:1, willRunoff:false);
            2010-12-27  [Irrigation].Apply(amount:4.4, depth:0,efficiency:1, willRunoff:false);
            2010-12-31  [Irrigation].Apply(amount:19.1, depth:0,efficiency:1, willRunoff:false);
            2011-01-03  [Irrigation].Apply(amount:19.1, depth:0,efficiency:1, willRunoff:false);
            2011-01-06  [Irrigation].Apply(amount:19.1, depth:0,efficiency:1, willRunoff:false);
            2011-01-10  [Irrigation].Apply(amount:13.1, depth:0,efficiency:1, willRunoff:false);
            2011-01-13  [Irrigation].Apply(amount:13.1, depth:0,efficiency:1, willRunoff:false);
            2011-01-16  [Irrigation].Apply(amount:13.1, depth:0,efficiency:1, willRunoff:false);
            2011-01-19  [Irrigation].Apply(amount:13.1, depth:0,efficiency:1, willRunoff:false);
            2011-01-22  [Irrigation].Apply(amount:13.1, depth:0,efficiency:1, willRunoff:false);
            2011-01-25  [Irrigation].Apply(amount:13.1, depth:0,efficiency:1, willRunoff:false);
            2011-01-29  [Irrigation].Apply(amount:17.8, depth:0,efficiency:1, willRunoff:false);
            2011-02-02  [Irrigation].Apply(amount:17.8, depth:0,efficiency:1, willRunoff:false);
            2011-02-05  [Irrigation].Apply(amount:17.8, depth:0,efficiency:1, willRunoff:false);
          Operations 12
            2010-12-21  [Irrigation].Apply(amount:4.4, depth:0,efficiency:1, willRunoff:false);
            2010-12-24  [Irrigation].Apply(amount:4.4, depth:0,efficiency:1, willRunoff:false);
            2010-12-27  [Irrigation].Apply(amount:4.4, depth:0,efficiency:1, willRunoff:false);
            2010-12-31  [Irrigation].Apply(amount:19.1, depth:0,efficiency:1, willRunoff:false);
            2011-01-03  [Irrigation].Apply(amount:19.1, depth:0,efficiency:1, willRunoff:false);
            2011-01-06  [Irrigation].Apply(amount:19.1, depth:0,efficiency:1, willRunoff:false);
            2011-01-10  [Irrigation].Apply(amount:26.2, depth:0,efficiency:1, willRunoff:false);
            2011-01-13  [Irrigation].Apply(amount:26.2, depth:0,efficiency:1, willRunoff:false);
            2011-01-16  [Irrigation].Apply(amount:26.2, depth:0,efficiency:1, willRunoff:false);
            2011-01-19  [Irrigation].Apply(amount:26.2, depth:0,efficiency:1, willRunoff:false);
            2011-01-22  [Irrigation].Apply(amount:26.2, depth:0,efficiency:1, willRunoff:false);
            2011-01-25  [Irrigation].Apply(amount:26.2, depth:0,efficiency:1, willRunoff:false);
            2011-01-29  [Irrigation].Apply(amount:8.9, depth:0,efficiency:1, willRunoff:false);
            2011-02-02  [Irrigation].Apply(amount:8.9, depth:0,efficiency:1, willRunoff:false);
            2011-02-05  [Irrigation].Apply(amount:8.9, depth:0,efficiency:1, willRunoff:false);
          Operations 13
            2010-12-21  [Irrigation].Apply(amount:3.3, depth:0,efficiency:1, willRunoff:false);
            2010-12-24  [Irrigation].Apply(amount:3.3, depth:0,efficiency:1, willRunoff:false);
            2010-12-27  [Irrigation].Apply(amount:3.3, depth:0,efficiency:1, willRunoff:false);
            2010-12-31  [Irrigation].Apply(amount:19.1, depth:0,efficiency:1, willRunoff:false);
            2011-01-03  [Irrigation].Apply(amount:19.1, depth:0,efficiency:1, willRunoff:false);
            2011-01-06  [Irrigation].Apply(amount:19.1, depth:0,efficiency:1, willRunoff:false);
            2011-01-10  [Irrigation].Apply(amount:26.2, depth:0,efficiency:1, willRunoff:false);
            2011-01-13  [Irrigation].Apply(amount:26.2, depth:0,efficiency:1, willRunoff:false);
            2011-01-16  [Irrigation].Apply(amount:26.2, depth:0,efficiency:1, willRunoff:false);
            2011-01-19  [Irrigation].Apply(amount:26.2, depth:0,efficiency:1, willRunoff:false);
            2011-01-22  [Irrigation].Apply(amount:26.2, depth:0,efficiency:1, willRunoff:false);
            2011-01-25  [Irrigation].Apply(amount:26.2, depth:0,efficiency:1, willRunoff:false);
            2011-01-29  [Irrigation].Apply(amount:17.8, depth:0,efficiency:1, willRunoff:false);
            2011-02-02  [Irrigation].Apply(amount:17.8, depth:0,efficiency:1, willRunoff:false);
            2011-02-05  [Irrigation].Apply(amount:17.8, depth:0,efficiency:1, willRunoff:false);
          Operations 14
            2010-12-21  [Irrigation].Apply(amount:4.4, depth:0,efficiency:1, willRunoff:false);
            2010-12-24  [Irrigation].Apply(amount:4.4, depth:0,efficiency:1, willRunoff:false);
            2010-12-27  [Irrigation].Apply(amount:4.4, depth:0,efficiency:1, willRunoff:false);
            2010-12-31  [Irrigation].Apply(amount:14.3, depth:0,efficiency:1, willRunoff:false);
            2011-01-03  [Irrigation].Apply(amount:14.3, depth:0,efficiency:1, willRunoff:false);
            2011-01-06  [Irrigation].Apply(amount:14.3, depth:0,efficiency:1, willRunoff:false);
            2011-01-10  [Irrigation].Apply(amount:26.2, depth:0,efficiency:1, willRunoff:false);
            2011-01-13  [Irrigation].Apply(amount:26.2, depth:0,efficiency:1, willRunoff:false);
            2011-01-16  [Irrigation].Apply(amount:26.2, depth:0,efficiency:1, willRunoff:false);
            2011-01-19  [Irrigation].Apply(amount:26.2, depth:0,efficiency:1, willRunoff:false);
            2011-01-22  [Irrigation].Apply(amount:26.2, depth:0,efficiency:1, willRunoff:false);
            2011-01-25  [Irrigation].Apply(amount:26.2, depth:0,efficiency:1, willRunoff:false);
            2011-01-29  [Irrigation].Apply(amount:17.8, depth:0,efficiency:1, willRunoff:false);
            2011-02-02  [Irrigation].Apply(amount:17.8, depth:0,efficiency:1, willRunoff:false);
            2011-02-05  [Irrigation].Apply(amount:17.8, depth:0,efficiency:1, willRunoff:false);
          Operations 15
            2010-12-21  [Irrigation].Apply(amount:4.4, depth:0,efficiency:1, willRunoff:false);
            2010-12-24  [Irrigation].Apply(amount:4.4, depth:0,efficiency:1, willRunoff:false);
            2010-12-27  [Irrigation].Apply(amount:4.4, depth:0,efficiency:1, willRunoff:false);
            2010-12-31  [Irrigation].Apply(amount:19.1, depth:0,efficiency:1, willRunoff:false);
            2011-01-03  [Irrigation].Apply(amount:19.1, depth:0,efficiency:1, willRunoff:false);
            2011-01-06  [Irrigation].Apply(amount:19.1, depth:0,efficiency:1, willRunoff:false);
            2011-01-10  [Irrigation].Apply(amount:19.7, depth:0,efficiency:1, willRunoff:false);
            2011-01-13  [Irrigation].Apply(amount:19.7, depth:0,efficiency:1, willRunoff:false);
            2011-01-16  [Irrigation].Apply(amount:19.7, depth:0,efficiency:1, willRunoff:false);
            2011-01-19  [Irrigation].Apply(amount:19.7, depth:0,efficiency:1, willRunoff:false);
            2011-01-22  [Irrigation].Apply(amount:19.7, depth:0,efficiency:1, willRunoff:false);
            2011-01-25  [Irrigation].Apply(amount:19.7, depth:0,efficiency:1, willRunoff:false);
            2011-01-29  [Irrigation].Apply(amount:17.8, depth:0,efficiency:1, willRunoff:false);
            2011-02-02  [Irrigation].Apply(amount:17.8, depth:0,efficiency:1, willRunoff:false);
            2011-02-05  [Irrigation].Apply(amount:17.8, depth:0,efficiency:1, willRunoff:false);
          Operations 16
            2010-12-21  [Irrigation].Apply(amount:4.4, depth:0,efficiency:1, willRunoff:false);
            2010-12-24  [Irrigation].Apply(amount:4.4, depth:0,efficiency:1, willRunoff:false);
            2010-12-27  [Irrigation].Apply(amount:4.4, depth:0,efficiency:1, willRunoff:false);
            2010-12-31  [Irrigation].Apply(amount:19.1, depth:0,efficiency:1, willRunoff:false);
            2011-01-03  [Irrigation].Apply(amount:19.1, depth:0,efficiency:1, willRunoff:false);
            2011-01-06  [Irrigation].Apply(amount:19.1, depth:0,efficiency:1, willRunoff:false);
            2011-01-10  [Irrigation].Apply(amount:26.2, depth:0,efficiency:1, willRunoff:false);
            2011-01-13  [Irrigation].Apply(amount:26.2, depth:0,efficiency:1, willRunoff:false);
            2011-01-16  [Irrigation].Apply(amount:26.2, depth:0,efficiency:1, willRunoff:false);
            2011-01-19  [Irrigation].Apply(amount:26.2, depth:0,efficiency:1, willRunoff:false);
            2011-01-22  [Irrigation].Apply(amount:26.2, depth:0,efficiency:1, willRunoff:false);
            2011-01-29  [Irrigation].Apply(amount:13.4, depth:0,efficiency:1, willRunoff:false);
            2011-02-02  [Irrigation].Apply(amount:13.4, depth:0,efficiency:1, willRunoff:false);
            2011-02-05  [Irrigation].Apply(amount:13.4, depth:0,efficiency:1, willRunoff:false);
      Simulation CWP
        Weather: FileName=MelkasaGY.met
        Clock: StartDate=2010-12-01; EndDate=2011-03-31
        Summary summaryfile
        SoilArbitrator Soil Arbitrator
        Zone Field: Area=1; Slope=0
          MicroClimate: a_interception=0; b_interception=1; c_interception=0; d_interception=0; soil_albedo=0.23; sun_angle=15; soil_heat_flux_fraction=0.4; night_interception_fraction=0.5; refheight=2; albedo=0.15; emissivity=0.96; RadIntTotal=0
          Irrigation
          Fertiliser
          SurfaceOrganicMatter: same as Ethiopia.Jamma.Jamma.Field.SurfaceOrganicMatter
          Operations Sowing
          Operations NRate
            2010-12-01  [Fertiliser].Apply(23.4, Fertiliser.Types.NH4N, 10);
            2011-01-01  [Fertiliser].Apply(16.1, Fertiliser.Types.UreaN, 10);
          Operations IrrigationRate
          Report: EventNames=[Clock].DoReport
            VariableNames:
              [Clock].Today
              [Soil].SoilWater.SW
              [Soil].SoilWater.Eo
              [Soil].SoilWater.Es
              [Soil].SoilWater.Drainage
              [Soil].SoilWater.Runoff
              [Soil].SoilWater.pond
              sum([Soil].SoilWater.SWmm) as ProfileWater
              [Soil].NO3N
              [MicroClimate].net_radn
              [MicroClimate].peta
              [MicroClimate].petr
              [Teff].Leaf.LAI
              [Teff].Leaf.Transpiration
              [Teff].Root.Depth
              [Teff].Leaf.Fw
              [Teff].Leaf.Fn
              [Teff].Leaf.CoverGreen
              [Teff].Total.Wt
              [Teff].Leaf.AppearedCohortNo
              [Teff].Leaf.ExpandedCohortNo
              [Teff].Leaf.SenescingCohortNo
              [Teff].Structure.TotalStemPopn
              [Teff].Leaf.CohortArea[1:10]
          Soil: Latitude=0; Longitude=0
            Water
              Thickness  BD   AirDry  LL15  DUL   SAT
              150        1.4  0.06    0.17  0.29  0.453
              150        1.4  0.06    0.17  0.29  0.453
              150        1.5  0.06    0.18  0.32  0.41
              150        1.5  0.06    0.18  0.32  0.41
              300        1.5  0.06    0.18  0.32  0.41
              SoilCrop WheatSoil: LL=[0.17, 0.17, 0.18, 0.18, 0.18]; KL=[0.06, 0.06, 0.06, 0.06, 0.06]; XF=[1, 1, 1, 1, 1]
              SoilCrop TeffSoil: LL=[0.17, 0.17, 0.18, 0.18, 0.18]; KL=[0.06, 0.06, 0.06, 0.06, 0.06]; XF=[1, 1, 1, 0, 0]
            SoilWater: same as Ethiopia.Ofla.Ofla.Field.soil.SoilWater
            SoilNitrogen: fom_type=[default, manure, mucuna, lablab, shemp, stable]; fract_carb=[0.2, 0.3, 0.54, 0.57, 0.45, 0]; fract_cell=[0.7, 0.3, 0.37, 0.37, 0.47, 0.1]; fract_lign=[0.1, 0.4, 0.09, 0.06, 0.08, 0.9]
            SoilOrganicMatter: RootCN=45; RootWt=1000; SoilCN=14.5; EnrACoeff=7.4; EnrBCoeff=0.2; OCUnits=Total
              Thickness  OC    FBiom  FInert
              150        1.1   0.02   0.42
              150        0.9   0.01   0.5
              300        0.84  0.01   0.58
              300        0.46  0.01   0.9
            Analysis: Thickness=[100, 100, 100, 200, 200, 200, 200, 200, 200]; PH=[6, 6, 6, 6.2, 6.5, 6.7, 6.8, 6.8, 6.8]; PHUnits=Water; BoronUnits=HotWater
            Sample InitialN: NO3Units=kgha; NH4Units=kgha; SWUnits=Volumetric; OCUnits=Total; PHUnits=Water
              Thickness  NO3   NH4
              150        40    0.6
              150        30    0.1
              300        10    0.1
              300        1.08  0.1
            Sample InitialSW: Thickness=[150, 150, 300, 300]; SW=[0.29, 0.29, 0.32, 0.32]; NO3Units=ppm; NH4Units=ppm; SWUnits=Volumetric; OCUnits=Total; PHUnits=Water
            CERESSoilTemperature
          Report HarvestReport: same as Ethiopia.Ofla.Ofla.Field.HarvestReport
          Manager TeffHarvesting: same as Ethiopia.Ofla.Ofla.Field.TeffHarvesting
          Plant Teff: CropType=Chickpea
          SoluteManager
    Experiment CWP2011
      Memo
        From Crop Water Productivity of Irrigated Teff in a WaterStressed RegionYenesew Mengiste Yihun & Abraham Mehari Haile &Bart Schultz & Teklu ErkossaWater Resour Manage (2013) 27:31153125
      Factors
        Factor Treatment: Specifications=[IrrigationRate]
          Operations 1
            2012-01-09  [Irrigation].Apply(amount:33, depth:0,efficiency:1, willRunoff:false);
            2012-01-15  [Irrigation].Apply(amount:33, depth:0,efficiency:1, willRunoff:false);
            2012-01-21  [Irrigation].Apply(amount:33, depth:0,efficiency:1, willRunoff:false);
            2012-01-27  [Irrigation].Apply(amount:28, depth:0,efficiency:1, willRunoff:false);
            2012-02-02  [Irrigation].Apply(amount:28, depth:0,efficiency:1, willRunoff:false);
            2012-02-08  [Irrigation].Apply(amount:28, depth:0,efficiency:1, willRunoff:false);
            2012-02-14  [Irrigation].Apply(amount:52, depth:0,efficiency:1, willRunoff:false);
            2012-02-20  [Irrigation].Apply(amount:52, depth:0,efficiency:1, willRunoff:false);
            2012-02-26  [Irrigation].Apply(amount:52, depth:0,efficiency:1, willRunoff:false);
            2012-03-03  [Irrigation].Apply(amount:40, depth:0,efficiency:1, willRunoff:false);
          Operations 2
            2012-01-09  [Irrigation].Apply(amount:15, depth:0,efficiency:1, willRunoff:false);
            2012-01-15  [Irrigation].Apply(amount:15, depth:0,efficiency:1, willRunoff:false);
            2012-01-21  [Irrigation].Apply(amount:15, depth:0,efficiency:1, willRunoff:false);
            2012-01-27  [Irrigation].Apply(amount:19, depth:0,efficiency:1, willRunoff:false);
            2012-02-02  [Irrigation].Apply(amount:19, depth:0,efficiency:1, willRunoff:false);
            2012-02-08  [Irrigation].Apply(amount:19, depth:0,efficiency:1, willRunoff:false);
            2012-02-14  [Irrigation].Apply(amount:42, depth:0,efficiency:1, willRunoff:false);
            2012-02-20  [Irrigation].Apply(amount:42, depth:0,efficiency:1, willRunoff:false);
            2012-02-26  [Irrigation].Apply(amount:42, depth:0,efficiency:1, willRunoff:false);
            2012-03-03  [Irrigation].Apply(amount:27, depth:0,efficiency:1, willRunoff:false);
          Operations 3
            2012-01-09  [Irrigation].Apply(amount:9, depth:0,efficiency:1, willRunoff:false);
            2012-01-15  [Irrigation].Apply(amount:9, depth:0,efficiency:1, willRunoff:false);
            2012-01-21  [Irrigation].Apply(amount:9, depth:0,efficiency:1, willRunoff:false);
            2012-01-27  [Irrigation].Apply(amount:12, depth:0,efficiency:1, willRunoff:false);
            2012-02-02  [Irrigation].Apply(amount:12, depth:0,efficiency:1, willRunoff:false);
            2012-02-08  [Irrigation].Apply(amount:12, depth:0,efficiency:1, willRunoff:false);
            2012-02-14  [Irrigation].Apply(amount:44, depth:0,efficiency:1, willRunoff:false);
            2012-02-20  [Irrigation].Apply(amount:44, depth:0,efficiency:1, willRunoff:false);
            2012-02-26  [Irrigation].Apply(amount:44, depth:0,efficiency:1, willRunoff:false);
            2012-03-03  [Irrigation].Apply(amount:12, depth:0,efficiency:1, willRunoff:false);
          Operations 4
            2012-01-09  [Irrigation].Apply(amount:5, depth:0,efficiency:1, willRunoff:false);
            2012-01-15  [Irrigation].Apply(amount:5, depth:0,efficiency:1, willRunoff:false);
            2012-01-21  [Irrigation].Apply(amount:5, depth:0,efficiency:1, willRunoff:false);
            2012-01-27  [Irrigation].Apply(amount:6, depth:0,efficiency:1, willRunoff:false);
            2012-02-02  [Irrigation].Apply(amount:6, depth:0,efficiency:1, willRunoff:false);
            2012-02-08  [Irrigation].Apply(amount:6, depth:0,efficiency:1, willRunoff:false);
            2012-02-14  [Irrigation].Apply(amount:31, depth:0,efficiency:1, willRunoff:false);
            2012-02-20  [Irrigation].Apply(amount:31, depth:0,efficiency:1, willRunoff:false);
            2012-02-26  [Irrigation].Apply(amount:31, depth:0,efficiency:1, willRunoff:false);
            2012-03-03  [Irrigation].Apply(amount:9, depth:0,efficiency:1, willRunoff:false);
          Operations 5
            2012-01-09  [Irrigation].Apply(amount:15, depth:0,efficiency:1, willRunoff:false);
            2012-01-15  [Irrigation].Apply(amount:15, depth:0,efficiency:1, willRunoff:false);
            2012-01-21  [Irrigation].Apply(amount:15, depth:0,efficiency:1, willRunoff:false);
            2012-01-27  [Irrigation].Apply(amount:28, depth:0,efficiency:1, willRunoff:false);
            2012-02-02  [Irrigation].Apply(amount:28, depth:0,efficiency:1, willRunoff:false);
            2012-02-08  [Irrigation].Apply(amount:28, depth:0,efficiency:1, willRunoff:false);
            2012-02-14  [Irrigation].Apply(amount:52, depth:0,efficiency:1, willRunoff:false);
            2012-02-20  [Irrigation].Apply(amount:52, depth:0,efficiency:1, willRunoff:false);
            2012-02-26  [Irrigation].Apply(amount:52, depth:0,efficiency:1, willRunoff:false);
            2012-03-03  [Irrigation].Apply(amount:40, depth:0,efficiency:1, willRunoff:false);
          Operations 6
            2012-01-09  [Irrigation].Apply(amount:33, depth:0,efficiency:1, willRunoff:false);
            2012-01-15  [Irrigation].Apply(amount:33, depth:0,efficiency:1, willRunoff:false);
            2012-01-21  [Irrigation].Apply(amount:33, depth:0,efficiency:1, willRunoff:false);
            2012-01-27  [Irrigation].Apply(amount:19, depth:0,efficiency:1, willRunoff:false);
            2012-02-02  [Irrigation].Apply(amount:19, depth:0,efficiency:1, willRunoff:false);
            2012-02-08  [Irrigation].Apply(amount:19, depth:0,efficiency:1, willRunoff:false);
            2012-02-14  [Irrigation].Apply(amount:52, depth:0,efficiency:1, willRunoff:false);
            2012-02-20  [Irrigation].Apply(amount:52, depth:0,efficiency:1, willRunoff:false);
            2012-02-26  [Irrigation].Apply(amount:52, depth:0,efficiency:1, willRunoff:false);
            2012-03-03  [Irrigation].Apply(amount:40, depth:0,efficiency:1, willRunoff:false);
          Operations 7
            2012-01-09  [Irrigation].Apply(amount:33, depth:0,efficiency:1, willRunoff:false);
            2012-01-15  [Irrigation].Apply(amount:33, depth:0,efficiency:1, willRunoff:false);
            2012-01-21  [Irrigation].Apply(amount:33, depth:0,efficiency:1, willRunoff:false);
            2012-01-27  [Irrigation].Apply(amount:28, depth:0,efficiency:1, willRunoff:false);
            2012-02-02  [Irrigation].Apply(amount:28, depth:0,efficiency:1, willRunoff:false);
            2012-02-08  [Irrigation].Apply(amount:28, depth:0,efficiency:1, willRunoff:false);
            2012-02-14  [Irrigation].Apply(amount:42, depth:0,efficiency:1, willRunoff:false);
            2012-02-20  [Irrigation].Apply(amount:42, depth:0,efficiency:1, willRunoff:false);
            2012-02-26  [Irrigation].Apply(amount:42, depth:0,efficiency:1, willRunoff:false);
            2012-03-03  [Irrigation].Apply(amount:40, depth:0,efficiency:1, willRunoff:false);
          Operations 8
            2012-01-09  [Irrigation].Apply(amount:33, depth:0,efficiency:1, willRunoff:false);
            2012-01-15  [Irrigation].Apply(amount:33, depth:0,efficiency:1, willRunoff:false);
            2012-01-21  [Irrigation].Apply(amount:33, depth:0,efficiency:1, willRunoff:false);
            2012-01-27  [Irrigation].Apply(amount:28, depth:0,efficiency:1, willRunoff:false);
            2012-02-02  [Irrigation].Apply(amount:28, depth:0,efficiency:1, willRunoff:false);
            2012-02-08  [Irrigation].Apply(amount:28, depth:0,efficiency:1, willRunoff:false);
            2012-02-14  [Irrigation].Apply(amount:52, depth:0,efficiency:1, willRunoff:false);
            2012-02-20  [Irrigation].Apply(amount:52, depth:0,efficiency:1, willRunoff:false);
            2012-02-26  [Irrigation].Apply(amount:52, depth:0,efficiency:1, willRunoff:false);
            2012-03-03  [Irrigation].Apply(amount:27, depth:0,efficiency:1, willRunoff:false);
          Operations 9
            2012-01-09  [Irrigation].Apply(amount:9, depth:0,efficiency:1, willRunoff:false);
            2012-01-15  [Irrigation].Apply(amount:9, depth:0,efficiency:1, willRunoff:false);
            2012-01-21  [Irrigation].Apply(amount:9, depth:0,efficiency:1, willRunoff:false);
            2012-01-27  [Irrigation].Apply(amount:28, depth:0,efficiency:1, willRunoff:false);
            2012-02-02  [Irrigation].Apply(amount:28, depth:0,efficiency:1, willRunoff:false);
            2012-02-08  [Irrigation].Apply(amount:28, depth:0,efficiency:1, willRunoff:false);
            2012-02-14  [Irrigation].Apply(amount:52, depth:0,efficiency:1, willRunoff:false);
            2012-02-20  [Irrigation].Apply(amount:52, depth:0,efficiency:1, willRunoff:false);
            2012-02-26  [Irrigation].Apply(amount:52, depth:0,efficiency:1, willRunoff:false);
            2012-03-03  [Irrigation].Apply(amount:40, depth:0,efficiency:1, willRunoff:false);
          Operations 10
            2012-01-09  [Irrigation].Apply(amount:33, depth:0,efficiency:1, willRunoff:false);
            2012-01-15  [Irrigation].Apply(amount:33, depth:0,efficiency:1, willRunoff:false);
            2012-01-21  [Irrigation].Apply(amount:33, depth:0,efficiency:1, willRunoff:false);
            2012-01-27  [Irrigation].Apply(amount:12, depth:0,efficiency:1, willRunoff:false);
            2012-02-02  [Irrigation].Apply(amount:12, depth:0,efficiency:1, willRunoff:false);
            2012-02-08  [Irrigation].Apply(amount:12, depth:0,efficiency:1, willRunoff:false);
            2012-02-14  [Irrigation].Apply(amount:52, depth:0,efficiency:1, willRunoff:false);
            2012-02-20  [Irrigation].Apply(amount:52, depth:0,efficiency:1, willRunoff:false);
            2012-02-26  [Irrigation].Apply(amount:52, depth:0,efficiency:1, willRunoff:false);
            2012-03-03  [Irrigation].Apply(amount:40, depth:0,efficiency:1, willRunoff:false);
          Operations 11
            2012-01-09  [Irrigation].Apply(amount:33, depth:0,efficiency:1, willRunoff:false);
            2012-01-15  [Irrigation].Apply(amount:33, depth:0,efficiency:1, willRunoff:false);
            2012-01-21  [Irrigation].Apply(amount:33, depth:0,efficiency:1, willRunoff:false);
            2012-01-27  [Irrigation].Apply(amount:28, depth:0,efficiency:1, willRunoff:false);
            2012-02-02  [Irrigation].Apply(amount:28, depth:0,efficiency:1, willRunoff:false);
            2012-02-08  [Irrigation].Apply(amount:28, depth:0,efficiency:1, willRunoff:false);
            2012-02-14  [Irrigation].Apply(amount:45, depth:0,efficiency:1, willRunoff:false);
            2012-02-20  [Irrigation].Apply(amount:45, depth:0,efficiency:1, willRunoff:false);
            2012-02-26  [Irrigation].Apply(amount:45, depth:0,efficiency:1, willRunoff:false);
            2012-03-03  [Irrigation].Apply(amount:40, depth:0,efficiency:1, willRunoff:false);
          Operations 12
            2012-01-09  [Irrigation].Apply(amount:33, depth:0,efficiency:1, willRunoff:false);
            2012-01-15  [Irrigation].Apply(amount:33, depth:0,efficiency:1, willRunoff:false);
            2012-01-21  [Irrigation].Apply(amount:33, depth:0,efficiency:1, willRunoff:false);
            2012-01-27  [Irrigation].Apply(amount:28, depth:0,efficiency:1, willRunoff:false);
            2012-02-02  [Irrigation].Apply(amount:28, depth:0,efficiency:1, willRunoff:false);
            2012-02-08  [Irrigation].Apply(amount:28, depth:0,efficiency:1, willRunoff:false);
            2012-02-14  [Irrigation].Apply(amount:52, depth:0,efficiency:1, willRunoff:false);
            2012-02-20  [Irrigation].Apply(amount:52, depth:0,efficiency:1, willRunoff:false);
            2012-02-26  [Irrigation].Apply(amount:52, depth:0,efficiency:1, willRunoff:false);
            2012-03-03  [Irrigation].Apply(amount:12, depth:0,efficiency:1, willRunoff:false);
          Operations 13
            2012-01-09  [Irrigation].Apply(amount:5, depth:0,efficiency:1, willRunoff:false);
            2012-01-15  [Irrigation].Apply(amount:5, depth:0,efficiency:1, willRunoff:false);
            2012-01-21  [Irrigation].Apply(amount:5, depth:0,efficiency:1, willRunoff:false);
            2012-01-27  [Irrigation].Apply(amount:28, depth:0,efficiency:1, willRunoff:false);
            2012-02-02  [Irrigation].Apply(amount:28, depth:0,efficiency:1, willRunoff:false);
            2012-02-08  [Irrigation].Apply(amount:28, depth:0,efficiency:1, willRunoff:false);
            2012-02-14  [Irrigation].Apply(amount:52, depth:0,efficiency:1, willRunoff:false);
            2012-02-20  [Irrigation].Apply(amount:52, depth:0,efficiency:1, willRunoff:false);
            2012-02-26  [Irrigation].Apply(amount:52, depth:0,efficiency:1, willRunoff:false);
            2012-03-03  [Irrigation].Apply(amount:40, depth:0,efficiency:1, willRunoff:false);
          Operations 14
            2012-01-09  [Irrigation].Apply(amount:33, depth:0,efficiency:1, willRunoff:false);
            2012-01-15  [Irrigation].Apply(amount:33, depth:0,efficiency:1, willRunoff:false);
            2012-01-21  [Irrigation].Apply(amount:33, depth:0,efficiency:1, willRunoff:false);
            2012-01-27  [Irrigation].Apply(amount:6, depth:0,efficiency:1, willRunoff:false);
            2012-02-02  [Irrigation].Apply(amount:6, depth:0,efficiency:1, willRunoff:false);
            2012-02-08  [Irrigation].Apply(amount:6, depth:0,efficiency:1, willRunoff:false);
            2012-02-14  [Irrigation].Apply(amount:52, depth:0,efficiency:1, willRunoff:false);
            2012-02-20  [Irrigation].Apply(amount:52, depth:0,efficiency:1, willRunoff:false);
            2012-02-26  [Irrigation].Apply(amount:52, depth:0,efficiency:1, willRunoff:false);
            2012-03-03  [Irrigation].Apply(amount:40, depth:0,efficiency:1, willRunoff:false);
          Operations 15
            2012-01-09  [Irrigation].Apply(amount:33, depth:0,efficiency:1, willRunoff:false);
            2012-01-15  [Irrigation].Apply(amount:33, depth:0,efficiency:1, willRunoff:false);
            2012-01-21  [Irrigation].Apply(amount:33, depth:0,efficiency:1, willRunoff:false);
            2012-01-27  [Irrigation].Apply(amount:28, depth:0,efficiency:1, willRunoff:false);
            2012-02-02  [Irrigation].Apply(amount:28, depth:0,efficiency:1, willRunoff:false);
            2012-02-08  [Irrigation].Apply(amount:28, depth:0,efficiency:1, willRunoff:false);
            2012-02-14  [Irrigation].Apply(amount:31, depth:0,efficiency:1, willRunoff:false);
            2012-02-20  [Irrigation].Apply(amount:31, depth:0,efficiency:1, willRunoff:false);
            2012-02-26  [Irrigation].Apply(amount:31, depth:0,efficiency:1, willRunoff:false);
            2012-03-03  [Irrigation].Apply(amount:40, depth:0,efficiency:1, willRunoff:false);
          Operations 16
            2012-01-09  [Irrigation].Apply(amount:33, depth:0,efficiency:1, willRunoff:false);
            2012-01-15  [Irrigation].Apply(amount:33, depth:0,efficiency:1, willRunoff:false);
            2012-01-21  [Irrigation].Apply(amount:33, depth:0,efficiency:1, willRunoff:false);
            2012-01-27  [Irrigation].Apply(amount:28, depth:0,efficiency:1, willRunoff:false);
            2012-02-02  [Irrigation].Apply(amount:28, depth:0,efficiency:1, willRunoff:false);
            2012-02-08  [Irrigation].Apply(amount:28, depth:0,efficiency:1, willRunoff:false);
            2012-02-14  [Irrigation].Apply(amount:52, depth:0,efficiency:1, willRunoff:false);
            2012-02-20  [Irrigation].Apply(amount:52, depth:0,efficiency:1, willRunoff:false);
            2012-02-26  [Irrigation].Apply(amount:52, depth:0,efficiency:1, willRunoff:false);
            2012-03-03  [Irrigation].Apply(amount:9, depth:0,efficiency:1, willRunoff:false);
      Simulation CWP2011
        Weather: FileName=MelkasaGY.met
        Clock: StartDate=2011-12-20; EndDate=2012-03-30
        Summary summaryfile
        SoilArbitrator Soil Arbitrator
        Zone Field: Area=1; Slope=0
          MicroClimate: a_interception=0; b_interception=1; c_interception=0; d_interception=0; soil_albedo=0.23; sun_angle=15; soil_heat_flux_fraction=0.4; night_interception_fraction=0.5; refheight=2; albedo=0.15; emissivity=0.96; RadIntTotal=0
          Irrigation
          Fertiliser
          SurfaceOrganicMatter: same as Ethiopia.Jamma.Jamma.Field.SurfaceOrganicMatter
          Operations Sowing
            2011-12-20  [Teff].Sow(population:100., cultivar:"Kuncho", depth:50, rowSpacing:250);
          Operations NRate
            2011-12-20  [Fertiliser].Apply(23.4, Fertiliser.Types.NH4NO3N, 10);
            2012-01-20  [Fertiliser].Apply(16.1, Fertiliser.Types.NH4NO3N, 10);
          Operations IrrigationRate
          Soil: Latitude=0; Longitude=0
            Water: same as Ethiopia.CWP2010.CWP.Field.soil.Water
            SoilWater: same as Ethiopia.Ofla.Ofla.Field.soil.SoilWater
            SoilNitrogen: fom_type=[default, manure, mucuna, lablab, shemp, stable]; fract_carb=[0.2, 0.3, 0.54, 0.57, 0.45, 0]; fract_cell=[0.7, 0.3, 0.37, 0.37, 0.47, 0.1]; fract_lign=[0.1, 0.4, 0.09, 0.06, 0.08, 0.9]
            SoilOrganicMatter: RootCN=45; RootWt=1000; SoilCN=14.5; EnrACoeff=7.4; EnrBCoeff=0.2; OCUnits=Total
              Thickness  OC    FBiom  FInert
              150        1.1   0.02   0.42
              150        0.9   0.01   0.5
              300        0.84  0.01   0.58
              300        0.46  0.01   0.9
            Analysis: Thickness=[100, 100, 100, 200, 200, 200, 200, 200, 200]; PH=[6, 6, 6, 6.2, 6.5, 6.7, 6.8, 6.8, 6.8]; PHUnits=Water; BoronUnits=HotWater
            Sample InitialN: NO3Units=kgha; NH4Units=kgha; SWUnits=Volumetric; OCUnits=Total; PHUnits=Water
              Thickness  NO3   NH4
              150        70    0.6
              150        50    0.1
              300        20    0.1
              300        1.08  0.1
            Sample InitialSW: Thickness=[150, 150, 300, 300]; SW=[0.29, 0.29, 0.32, 0.32]; NO3Units=ppm; NH4Units=ppm; SWUnits=Volumetric; OCUnits=Total; PHUnits=Water
            CERESSoilTemperature
          Report: EventNames=[Clock].DoReport
            VariableNames:
              [Clock].Today
              [Soil].SoilWater.SW
              [Soil].SoilWater.Eo
              [Soil].SoilWater.Es
              [Soil].SoilWater.Drainage
              [Soil].SoilWater.Runoff
              [Soil].SoilWater.pond
              sum([Soil].SoilWater.SWmm) as ProfileWater
              [Soil].NO3N
              [MicroClimate].net_radn
              [MicroClimate].peta
              [MicroClimate].petr
              [Teff].Leaf.LAI
              [Teff].Leaf.Transpiration
              [Teff].Root.Depth
              [Teff].Leaf.Fw
              [Teff].Leaf.Fn
              [Teff].Leaf.CoverGreen
              [Teff].Total.Wt
          Report HarvestReport: same as Ethiopia.Ofla.Ofla.Field.HarvestReport
          Manager TeffHarvesting: same as Ethiopia.Ofla.Ofla.Field.TeffHarvesting
          Plant Teff: CropType=Chickpea
          SoluteManager
    Experiment Mekelle2008
      Memo
        ;

        ### From

        Simulating yield response to water of Teff (Eragrostis tef) with FAOs AquaCrop

        model

        A. Araya a,b,*, S.D. Keesstra b, L. Stroosnijder b

        ###

        Field Crops Research 116 (2010) 196204
      Factors
        Factor Irrigation: Specifications=[IrrigationRate]
          Operations 0
          Operations 2
            2008-09-17  [Irrigation].Apply(amount:10, depth:0,efficiency:1, willRunoff:false);
            2008-09-19  [Irrigation].Apply(amount:10, depth:0,efficiency:1, willRunoff:false);
          Operations 4
            2008-09-17  [Irrigation].Apply(amount:10, depth:0,efficiency:1, willRunoff:false);
            2008-09-19  [Irrigation].Apply(amount:10, depth:0,efficiency:1, willRunoff:false);
            2008-09-21  [Irrigation].Apply(amount:12, depth:0,efficiency:1, willRunoff:false);
            2008-09-24  [Irrigation].Apply(amount:15, depth:0,efficiency:1, willRunoff:false);
          Operations 6
            2008-09-17  [Irrigation].Apply(amount:10, depth:0,efficiency:1, willRunoff:false);
            2008-09-19  [Irrigation].Apply(amount:10, depth:0,efficiency:1, willRunoff:false);
            2008-09-21  [Irrigation].Apply(amount:12, depth:0,efficiency:1, willRunoff:false);
            2008-09-24  [Irrigation].Apply(amount:15, depth:0,efficiency:1, willRunoff:false);
            2008-09-29  [Irrigation].Apply(amount:12, depth:0,efficiency:1, willRunoff:false);
            2008-10-03  [Irrigation].Apply(amount:12, depth:0,efficiency:1, willRunoff:false);
          Operations 8
            2008-09-17  [Irrigation].Apply(amount:10, depth:0,efficiency:1, willRunoff:false);
            2008-09-19  [Irrigation].Apply(amount:10, depth:0,efficiency:1, willRunoff:false);
            2008-09-21  [Irrigation].Apply(amount:12, depth:0,efficiency:1, willRunoff:false);
            2008-09-24  [Irrigation].Apply(amount:15, depth:0,efficiency:1, willRunoff:false);
            2008-09-29  [Irrigation].Apply(amount:12, depth:0,efficiency:1, willRunoff:false);
            2008-10-03  [Irrigation].Apply(amount:12, depth:0,efficiency:1, willRunoff:false);
            2008-10-07  [Irrigation].Apply(amount:12, depth:0,efficiency:1, willRunoff:false);
            2008-10-09  [Irrigation].Apply(amount:12, depth:0,efficiency:1, willRunoff:false);
      Simulation Mekelle
        Weather: FileName=%root%\Prototypes\Teff\mekelle2008.met
        Clock: StartDate=2008-08-02; EndDate=2008-11-10
        Summary summaryfile
        SoilArbitrator Soil Arbitrator
        Zone Field: Area=1; Slope=0
          MicroClimate: a_interception=0; b_interception=1; c_interception=0; d_interception=0; soil_albedo=0.23; sun_angle=15; soil_heat_flux_fraction=0.4; night_interception_fraction=0.5; refheight=2; albedo=0.15; emissivity=0.96; RadIntTotal=0
          Irrigation
          Fertiliser
          SurfaceOrganicMatter: same as Ethiopia.Jamma.Jamma.Field.SurfaceOrganicMatter
          Operations Sowing
            2008-08-02  [Teff].Sow(population:100., cultivar:"DZ974", depth:50, rowSpacing:250);
          Operations NRate
            2008-08-02  [Fertiliser].Apply(60, Fertiliser.Types.UreaN, 10);
          Operations IrrigationRate
          Report: EventNames=[Clock].DoReport
            VariableNames:
              [Clock].Today
              [Soil].SoilWater.SW
              [Soil].SoilWater.Eo
              [Soil].SoilWater.Es
              [Soil].SoilWater.Drainage
              [Soil].SoilWater.Runoff
              [Soil].SoilWater.pond
              sum([Soil].SoilWater.SWmm) as ProfileWater
              sum([Soil].NO3N) as ProfileNO3
              sum([Soil].SoilWater.SWmm[1:3]) as SW30cm
              [MicroClimate].net_radn
              [MicroClimate].peta
              [MicroClimate].petr
              [Teff].Leaf.LAI
              [Teff].Total.Wt as AboveGroundBiomass
              [Teff].Grain.Live.Wt as GrainWt
              [Teff].Grain.Size as GrainSize
              [Teff].Leaf.Transpiration
              ([Teff].Leaf.Transpiration+[Soil].SoilWater.Es) as ET
              [Teff].Root.Depth
              [Teff].Leaf.Fw
              [Teff].Leaf.Fn
              [Teff].Leaf.Photosynthesis.Value()
              [Teff].Stem.Live.Wt
              [Teff].Panicle.Live.Wt
              [Teff].Leaf.Total.Wt
              [Teff].Panicle.DMDemandFunction.Value()
              [Teff].Leaf.Live.Wt
              [Teff].Leaf.Dead.Wt
              [Teff].Leaf.CoverGreen
              [Teff].Leaf.AppearedCohortNo
              [Teff].Leaf.ExpandedCohortNo
              [Teff].Leaf.SenescingCohortNo
              [Teff].Structure.TotalStemPopn
              [Teff].Leaf.CohortArea[1:10]
          Soil: Latitude=0; Longitude=0
            Water
              Thickness  BD    AirDry  LL15  DUL   SAT   KS
              100        1.55  0.05    0.14  0.27  0.41  250
              100        1.55  0.05    0.14  0.27  0.41  250
              100        1.45  0.07    0.22  0.42  0.45  175
              300        1.45  0.07    0.22  0.42  0.45  175
              300        1.45  0.07    0.22  0.42  0.45  175
              SoilCrop WheatSoil: LL=[0.14, 0.14, 0.22, 0.22, 0.22]; KL=[0.06, 0.06, 0.06, 0.06, 0.05]; XF=[1, 1, 1, 1, 1]
              SoilCrop TeffSoil: LL=[0.14, 0.14, 0.22, 0.22, 0.22]; KL=[0.1, 0.1, 0.06, 0.02, 0.01]; XF=[1, 1, 1, 1, 0]
            SoilWater: SummerDate=1-Nov; SummerU=6; SummerCona=3.5; WinterDate=1-Apr; WinterU=6; WinterCona=3.5; DiffusConst=88; DiffusSlope=35.4; Salb=0.18; CN2Bare=87; CNRed=20; CNCov=0.8; max_pond=0; Thickness=[100, 100, 100, 200, 200, 200, 200, 200, 200]; SWCON=[0.5, 0.5, 0.5, 0.5, 0.5, 0.5, 0.5, 0.5, 0.5]; residueinterception=0
            SoilNitrogen: fom_type=[default, manure, mucuna, lablab, shemp, stable]; fract_carb=[0.2, 0.3, 0.54, 0.57, 0.45, 0]; fract_cell=[0.7, 0.3, 0.37, 0.37, 0.47, 0.1]; fract_lign=[0.1, 0.4, 0.09, 0.06, 0.08, 0.9]
            SoilOrganicMatter: same as Ethiopia.Ofla.Ofla.Field.soil.SoilOrganicMatter
            Analysis: Thickness=[100, 100, 100, 200, 200, 200, 200, 200, 200]; PH=[6, 6, 6, 6.2, 6.5, 6.7, 6.8, 6.8, 6.8]; PHUnits=Water; BoronUnits=HotWater
            Sample InitialN: NO3Units=kgha; NH4Units=ppm; SWUnits=Volumetric; OCUnits=Total; PHUnits=Water
              Thickness  NO3   NH4
              100        30    0.6
              100        10    0.1
              100        5     0.1
              300        1.08  0.1
              300        0.15  0.1
            Sample InitialSW: Thickness=[100, 100, 100, 300, 300]; SW=[0.27, 0.27, 0.42, 0.42, 0.42]; NO3Units=ppm; NH4Units=ppm; SWUnits=Volumetric; OCUnits=Total; PHUnits=Water
            CERESSoilTemperature
          Report HarvestReport: EventNames=[Teff].Harvesting
            VariableNames:
              [Clock].Today
              [Teff].Phenology.CurrentStageName as Stage
              [Teff].AboveGround.Wt as Biomass
              [Teff].Grain.Yield
              [Teff].Grain.Size as GrainSize
              [Teff].Grain.Live.Wt as GrainWt
              [Teff].Structure.MainStemFinalNodeNo
              [Teff].Phenology.FloweringDAS.Value() as FloweringDAS
              [Teff].Phenology.MaturityDAS.Value()  as MaturityDASS
          Manager TeffHarvesting: same as Ethiopia.Jamma.Jamma.Field.TeffHarvesting
          Plant Teff: CropType=Chickpea
          SoluteManager
    Experiment Mekelle2009
      Memo
        ;

        ### From

        Simulating yield response to water of Teff (Eragrostis tef) with FAOs AquaCrop

        model

        A. Araya a,b,*, S.D. Keesstra b, L. Stroosnijder b

        ###

        Field Crops Research 116 (2010) 196204
      Factors
        Factor Irrigation: Specifications=[IrrigationRate]
          Operations 0
          Operations 4
            2009-09-17  [Irrigation].Apply(amount:10, depth:0,efficiency:1, willRunoff:false);
            2009-09-19  [Irrigation].Apply(amount:10, depth:0,efficiency:1, willRunoff:false);
            2009-09-20  [Irrigation].Apply(amount:10, depth:0,efficiency:1, willRunoff:false);
            2009-09-24  [Irrigation].Apply(amount:10, depth:0,efficiency:1, willRunoff:false);
          Operations 9
            2009-09-17  [Irrigation].Apply(amount:10, depth:0,efficiency:1, willRunoff:false);
            2009-09-19  [Irrigation].Apply(amount:10, depth:0,efficiency:1, willRunoff:false);
            2009-09-20  [Irrigation].Apply(amount:10, depth:0,efficiency:1, willRunoff:false);
            2009-09-24  [Irrigation].Apply(amount:10, depth:0,efficiency:1, willRunoff:false);
            2009-09-27  [Irrigation].Apply(amount:10, depth:0,efficiency:1, willRunoff:false);
            2009-10-01  [Irrigation].Apply(amount:10, depth:0,efficiency:1, willRunoff:false);
            2009-10-03  [Irrigation].Apply(amount:10, depth:0,efficiency:1, willRunoff:false);
            2009-10-05  [Irrigation].Apply(amount:10, depth:0,efficiency:1, willRunoff:false);
            2009-10-07  [Irrigation].Apply(amount:10, depth:0,efficiency:1, willRunoff:false);
      Simulation Mekelle2009
        Weather: FileName=mekelleGY.met
        Clock: StartDate=2009-07-31; EndDate=2009-12-31
        Summary summaryfile
        SoilArbitrator Soil Arbitrator
        Zone Field: Area=1; Slope=0
          MicroClimate: a_interception=0; b_interception=1; c_interception=0; d_interception=0; soil_albedo=0.23; sun_angle=15; soil_heat_flux_fraction=0.4; night_interception_fraction=0.5; refheight=2; albedo=0.15; emissivity=0.96; RadIntTotal=0
          Irrigation
          Fertiliser
          SurfaceOrganicMatter: same as Ethiopia.Jamma.Jamma.Field.SurfaceOrganicMatter
          Operations Sowing
            2009-07-31  [Teff].Sow(population:100., cultivar:"DZ974", depth:50, rowSpacing:250);
          Operations NRate
            2009-07-31  [Fertiliser].Apply(60, Fertiliser.Types.UreaN, 10);
          Operations IrrigationRate
          Soil: Latitude=0; Longitude=0
            Water
              Thickness  BD    AirDry  LL15  DUL   SAT
              100        1.55  0.05    0.14  0.27  0.41
              100        1.55  0.05    0.14  0.27  0.41
              100        1.45  0.07    0.22  0.42  0.45
              300        1.45  0.07    0.22  0.42  0.45
              300        1.45  0.07    0.22  0.42  0.45
              SoilCrop WheatSoil: LL=[0.14, 0.14, 0.22, 0.22, 0.22]; KL=[0.06, 0.06, 0.06, 0.06, 0.05]; XF=[1, 1, 1, 1, 1]
              SoilCrop TeffSoil: LL=[0.14, 0.14, 0.22, 0.22, 0.22]; KL=[0.1, 0.08, 0.04, 0.02, 0.01]; XF=[1, 1, 1, 1, 0]
            SoilWater: SummerDate=1-Nov; SummerU=9; SummerCona=3; WinterDate=1-Apr; WinterU=9; WinterCona=3; DiffusConst=88; DiffusSlope=35.4; Salb=0.13; CN2Bare=87; CNRed=20; CNCov=0.8; max_pond=0; Thickness=[100, 100, 100, 200, 200, 200, 200, 200, 200]; SWCON=[0.5, 0.5, 0.5, 0.5, 0.5, 0.5, 0.5, 0.5, 0.5]; residueinterception=0
            SoilNitrogen: fom_type=[default, manure, mucuna, lablab, shemp, stable]; fract_carb=[0.2, 0.3, 0.54, 0.57, 0.45, 0]; fract_cell=[0.7, 0.3, 0.37, 0.37, 0.47, 0.1]; fract_lign=[0.1, 0.4, 0.09, 0.06, 0.08, 0.9]
            SoilOrganicMatter: same as Ethiopia.Ofla.Ofla.Field.soil.SoilOrganicMatter
            Analysis: Thickness=[100, 100, 100, 200, 200, 200, 200, 200, 200]; PH=[6, 6, 6, 6.2, 6.5, 6.7, 6.8, 6.8, 6.8]; PHUnits=Water; BoronUnits=HotWater
            Sample InitialN: NO3Units=kgha; NH4Units=kgha; SWUnits=Volumetric; OCUnits=Total; PHUnits=Water
              Thickness  NO3  NH4
              100        7    0.6
              100        3    0.1
              100        0.1  0.1
              300        0.1  0.1
              300        0.1  0.1
            Sample InitialSW: Thickness=[100, 100, 100, 300, 300]; SW=[0.27, 0.27, 0.42, 0.42, 0.42]; NO3Units=ppm; NH4Units=ppm; SWUnits=Volumetric; OCUnits=Total; PHUnits=Water
            CERESSoilTemperature
          Report: same as Ethiopia.Mekelle2008.Mekelle.Field.Report
          Report HarvestReport: same as Ethiopia.Ofla.Ofla.Field.HarvestReport
          Manager TefHarvesting: same as Ethiopia.Jamma.Jamma.Field.TeffHarvesting
          Plant Teff: CropType=Chickpea
          SoluteManager
    Folder Lysimeter
      Simulation Lysimeter2
        Weather: FileName=MelkasaGY.met
        Clock: StartDate=2011-03-07; EndDate=2011-06-30
        Summary summaryfile
        SoilArbitrator Soil Arbitrator
        Zone Field: Area=1; Slope=0
          MicroClimate: a_interception=0; b_interception=1; c_interception=0; d_interception=0; soil_albedo=0.23; sun_angle=15; soil_heat_flux_fraction=0.4; night_interception_fraction=0.5; refheight=2; albedo=0.15; emissivity=0.96; RadIntTotal=0
          Irrigation
          Fertiliser
          SurfaceOrganicMatter: same as Ethiopia.Jamma.Jamma.Field.SurfaceOrganicMatter
          Operations Sowing
            2011-03-07  [Teff].Sow(population:100., cultivar:"Ayana", depth:50, rowSpacing:250);
          Operations NRate
            1985-11-08  [Fertiliser].Apply(50, Fertiliser.Types.NH4NO3N, 10);
            1985-11-29  [Fertiliser].Apply(30, Fertiliser.Types.NH4NO3N, 10);
          Operations IrrigationRate
            2011-03-17  [Irrigation].Apply(amount:8, depth:0,efficiency:1, willRunoff:false);
            2011-03-21  [Irrigation].Apply(amount:10.4, depth:0,efficiency:1, willRunoff:false);
            2011-03-25  [Irrigation].Apply(amount:10.1, depth:0,efficiency:1, willRunoff:false);
            2011-03-29  [Irrigation].Apply(amount:22.2, depth:0,efficiency:1, willRunoff:false);
            2011-04-03  [Irrigation].Apply(amount:16.7, depth:0,efficiency:1, willRunoff:false);
            2011-04-07  [Irrigation].Apply(amount:15.3, depth:0,efficiency:1, willRunoff:false);
            2011-04-10  [Irrigation].Apply(amount:16.5, depth:0,efficiency:1, willRunoff:false);
            2011-04-15  [Irrigation].Apply(amount:32.5, depth:0,efficiency:1, willRunoff:false);
            2011-04-21  [Irrigation].Apply(amount:30.8, depth:0,efficiency:1, willRunoff:false);
            2011-04-26  [Irrigation].Apply(amount:30, depth:0,efficiency:1, willRunoff:false);
            2011-05-01  [Irrigation].Apply(amount:27.2, depth:0,efficiency:1, willRunoff:false);
            2011-05-05  [Irrigation].Apply(amount:23.7, depth:0,efficiency:1, willRunoff:false);
            2011-05-09  [Irrigation].Apply(amount:27.3, depth:0,efficiency:1, willRunoff:false);
            2011-05-14  [Irrigation].Apply(amount:27.2, depth:0,efficiency:1, willRunoff:false);
            2011-05-19  [Irrigation].Apply(amount:12.4, depth:0,efficiency:1, willRunoff:false);
            2011-05-24  [Irrigation].Apply(amount:24.3, depth:0,efficiency:1, willRunoff:false);
          Report: EventNames=[Clock].DoReport
            VariableNames:
              [Clock].Today
              [Soil].SoilWater.SW
              [Soil].SoilWater.Eo
              [Soil].SoilWater.Es
              [Soil].SoilWater.Drainage
              [Soil].SoilWater.Runoff
              [Soil].SoilWater.pond
              sum([Soil].SoilWater.SWmm[1:2]) as SW30cm
              [Soil].NO3N
              [MicroClimate].net_radn
              [MicroClimate].peta
              [MicroClimate].petr
              [Teff].Leaf.LAI
              [Teff].Leaf.Transpiration
              ([Teff].Leaf.Transpiration+[Soil].SoilWater.Es) as ET
          Soil: Latitude=0; Longitude=0
            Water
              Thickness  BD   AirDry  LL15  DUL   SAT
              150        1.4  0.06    0.17  0.29  0.453
              150        1.4  0.06    0.17  0.29  0.453
              300        1.5  0.06    0.18  0.32  0.41
              300        1.5  0.06    0.18  0.32  0.41
              SoilCrop WheatSoil: LL=[0.17, 0.17, 0.18, 0.18]; KL=[0.06, 0.06, 0.06, 0.06]; XF=[1, 1, 1, 1]
              SoilCrop TeffSoil: LL=[0.17, 0.17, 0.18, 0.18]; KL=[0.06, 0.06, 0.04, 0.02]; XF=[1, 1, 1, 1]
            SoilWater: same as Ethiopia.Ofla.Ofla.Field.soil.SoilWater
            SoilNitrogen: fom_type=[default, manure, mucuna, lablab, shemp, stable]; fract_carb=[0.2, 0.3, 0.54, 0.57, 0.45, 0]; fract_cell=[0.7, 0.3, 0.37, 0.37, 0.47, 0.1]; fract_lign=[0.1, 0.4, 0.09, 0.06, 0.08, 0.9]
            SoilOrganicMatter: same as Ethiopia.Ofla.Ofla.Field.soil.SoilOrganicMatter
            Analysis: Thickness=[100, 100, 100, 200, 200, 200, 200, 200, 200]; PH=[6, 6, 6, 6.2, 6.5, 6.7, 6.8, 6.8, 6.8]; PHUnits=Water; BoronUnits=HotWater
            Sample InitialN: NO3Units=ppm; NH4Units=ppm; SWUnits=Volumetric; OCUnits=Total; PHUnits=Water
              Thickness  NO3   NH4
              150        14.4  0.6
              150        6.58  0.1
              300        2.45  0.1
              300        1.08  0.1
              300        0.15  0.1
              300        0.83  0.1
              300        2.3   0.1
            Sample InitialSW: Thickness=[150, 150, 300, 300, 300, 300, 300]; SW=[0.413, 0.456, 0.408, 0.374, 0.327, 0.325, 0.371]; NO3Units=ppm; NH4Units=ppm; SWUnits=Volumetric; OCUnits=Total; PHUnits=Water
            CERESSoilTemperature
          Report HarvestReport: same as Ethiopia.Ofla.Ofla.Field.HarvestReport
          Manager TeffHarvesting: same as Ethiopia.Jamma.Jamma.Field.TeffHarvesting
          Plant Teff: CropType=Chickpea
          SoluteManager
      Simulation Lysimeter4
        Weather: FileName=MelkasaGY.met
        Clock: StartDate=2012-03-11; EndDate=2012-06-30
        Summary summaryfile
        SoilArbitrator Soil Arbitrator
        Zone Field: Area=1; Slope=0
          MicroClimate: a_interception=0; b_interception=1; c_interception=0; d_interception=0; soil_albedo=0.23; sun_angle=15; soil_heat_flux_fraction=0.4; night_interception_fraction=0.5; refheight=2; albedo=0.15; emissivity=0.96; RadIntTotal=0
          Irrigation
          Fertiliser
          SurfaceOrganicMatter: same as Ethiopia.Jamma.Jamma.Field.SurfaceOrganicMatter
          Operations Sowing
            2012-03-11  [Teff].Sow(population:100., cultivar:"Katumani", depth:50, rowSpacing:250);
          Operations NRate
            1985-11-08  [Fertiliser].Apply(50, Fertiliser.Types.NH4NO3N, 10);
            1985-11-29  [Fertiliser].Apply(30, Fertiliser.Types.NH4NO3N, 10);
          Operations IrrigationRate
            2012-03-21  [Irrigation].Apply(amount:23.7, depth:0,efficiency:1, willRunoff:false);
            2012-03-26  [Irrigation].Apply(amount:13.3, depth:0,efficiency:1, willRunoff:false);
            2012-03-29  [Irrigation].Apply(amount:5, depth:0,efficiency:1, willRunoff:false);
            2012-04-05  [Irrigation].Apply(amount:21.7, depth:0,efficiency:1, willRunoff:false);
            2012-04-13  [Irrigation].Apply(amount:36.7, depth:0,efficiency:1, willRunoff:false);
            2012-04-19  [Irrigation].Apply(amount:33.1, depth:0,efficiency:1, willRunoff:false);
            2012-04-23  [Irrigation].Apply(amount:22.1, depth:0,efficiency:1, willRunoff:false);
            2012-04-27  [Irrigation].Apply(amount:22.1, depth:0,efficiency:1, willRunoff:false);
            2012-04-30  [Irrigation].Apply(amount:25.6, depth:0,efficiency:1, willRunoff:false);
            2012-05-03  [Irrigation].Apply(amount:20.2, depth:0,efficiency:1, willRunoff:false);
            2012-05-12  [Irrigation].Apply(amount:33.7, depth:0,efficiency:1, willRunoff:false);
            2012-05-20  [Irrigation].Apply(amount:30.2, depth:0,efficiency:1, willRunoff:false);
            2012-05-24  [Irrigation].Apply(amount:12.3, depth:0,efficiency:1, willRunoff:false);
          Report: same as Ethiopia.Lysimeter.Lysimeter2.Field.Report
          Soil: same as Ethiopia.Lysimeter.Lysimeter2.Field.soil
          Report HarvestReport: same as Ethiopia.Ofla.Ofla.Field.HarvestReport
          Manager TeffHarvesting: same as Ethiopia.Jamma.Jamma.Field.TeffHarvesting
          Plant Teff: CropType=Chickpea
          SoluteManager
    Experiment Mekelle2004
      Memo
        ;

        ### From

        Simulating yield response to water of Teff (Eragrostis tef) with FAOs AquaCrop

        model

        A. Araya a,b,*, S.D. Keesstra b, L. Stroosnijder b

        ###

        Field Crops Research 116 (2010) 196204
      Factors
        Factor N: Specifications=[NRate]
          Operations 0
            2004-07-05  [Fertiliser].Apply(0, Fertiliser.Types.UreaN, 10);
          Operations 1
            2004-07-05  [Fertiliser].Apply(70, Fertiliser.Types.UreaN, 10);
          Operations 2
            2004-07-05  [Fertiliser].Apply(105, Fertiliser.Types.UreaN, 10);
          Operations 0Split
            2004-07-05  [Fertiliser].Apply(0, Fertiliser.Types.UreaN, 10);
            2004-08-05  [Fertiliser].Apply(0, Fertiliser.Types.UreaN, 10);
          Operations 1Split
            2004-07-05  [Fertiliser].Apply(23, Fertiliser.Types.UreaN, 10);
            2004-08-05  [Fertiliser].Apply(47, Fertiliser.Types.UreaN, 10);
          Operations 2Split
            2004-07-05  [Fertiliser].Apply(35, Fertiliser.Types.UreaN, 10);
            2004-08-05  [Fertiliser].Apply(70, Fertiliser.Types.UreaN, 10);
      Simulation Mekelle2004
        Weather: FileName=mekelleGY.met
        Clock: StartDate=2004-07-05; EndDate=2004-12-31
        Summary summaryfile
        SoilArbitrator Soil Arbitrator
        Zone Field: Area=1; Slope=0
          MicroClimate: a_interception=0; b_interception=1; c_interception=0; d_interception=0; soil_albedo=0.23; sun_angle=15; soil_heat_flux_fraction=0.4; night_interception_fraction=0.5; refheight=2; albedo=0.15; emissivity=0.96; RadIntTotal=0
          Irrigation
          Fertiliser
          SurfaceOrganicMatter: same as Ethiopia.Jamma.Jamma.Field.SurfaceOrganicMatter
          Operations Sowing
            2004-07-05  [Teff].Sow(population:100., cultivar:"DZ974", depth:50, rowSpacing:250);
          Operations NRate
            2008-08-02  [Fertiliser].Apply(60, Fertiliser.Types.UreaN, 10);
          Operations IrrigationRate
            2004-08-05  [Irrigation].Apply(amount:30, depth:0,efficiency:1, willRunoff:false);
            Memo
              Note that the timing and volume of this supplemental irrigation are not known.  The authors simply inform the reader that supplemental irrigation was applied at stem elongation to avoid terminal water stress.
          Report: same as Ethiopia.Mekelle2008.Mekelle.Field.Report
          Soil: same as Ethiopia.Mekelle2008.Mekelle.Field.soil
          Report HarvestReport: same as Ethiopia.Mekelle2008.Mekelle.Field.HarvestReport
          Manager TeffHarvesting: same as Ethiopia.Jamma.Jamma.Field.TeffHarvesting
          Plant Teff: CropType=Chickpea
          SoluteManager
    Experiment Mekelle2005
      Memo
        ;

        ### From

        Simulating yield response to water of Teff (Eragrostis tef) with FAOs AquaCrop

        model

        A. Araya a,b,*, S.D. Keesstra b, L. Stroosnijder b

        ###

        Field Crops Research 116 (2010) 196204
      Factors
        Factor N: Specifications=[NRate]
          Operations 0
            2005-07-01  [Fertiliser].Apply(0, Fertiliser.Types.UreaN, 10);
          Operations 1
            2005-07-01  [Fertiliser].Apply(70, Fertiliser.Types.UreaN, 10);
          Operations 2
            2005-07-01  [Fertiliser].Apply(105, Fertiliser.Types.UreaN, 10);
          Operations 0Split
            2005-07-01  [Fertiliser].Apply(0, Fertiliser.Types.UreaN, 10);
            2005-08-01  [Fertiliser].Apply(0, Fertiliser.Types.UreaN, 10);
          Operations 1Split
            2005-07-01  [Fertiliser].Apply(23, Fertiliser.Types.UreaN, 10);
            2005-08-01  [Fertiliser].Apply(47, Fertiliser.Types.UreaN, 10);
          Operations 2Split
            2005-07-01  [Fertiliser].Apply(35, Fertiliser.Types.UreaN, 10);
            2005-08-01  [Fertiliser].Apply(70, Fertiliser.Types.UreaN, 10);
      Simulation Mekelle2005
        Weather: FileName=mekelleGY.met
        Clock: StartDate=2005-07-01; EndDate=2005-12-31
        Summary summaryfile
        SoilArbitrator Soil Arbitrator
        Zone Field: Area=1; Slope=0
          MicroClimate: a_interception=0; b_interception=1; c_interception=0; d_interception=0; soil_albedo=0.23; sun_angle=15; soil_heat_flux_fraction=0.4; night_interception_fraction=0.5; refheight=2; albedo=0.15; emissivity=0.96; RadIntTotal=0
          Irrigation
          Fertiliser
          SurfaceOrganicMatter: same as Ethiopia.Jamma.Jamma.Field.SurfaceOrganicMatter
          Operations Sowing
            2005-07-01  [Teff].Sow(population:100., cultivar:"DZ974", depth:50, rowSpacing:250);
          Operations NRate
            2008-08-02  [Fertiliser].Apply(60, Fertiliser.Types.UreaN, 10);
          Operations IrrigationRate
          Report: same as Ethiopia.Mekelle2008.Mekelle.Field.Report
          Soil: same as Ethiopia.Mekelle2008.Mekelle.Field.soil
          Report HarvestReport: same as Ethiopia.Mekelle2008.Mekelle.Field.HarvestReport
          Manager TeffHarvesting: same as Ethiopia.Jamma.Jamma.Field.TeffHarvesting
          Plant Teff: CropType=Chickpea
          SoluteManager
  Folder ControlledEnvironment
    Experiment VanDelden
      Factors
        Factor Cv: Specifications=[Sowing]
          Operations Gibe
            2000-01-01  [Teff].Sow(population:100., cultivar:"Gibe", depth:50, rowSpacing:250);
          Operations Ziquala
            2000-01-01  [Teff].Sow(population:100., cultivar:"Ziquala", depth:50, rowSpacing:250);
          Operations Ayana
            2000-01-01  [Teff].Sow(population:100., cultivar:"Ayana", depth:50, rowSpacing:250);
          Operations 04T19
            2000-01-01  [Teff].Sow(population:100., cultivar:"04T19", depth:50, rowSpacing:250);
        Factor PP: Specifications=[ControlledEnvironment]
          ControlledEnvironment 1: MaxT=23; MinT=16; Rain=0; Radn=25; PanEvap=5; VP=2; Wind=0; CO2=350; AirPressure=1010; Latitude=-2; DayLength=9
          ControlledEnvironment 2: MaxT=23; MinT=16; Rain=0; Radn=25; PanEvap=5; VP=2; Wind=0; CO2=350; AirPressure=1010; Latitude=-2; DayLength=10.5
          ControlledEnvironment 3: MaxT=23; MinT=16; Rain=0; Radn=25; PanEvap=5; VP=2; Wind=0; CO2=350; AirPressure=1010; Latitude=-2; DayLength=12
          ControlledEnvironment 4: MaxT=23; MinT=16; Rain=0; Radn=25; PanEvap=5; VP=2; Wind=0; CO2=350; AirPressure=1010; Latitude=-2; DayLength=13.5
          ControlledEnvironment 5: MaxT=23; MinT=16; Rain=0; Radn=25; PanEvap=5; VP=2; Wind=0; CO2=350; AirPressure=1010; Latitude=-2; DayLength=15
          ControlledEnvironment 6: MaxT=23; MinT=16; Rain=0; Radn=25; PanEvap=5; VP=2; Wind=0; CO2=350; AirPressure=1010; Latitude=-2; DayLength=16.5
      Simulation VanDelden
        Clock: StartDate=2000-01-01; EndDate=2000-12-31
        ControlledEnvironment: MaxT=23; MinT=16; Rain=0; Radn=25; PanEvap=5; VP=2; Wind=0; CO2=350; AirPressure=1010; Latitude=-2; DayLength=9
        Summary summaryfile
        SoilArbitrator Soil Arbitrator
        Zone Field: Area=1; Slope=0
          MicroClimate: a_interception=0; b_interception=1; c_interception=0; d_interception=0; soil_albedo=0.23; sun_angle=15; soil_heat_flux_fraction=0.4; night_interception_fraction=0.5; refheight=2; albedo=0.15; emissivity=0.96; RadIntTotal=0
          Irrigation
          Fertiliser
          SurfaceOrganicMatter: same as Ethiopia.Jamma.Jamma.Field.SurfaceOrganicMatter
          Operations Sowing
          Operations NRate
            1985-11-08  [Fertiliser].Apply(50, Fertiliser.Types.NH4NO3N, 10);
            1985-11-29  [Fertiliser].Apply(30, Fertiliser.Types.NH4NO3N, 10);
          Report: EventNames=[Clock].DoReport
            VariableNames:
              [Clock].Today
              [Teff].Phenology.DaysAfterSowing
              [Teff].Leaf.AppearedCohortNo
          Soil: same as Ethiopia.Ofla.Ofla.Field.soil
          Manager TeffHarvesting: same as Ethiopia.Jamma.Jamma.Field.TeffHarvesting
          Plant Teff: CropType=Chickpea
          Report HarvestReport: EventNames=[Teff].Harvesting
            VariableNames:
              [Clock].Today
              [Teff].Structure.MainStemFinalNodeNo
              [Teff].Leaf.AppearedCohortNo
              [Teff].Phenology.PanicleInitiationDAS.Value() as PanicleInitiationDAS
              [Teff].Phenology.FloweringDAS.Value() as FloweringDAS
              [Teff].Phenology.MaturityDAS.Value()  as MaturityDASS
              [ControlledEnvironment].DayLength
          SoluteManager
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