Simulations: Version=2
  Memo Introduction
    The APSIM Wheat model has been tested on a range of datasets to provide tests across a range of environmental conditions.
  Replacements
    Plant Wheat: CropType=Wheat
      Memo TitlePage
        # The APSIM Wheat Model

        _Brown, H.E., Huth, N.I. and Holzworth, D.P._

        The APSIM wheat model has been developed using the Plant Modelling Framework (PMF) of [brown_plant_2014]. This new framework provides a library of plant organ and process submodels that can be coupled, at runtime, to construct a model in much the same way that models can be coupled to construct a simulation. This means that dynamic composition of lower level process and organ classes (e.g. photosynthesis, leaf) into larger constructions (e.g. maize, wheat, sorghum) can be achieved by the model developer without additional coding.

        The model consists of:

        * a phenology model to simulate development between growth phases
        * a structure model to simulate plant morphology
        * a collection of organs to simulate the various plant parts
        * an arbitrator to allocate resources (N, biomass) to the various plant organs
      OrganArbitrator Arbitrator: NArbitrationOption=PriorityThenRelativeAllocation; DMArbitrationOption=PriorityThenRelativeAllocation
      Phenology
        MultiplyFunction ThermalTime
          PhaseLookup Temperature
            PhaseLookupValue SoilTemperature: Start=Sowing; End=TerminalSpikelet
              AirTemperatureFunction AirThermalTime
                XYPairs: X=[0, 26, 37]; Y=[0, 26, 0]
            PhaseLookupValue AirTemperature: Start=TerminalSpikelet; End=HarvestRipe
              AirTemperatureFunction AirThermalTime
                XYPairs: X=[0, 26, 37]; Y=[0, 26, 0]
          AddFunction DroughtPhenologyAcelleration
            Constant One: Value=1
            MultiplyFunction Stress
              Constant StressResponseCoefficient: Value=2
              LinearInterpolationFunction StressFactor: XProperty=[Wheat].WaterSupplyDemandRatio
                XYPairs: X=[0, 1]; Y=[0, 0]
        GerminatingPhase Germinating: Start=Sowing; End=Germination
        EmergingPhase Emerging: Start=Germination; End=Emergence; ShootLag=40; ShootRate=1.5
          VariableReference ThermalTime: VariableName=[Phenology].ThermalTime.Value
        GenericPhase Vegetative: Start=Emergence; End=TerminalSpikelet
          Constant Target: Value=401
          VariableReference ThermalTime: VariableName=[Phenology].ThermalTime.Value
          MinimumFunction Stress
            VariableReference VernalisationEffect: VariableName=[Phenology].Vernalisation.VernEff
            VariableReference PhotoperiodEffect: VariableName=[Phenology].Vernalisation.PhotopEff
        GenericPhase EarlyReproductive: Start=TerminalSpikelet; End=Flowering
          Constant Target: Value=555
          LinearInterpolationFunction ThermalTime: XProperty=[Vernalisation].CrownTemperature
            XYPairs: X=[0, 26, 34]; Y=[0, 26, 0]
          MultiplyFunction Stress
            MinimumFunction
              VariableReference: VariableName=[Vernalisation].VernEff
              VariableReference Variable1: VariableName=[Vernalisation].PhotopEff
        GenericPhase GrainDevelopment: Start=Flowering; End=StartGrainFill
          Constant Target: Value=120
          VariableReference ThermalTime: VariableName=[Phenology].ThermalTime.Value
        GenericPhase GrainFilling: Start=StartGrainFill; End=EndGrainFill
          Constant Target: Value=545
          VariableReference ThermalTime: VariableName=[Phenology].ThermalTime.Value
        GenericPhase Maturing: Start=EndGrainFill; End=Maturity
          Constant Target: Value=35
          VariableReference ThermalTime: VariableName=[Phenology].ThermalTime.Value
        GenericPhase Ripening: Start=Maturity; End=HarvestRipe
          Constant Target: Value=300
          VariableReference ThermalTime: VariableName=[Phenology].ThermalTime.Value
        EndPhase ReadyForHarvesting: Start=HarvestRipe; End=Unused
          VariableReference ThermalTime: VariableName=[Phenology].ThermalTime.Value
        PhotoperiodFunction Photoperiod: Twilight=-6
        VernalisationCW Vernalisation: VernSens=2.5; PhotopSens=2; StartStageForEffects=Emergence; EndStageForEffects=TerminalSpikelet; StartStageForCumulativeVD=Germination; EndStageForCumulativeVD=TerminalSpikelet
          AirTemperatureFunction VDModel
            XYPairs: X=[0, 2, 15]; Y=[0, 1, 0]
          PhotoperiodFunction Photoperiod: Twilight=-6
        ZadokPMF Zadok
      Structure: InitialiseStage=Emergence; PrimaryBudNo=1
        PhaseLookup MainStemPrimordiaInitiationRate
          PhaseLookupValue VegetativePrimordiaInitiationRate: Start=Emergence; End=TerminalSpikelet
            DivideFunction RelativeToPyllochron
              VariableReference Phyllochron
                VariableName=[Structure].MainStemNodeAppearanceRate.BasePhyllochron.Value
              Constant PrimordiaPerMainstemNode: Value=1.1
          Memo Rational
            [Brown_Anthesis_2013] showed final leaf number (FLN) could be estimated as 2.86 + HSTS * 1.1 where HS<sup>TS</sup> is the the Haun stage at terminal spikelet.  To caputre this in the wheat model we have set the initial number of primordia (determined by the number of initialleaf objects on the leaf class) to 3 and have set this function to produce primordia 10% faster than mainstem leaves.  Primordia are initiated until the therminal spikelet stage and then the number remains fixed, giving final leaf number.
        MultiplyFunction MainStemNodeAppearanceRate
          LinearInterpolationFunction LeafStageFactor: XProperty=[Structure].MainStemNodeNo
            XYPairs: X=[0, 2, 3, 7, 8, 14]; Y=[0.6, 0.6, 1, 1, 1.3, 1.3]
          Constant BasePhyllochron: Value=100
          Memo Rational
            Based on [Jamieson_SIRIUS_1998] where leaf appearace could be described by a base phyllochron determined between leaves 2 and 7 and a phyllochron that was 70% of base phyllochron for leaves < 2 and 130% of base phyllochron for leaves > 7
        HeightFunction HeightModel
          LinearInterpolationFunction PotentialHeight: XProperty=[Phenology].Stage
            XYPairs: X=[3, 4, 4.8, 6, 7]; Y=[10, 50, 100, 1100, 1200]
          LinearInterpolationFunction WaterStress: XProperty=[Wheat].WaterSupplyDemandRatio
            XYPairs: X=[0.3, 1]; Y=[0, 1]
        MultiplyFunction BranchingRate
          PhaseLookup PotentialBranchingRate
            PhaseLookupValue Vegetative: Start=Emergence; End=TerminalSpikelet
              LinearInterpolationFunction PotentialBranchingRate: XProperty=[Leaf].AppearedCohortNo
                XYPairs: X=[1, 2, 5, 14]; Y=[0, 1, 2, 2]
            PhaseLookupValue Reproductive: Start=TerminalSpikelet; End=HarvestRipe
              Constant Zero: Value=0
          MinimumFunction StressFactors
            LinearInterpolationFunction WaterStress: XProperty=[Wheat].WaterSupplyDemandRatio
              XYPairs: X=[0, 1]; Y=[0, 1]
            LinearInterpolationFunction Shading: XProperty=[Leaf].CoverGreen
              XYPairs: X=[0, 0.6, 0.7]; Y=[1, 1, 0]
            LinearInterpolationFunction Nitrogen: XProperty=[Arbitrator].FN
              XYPairs: X=[0, 1.5, 2]; Y=[1, 1, 1]
            LinearInterpolationFunction Biomass: XProperty=[Arbitrator].FDM
              XYPairs: X=[0.4, 0.8, 1]; Y=[1, 1, 1]
        PhaseLookup ShadeInducedBranchMortality
          PhaseLookupValue Vegetative: Start=Emergence; End=StartGrainFill
            LinearInterpolationFunction ShadeInducedBranchMortality: XProperty=[Leaf].CoverGreen
              XYPairs: X=[0, 0.98, 0.99, 1]; Y=[0, 0, 0.01, 0.01]
        PhaseLookup DroughtInducedBranchMortality
          PhaseLookupValue Vegetative: Start=Emergence; End=StartGrainFill
            LinearInterpolationFunction DroughtInducedBranchMortality: XProperty=[Wheat].WaterSupplyDemandRatio
              XYPairs: X=[0.1, 0.6]; Y=[0.1, 0]
        VariableReference ThermalTime: VariableName=[Phenology].ThermalTime.Value
        Constant MaximumMainStemNodeNumber: Value=18
        MainStemFinalNodeNumberFunction MainStemFinalNodeNumber: MaximumMainStemNodeNumber=30
          OnEventFunction FinalLeafNumber: SetEvent=TerminalSpikelet
            Constant PreEventValue: Value=26
            VariableReference PostEventValue: VariableName=[Structure].MainStemPrimordiaNo
      ReproductiveOrgan Grain: FractionRemoved=0; FractionToResidue=0; RipeStage=Ripe
        Biomass Live
        Biomass Dead
        Constant MaxNConcDailyGrowth: Value=0.03
        Constant WaterContent: Value=0.12
        Constant MinimumNConc: Value=0.006
        Constant MaximumNConc: Value=0.022
        Constant MaximumPotentialGrainSize: Value=0.043; Units=g
        PhaseBasedSwitch NitrogenDemandSwitch: Start=Germination; End=Maturity
        AccumulateFunction AccumThermalTime: StartStageName=Flowering; EndStageName=Maturity
          VariableReference DailyThermalTimeValue: VariableName=[Phenology].ThermalTime.Value
        AirTemperatureFunction FillingRate
          XYPairs: X=[0, 26, 30, 35]; Y=[0, 0.0015, 0.0015, 0.0015]
        PhaseLookup DMDemandFunction
          PhaseLookupValue InitialPhase: Start=Flowering; End=StartGrainFill
            FillingRateFunction
              VariableReference GrainNumber: VariableName=[Grain].NumberFunction.Value
              VariableReference FillingDuration: VariableName=[Phenology].GrainDevelopment.Target.Value
              VariableReference ThermalTime: VariableName=[Phenology].ThermalTime.Value
              MultiplyFunction PotentialSizeIncrement
                VariableReference InitialProportion: VariableName=[Grain].InitialGrainProportion.Value
                VariableReference MaximumSize: VariableName=[Grain].MaximumPotentialGrainSize.Value
          PhaseLookupValue LinearPhase: Start=StartGrainFill; End=EndGrainFill
            FillingRateFunction
              VariableReference GrainNumber: VariableName=[Grain].NumberFunction.Value
              VariableReference FillingDuration: VariableName=[Phenology].GrainFilling.Target.Value
              VariableReference ThermalTime: VariableName=[Phenology].ThermalTime.Value
              MultiplyFunction PotentialSizeIncrement
                SubtractFunction ProportionLinearPhase
                  Constant One: Value=1
                  VariableReference InitialProportion: VariableName=[Grain].InitialGrainProportion.Value
                VariableReference MaximumSize: VariableName=[Grain].MaximumPotentialGrainSize.Value
        MultiplyFunction NumberFunction
          Constant GrainsPerGramGrowth: Value=30; Units=/g
          VariableReference GrowthRate: VariableName=[Grain].GrowthGrainDevelopment.Value
        ExpressionFunction Protein
          Expression=([Grain].Live.N + [Grain].Dead.N)/([Grain].Live.Wt + [Grain].Dead.Wt) * 100 * 5.71
        AccumulateFunction GrowthGrainDevelopment: StartStageName=TerminalSpikelet; EndStageName=StartGrainFill
          VariableReference DailyBiomassProduction: VariableName=[Arbitrator].DMSupply
        Constant InitialGrainProportion: Value=0.1
        PhaseLookup NFillingRate
          PhaseLookupValue GrainFilling: Start=Flowering; End=EndGrainFill
            FillingRateFunction
              VariableReference GrainNumber: VariableName=[Grain].NumberFunction.Value
              AddFunction FillingDuration
                VariableReference FloweringToGrainFilling: VariableName=[Phenology].GrainDevelopment.Target.Value
                VariableReference GrainFilling: VariableName=[Phenology].GrainFilling.Target.Value
              VariableReference ThermalTime: VariableName=[Phenology].ThermalTime.Value
              MultiplyFunction PotentialSizeIncrement
                Constant MaximumFinalNConc: Value=0.026; Units=g/g
                VariableReference MaximumSize: VariableName=[Grain].MaximumPotentialGrainSize.Value
      Root: FractionRemoved=0; FractionToResidue=0; InitialDM=0.2; SpecificRootLength=40000; KNO3_yProperty=[0.03, 0.03]; KNO3_xRootLength=[0, 0.003]; KNH4_yProperty=[0, 0]; KNH4_xRootLength=[0, 0.003]; NuptakeSupply=0
        CompositeBiomass Live: Propertys=[[Root].LayerLive]
        CompositeBiomass Dead: Propertys=[[Root].LayerDead]
        LinearInterpolationFunction KLModifier: XProperty=[Leaf].LAI
          XYPairs: X=[0, 3]; Y=[1, 1]
        Constant SoilWaterEffect: Value=1
        AirTemperatureFunction TemperatureEffect
          XYPairs: X=[0, 26, 35]; Y=[1, 1, 1]
        Constant MaxDailyNUptake: Value=20
        Constant SenescenceRate: Value=0
        Constant StructuralFraction: Value=1
        Constant MaximumNConc: Value=0.01
        Constant MinimumNConc: Value=0.01
        Constant PartitionFraction: Value=0.1
        PhaseLookup RootFrontVelocity
          PhaseLookupValue PreEmergence: Start=Germination; End=Emergence
            Constant Function: Value=5
          PhaseLookupValue PostEmergence: Start=Emergence; End=Maturity
            Constant Function: Value=20
        PhaseBasedSwitch NitrogenDemandSwitch: Start=Germination; End=Maturity
      Leaf: MaxCover=1; Albedo=0.26; Gsmax=0.011; R50=200; KDead=0.3
        zero: FractionRemoved, FractionToResidue, CurrentExpandingLeaf, StartFractionExpanded, FractionNextleafExpanded, _ExpandedNodeNo, DeadNodesYesterday, FRGR, PotentialEP, FractionDied
        LeafCohort InitialLeaves[1]: Rank=1; Area=200
        LeafCohort InitialLeaves[2]: Rank=2; Area=0
        LeafCohort InitialLeaves[3]: Rank=3; Area=0
        CompositeBiomass Live: Propertys=[[Leaf].CohortLive]
        CompositeBiomass Dead: Propertys=[[Leaf].CohortDead]
        ArrayBiomass CohortArrayLive: Propertys=[[Leaf].Live]; ArraySize=[Leaf].MaxNodeNo
        ArrayBiomass CohortArrayDead: Propertys=[[Leaf].Dead]; ArraySize=[Leaf].MaxNodeNo
        LeafCohortParameters CohortParameters
          Constant NReallocationFactor: Value=0.05
          Constant NRetranslocationFactor: Value=0.1
          Constant DMReallocationFactor: Value=1
          Constant DMRetranslocationFactor: Value=0.5
          LinearInterpolationFunction CellDivisionStress: XProperty=[Wheat].WaterSupplyDemandRatio
            XYPairs: X=[0.5, 1]; Y=[0.1, 1]
          LinearInterpolationFunction ExpansionStress: XProperty=[Wheat].WaterSupplyDemandRatio
            XYPairs: X=[0.3, 1]; Y=[0, 1]
          VariableReference GrowthDuration: VariableName=[Structure].MainStemNodeAppearanceRate.Value
          MultiplyFunction LagDuration
            Constant Multiplier: Value=4
            VariableReference Phyllochron: VariableName=[Structure].MainStemNodeAppearanceRate.Value
          MultiplyFunction SenescenceDuration
            Constant Multiplier: Value=1
            VariableReference Phyllochron: VariableName=[Structure].MainStemNodeAppearanceRate.Value
          Constant DetachmentLagDuration: Value=1000000
          Constant DetachmentDuration: Value=1000000
          Constant RelativeBranchLeafSize: Value=1
          Constant MaximumNConc: Value=0.063
          Constant CriticalNConc: Value=0.05
          Constant MinimumNConc: Value=0.01
          AddFunction DroughtInducedSenAcceleration
            Constant One: Value=1
            MultiplyFunction Stress
              Constant StressResponseCoefficient: Value=1
              LinearInterpolationFunction StressFactor: XProperty=[Wheat].WaterSupplyDemandRatio
                XYPairs: X=[0, 0.7]; Y=[1, 0]
          LinearInterpolationFunction SpecificLeafAreaMax: XProperty=[Structure].RelativeNodeApperance
            XYPairs: X=[0, 1]; Y=[22000, 22000]
          LinearInterpolationFunction SpecificLeafAreaMin: XProperty=[Structure].RelativeNodeApperance
            XYPairs: X=[0, 0.5, 1]; Y=[10000, 20000, 20000]
          Constant InitialNConc: Value=0
          Constant StructuralFraction: Value=0.5
          Constant NonStructuralFraction: Value=0
          LinearInterpolationFunction ShadeInducedSenescenceRate: XProperty=[Leaf].CohortCurrentRankCoverAbove
            XYPairs: X=[0, 0.7, 0.8, 0.97, 0.98]; Y=[0, 0, 0, 0, 0]
          LinearInterpolationFunction MaxArea: XProperty=[Structure].RelativeNodeApperance
            XYPairs: X=[0, 0.3, 0.5, 0.7, 1]; Y=[300, 1000, 1600, 2600, 2600]
          Constant LeafSizeShapeParameter: Value=0.3
        RUEModel Photosynthesis
          Constant RUE: Value=1.37
          WeightedTemperatureFunction FT: MaximumTemperatureWeighting=0.5
            XYPairs: X=[0, 10, 25, 35]; Y=[0, 1, 1, 0]
          LinearInterpolationFunction FVPD: XProperty=[Leaf].Photosynthesis.VPD
            XYPairs: X=[0, 10, 50]; Y=[1, 1, 1]
          LinearInterpolationFunction FN: XProperty=[Leaf].Fn
            XYPairs: X=[0, 1, 1.5]; Y=[0, 1, 1]
          LinearInterpolationFunction FW: XProperty=[Leaf].Fw
            XYPairs: X=[0, 0.3]; Y=[0, 1]
          RUECO2Function FCO2: PhotosyntheticPathway=C3
          VariableReference RadnInt: VariableName=[Leaf].RadIntTot
        MultiplyFunction ExtinctionCoeff
          LinearInterpolationFunction PotentialExtinctionCoeff: XProperty=[Leaf].LAI
            XYPairs: X=[0, 0.5]; Y=[0.5, 0.5]
          LinearInterpolationFunction WaterStress: XProperty=[Wheat].WaterSupplyDemandRatio
            XYPairs: X=[0, 0.7]; Y=[0.5, 1]
        LinearInterpolationFunction FrostFraction: XProperty=[Weather].MinT
          XYPairs: X=[-1, 0]; Y=[0, 0]
        VariableReference ThermalTime: VariableName=[Phenology].ThermalTime.Value
        MinimumFunction FRGRFunction
          VariableReference RUE_FT: VariableName=[Leaf].Photosynthesis.FT.Value
          MinimumFunction Others
            VariableReference RUE_FN: VariableName=[Leaf].Photosynthesis.FN.Value
            VariableReference RUE_FVPD: VariableName=[Leaf].Photosynthesis.FVPD.Value
      GenericAboveGroundOrgan Spike: FractionRemoved=0; FractionToResidue=0
        PopulationBasedDemandFunction DMDemandFunction
          VariableReference ThermalTime: VariableName=[Phenology].ThermalTime.Value
          Constant ExpansionStress: Value=1
          VariableReference OrganPopulation: VariableName=[Spike].HeadNumber.Value
          Constant StartStage: Value=5.2
          Constant MaximumOrganWt: Value=0.7
          Constant GrowthDuration: Value=453
        Biomass Live
        Biomass Dead
        Constant NReallocationFactor: Value=0
        Constant NRetranslocationFactor: Value=0.1
        Constant MaximumNConc: Value=0.01
        Constant StructuralFraction: Value=1
        Constant MinimumNConc: Value=0.01
        MultiplyFunction HeadNumber
          Constant FertileTillers: Value=1
          VariableReference StemPopulation: VariableName=[Structure].TotalStemPopn
      GenericAboveGroundOrgan Stem: FractionRemoved=0; FractionToResidue=0
        Biomass Live
        Biomass Dead
        MinimumFunction DMDemandFunction
          MultiplyFunction NodeNumberLimitedDemand
            LinearInterpolationFunction SpecificStemDensityMax: XProperty=[Phenology].Stage
              XYPairs: X=[3, 4, 4.1, 5]; Y=[0, 10, 40, 40]
            VariableReference DeltaNodes: VariableName=[Structure].DeltaNodeNumber
            VariableReference Stems: VariableName=[Structure].TotalStemPopn
          MultiplyFunction HeightLimitedDemand
            Constant SpecificStemLengthMax: Value=0.022
            VariableReference DeltaHeight: VariableName=[Structure].HeightModel.DeltaHeight
            VariableReference Stems: VariableName=[Structure].TotalStemPopn
        Constant StructuralFraction: Value=0.7
        LinearInterpolationFunction MaximumNConc: XProperty=[Phenology].Stage
          XYPairs: X=[3, 4, 5]; Y=[0.06, 0.02, 0.015]
        LinearInterpolationFunction MinimumNConc: XProperty=[Phenology].Stage
          XYPairs: X=[3, 4, 5]; Y=[0.015, 0.01, 0.003]
        PhaseBasedSwitch NitrogenDemandSwitch: Start=Emergence; End=StartGrainFill
        Constant NReallocationFactor: Value=0
        Constant NRetranslocationFactor: Value=0.5
        Constant DMRetranslocationFactor: Value=0.5
      CompositeBiomass AboveGround
        Propertys=[[Leaf].Live, [Leaf].Dead, [Stem].Live, [Stem].Dead, [Spike].Live, [Spike].Dead, [Grain].Live, [Grain].Dead]
      CompositeBiomass BelowGround: Propertys=[[Root].Live, [Root].Dead]
      CompositeBiomass Total
        Propertys=[[Leaf].Live, [Leaf].Dead, [Stem].Live, [Stem].Dead, [Root].Live, [Root].Dead, [Spike].Live, [Spike].Dead, [Grain].Live, [Grain].Dead]
      CompositeBiomass TotalLive
        Propertys=[[Leaf].Live, [Stem].Live, [Root].Live, [Spike].Live, [Grain].Live]
      CompositeBiomass TotalDead
        Propertys=[[Leaf].Dead, [Stem].Dead, [Root].Dead, [Spike].Dead, [Grain].Dead]
      CompositeBiomass AboveGroundLive: Propertys=[[Leaf].Live, [Stem].Live, [Spike].Live, [Grain].Live]
      Cultivar Wakanui
        Command:
          [Phenology].Vernalisation.VernSens = 4
          [Phenology].Vernalisation.PhotopSens = 3
          [Structure].MainStemNodeAppearanceRate.BasePhyllochron.Value = 120
      Cultivar GattonHartog
        Command:
          [Phenology].Vernalisation.VernSens = 2.5
          [Phenology].Vernalisation.PhotopSens = 3.5
      Cultivar h45
        Command:
          [Phenology].Vernalisation.VernSens = 1.5
          [Phenology].Vernalisation.PhotopSens = 1.5
      Cultivar Rongotea
        Command:
          [Phenology].Vernalisation.VernSens = 2.0
          [Phenology].Vernalisation.PhotopSens = 4.0
          [Grain].MaximumPotentialGrainSize.Value = 1
      Cultivar Hartog
        Command:
          [Phenology].Vernalisation.VernSens = 1.5
          [Phenology].Vernalisation.PhotopSens = 3.0
      Cultivar Gamenya
        Command:
          [Phenology].Vernalisation.VernSens = 1.6
          [Phenology].Vernalisation.PhotopSens = 2.0
          [Phenology].EarlyReproductive.Target.Value = 630.0
      Cultivar Spear
        Command:
          [Phenology].Vernalisation.VernSens = 1.5
          [Phenology].Vernalisation.PhotopSens = 3.5
          [Grain].MaximumPotentialGrainSize.Value = 1
          [Phenology].GrainFilling.Target.Value = 580
          [Phenology].EarlyReproductive.Target.Value = 555.0
      Cultivar Gutha
        Command:
          [Phenology].Vernalisation.VernSens = 1.5
          [Phenology].Vernalisation.PhotopSens = 3.0
      Cultivar Wilgoyne
        Command:
          [Phenology].Vernalisation.VernSens = 1.4
          [Phenology].Vernalisation.PhotopSens = 1.8
          [Grain].MaximumPotentialGrainSize.Value = 1
          [Phenology].GrainFilling.Target.Value = 580
          [Phenology].EarlyReproductive.Target.Value = 555.0
      Cultivar BattenWinter
        Command:
          [Phenology].Vernalisation.VernSens = 2.0
          [Phenology].Vernalisation.PhotopSens = 4.0
          [Grain].MaximumPotentialGrainSize.Value = 1
      Cultivar Bolac
        Command:
          [Phenology].Vernalisation.VernSens = 2.5
          [Phenology].Vernalisation.PhotopSens = 4.0
      Cultivar EGAGregory
        Command:
          [Phenology].Vernalisation.VernSens = 2.7
          [Phenology].Vernalisation.PhotopSens = 3.2
      Cultivar Kelallac
        Command:
          [Phenology].Vernalisation.VernSens = 2.5
          [Phenology].Vernalisation.PhotopSens = 4.0
      Cultivar Mckellar
        Command:
          [Phenology].Vernalisation.VernSens = 5.0
          [Phenology].Vernalisation.PhotopSens = 4.0
      Cultivar Kennedy
        Command:
          [Phenology].Vernalisation.VernSens = 2.5
          [Phenology].Vernalisation.PhotopSens = 4.0
      Cultivar Derrimut
        Command:
          [Phenology].Vernalisation.VernSens = 1.5
          [Phenology].Vernalisation.PhotopSens = 3.5
      Cultivar Janz
        Command:
          [Phenology].Vernalisation.VernSens = 1.5
          [Phenology].Vernalisation.PhotopSens = 3.5
      Cultivar Gladius
        Command:
          [Phenology].Vernalisation.VernSens = 1.5
          [Phenology].Vernalisation.PhotopSens = 3.0
      Cultivar Ventura
        Command:
          [Phenology].Vernalisation.VernSens = 1.5
          [Phenology].Vernalisation.PhotopSens = 3.0
      Cultivar Young
        Command:
          [Phenology].Vernalisation.VernSens = 2.3
          [Phenology].Vernalisation.PhotopSens = 3.2
      Cultivar Yitpi
        Command:
          [Phenology].Vernalisation.VernSens = 1.5
          [Phenology].Vernalisation.PhotopSens = 3.0
      Cultivar Ruby
        Command:
          [Phenology].Vernalisation.VernSens = 2.3
          [Phenology].Vernalisation.PhotopSens = 3.2
      Cultivar Wyalkatchem
        Command:
          [Phenology].Vernalisation.VernSens = 2.3
          [Phenology].Vernalisation.PhotopSens = 3.2
          [Phenology].EarlyReproductive.Target.Value = 380
      Cultivar Wedgetail
        Command:
          [Phenology].Vernalisation.VernSens = 3.9
          [Phenology].Vernalisation.PhotopSens = 3.9
      Cultivar H46
        Command:
          [Phenology].Vernalisation.VernSens = 1.5
          [Phenology].Vernalisation.PhotopSens = 1.5
      Cultivar Mercury
        Command:
          [Phenology].Vernalisation.VernSens = 1.5
          [Phenology].Vernalisation.PhotopSens = 2.5
      Cultivar Gregory
        Command:
          [Phenology].Vernalisation.VernSens = 2.7
          [Phenology].Vernalisation.PhotopSens = 3.2
      Cultivar Livingston
        Command:
          [Phenology].Vernalisation.VernSens = 2.3
          [Phenology].Vernalisation.PhotopSens = 3.2
      Cultivar ega_gregory
        Command:
          [Phenology].Vernalisation.VernSens = 2.7
          [Phenology].Vernalisation.PhotopSens = 3.2
      Cultivar hartog1
        Command:
          [Phenology].Vernalisation.VernSens = 1.5
          [Phenology].Vernalisation.PhotopSens = 3.0
    Plant Maize: CropType=Maize
      Memo TitlePage
        # The APSIM Maize Model

        _Brown, H.E., Teixeira, E.I., Huth, N.I. and Holzworth, D.P._

        The APSIM maize model has been developed using the Plant Modelling Framework (PMF) of [brown_plant_2014]. This new framework provides a library of plant organ and process submodels that can be coupled, at runtime, to construct a model in much the same way that models can be coupled to construct a simulation. This means that dynamic composition of lower level process and organ classes (e.g. photosynthesis, leaf) into larger constructions (e.g. maize, wheat, sorghum) can be achieved by the model developer without additional coding.

        The model consists of:

        * a phenology model to simulate development between growth phases
        * a structure model to simulate plant morphology
        * a collection of organs to simulate the various plant parts
        * an arbitrator to allocate resources (N, biomass) to the various plant organs
      OrganArbitrator Arbitrator: NArbitrationOption=RelativeAllocation; DMArbitrationOption=RelativeAllocation
      Phenology
        MultiplyFunction ThermalTime
          AirTemperatureFunction BaseThermalTime
            XYPairs: X=[0, 18, 26, 34, 44]; Y=[0, 10, 18, 26, 0]
        GerminatingPhase Germinating: Start=Sowing; End=Germination
        EmergingPhase Emerging: Start=Germination; End=Emergence; ShootLag=55; ShootRate=0.6
          VariableReference ThermalTime: VariableName=[Phenology].ThermalTime.Value
        GenericPhase Juvenile: Start=Emergence; End=EndJuvenile
          Constant Target: Value=200; Units=deg day
          VariableReference ThermalTime: VariableName=[Phenology].ThermalTime.Value
        GenericPhase Photosensitive: Start=EndJuvenile; End=FloralInitiation
          VariableReference ThermalTime: VariableName=[Phenology].ThermalTime.Value
          LinearInterpolationFunction Target: XProperty=[Phenology].Photoperiod.Value
            Memo
              The photoperiod is likely to vary with individual maize cultivars.  Therefore, the response shown here is indicative only.  See the descriptions of individual cultivars for more detail on photoperiod responses used by the maize model.
            XYPairs: X=[0, 12.5, 24]; Y=[0, 0, 10]
        LeafAppearancePhase LeafAppearance: Start=FloralInitiation; End=FlagLeaf
          VariableReference ThermalTime: VariableName=[Phenology].ThermalTime.Value
        GenericPhase FlagLeafToFlowering: Start=FlagLeaf; End=Flowering
          Constant Target: Value=50; Units=deg day
          VariableReference ThermalTime: VariableName=[Phenology].ThermalTime.Value
        GenericPhase FloweringToGrainFilling: Start=Flowering; End=StartGrainFill
          Constant Target: Value=120; Units=deg day
          VariableReference ThermalTime: VariableName=[Phenology].ThermalTime.Value
        GenericPhase GrainFilling: Start=StartGrainFill; End=EndGrainFill
          Constant Target: Value=550; Units=deg day
          VariableReference ThermalTime: VariableName=[Phenology].ThermalTime.Value
        GenericPhase Maturing: Start=EndGrainFill; End=Maturity
          Constant Target: Value=10; Units=deg day
          VariableReference ThermalTime: VariableName=[Phenology].ThermalTime.Value
        GenericPhase MaturityToHarvestRipe: Start=Maturity; End=HarvestRipe
          Constant Target: Value=10; Units=deg day
          VariableReference ThermalTime: VariableName=[Phenology].ThermalTime.Value
        EndPhase ReadyForHarvesting: Start=HarvestRipe; End=Unused
          VariableReference ThermalTime: VariableName=[Phenology].ThermalTime.Value
        PhotoperiodFunction Photoperiod: Twilight=-6
        OnEventFunction FloweringDAS: SetEvent=Flowering; ReSetEvent=never
          Memo
            A function is used to provide flowering date as days after sowing(DAS).
          Constant PreEventValue: Value=0
          VariableReference PostEventValue: VariableName=[Phenology].DaysAfterSowing
        OnEventFunction MaturityDAS: SetEvent=Maturity; ReSetEvent=never
          Memo
            A function is used to provide maturity date as days after sowing(DAS).
          Constant PreEventValue: Value=0
          VariableReference PostEventValue: VariableName=[Phenology].DaysAfterSowing
      Structure: InitialiseStage=Emergence; PrimaryBudNo=1
        Memo
          Though tillering is common in some maize varieties under certain agronomic conditions, no tillering is accounted for within this model.  Therefore all branching has been parameterised out of the current maize model.
        VariableReference ThermalTime: VariableName=[Phenology].ThermalTime.Value
        PhaseLookup MainStemPrimordiaInitiationRate
          PhaseLookupValue Plastochron: Start=Emergence; End=FloralInitiation
            MultiplyFunction Plastochron
              VariableReference Phyllochron: VariableName=[Structure].MainStemNodeAppearanceRate.Value
              Constant LeafTipsPerPrimordia: Value=0.5
        PhaseLookup MainStemNodeAppearanceRate
          PhaseLookupValue Phyllochron: Start=Emergence; End=FlagLeaf
            LinearInterpolationFunction Phyllochron: XProperty=[Structure].MainStemNodeNo
              XYPairs: X=[1, 3.4, 4]; Y=[30, 30, 42]
        MainStemFinalNodeNumberFunction MainStemFinalNodeNumber: MaximumMainStemNodeNumber=30
          OnEventFunction FinalLeafNumber: SetEvent=FloralInitiation
            AddFunction PreEventValue
              Constant PrimordiaAtEmergence: Value=6
              DivideFunction PrimordiaDuringJuvenilePhase
                VariableReference JuvenilePhaseDuration: VariableName=[Phenology].Juvenile.Target.Value
                Constant ApproximatePlastochron: Value=15
            VariableReference PostEventValue: VariableName=[Structure].MainStemPrimordiaNo
        HeightFunction HeightModel
          LinearInterpolationFunction PotentialHeight: XProperty=[Phenology].Stage
            XYPairs: X=[3, 4, 5, 6]; Y=[20, 400, 450, 1700]
          LinearInterpolationFunction WaterStress: XProperty=[Maize].WaterSupplyDemandRatio
            XYPairs: X=[0, 0.6]; Y=[0, 1]
        Constant BranchingRate: Value=0
        Constant ShadeInducedBranchMortality: Value=0
        Constant DroughtInducedBranchMortality: Value=0
      ReproductiveOrgan Grain: FractionRemoved=0; FractionToResidue=0
        Constant InitialGrainProportion: Value=0.05
        Constant MaximumPotentialGrainSize: Value=0.3; Units=g
        Constant MaximumGrainsPerCob: Value=700; Units=number
        PhaseLookup DMDemandFunction
          PhaseLookupValue InitialPhase: Start=Flowering; End=StartGrainFill
            FillingRateFunction
              VariableReference GrainNumber: VariableName=[Grain].NumberFunction.Value
              VariableReference FillingDuration: VariableName=[Phenology].FloweringToGrainFilling.Target.Value
              VariableReference ThermalTime: VariableName=[Phenology].ThermalTime.Value
              MultiplyFunction PotentialSizeIncrement
                VariableReference InitialProportion: VariableName=[Grain].InitialGrainProportion.Value
                VariableReference MaximumSize: VariableName=[Grain].MaximumPotentialGrainSize.Value
          PhaseLookupValue LinearPhase: same as Replacements.Wheat.Grain.DMDemandFunction.LinearPhase
        Biomass Live
        Biomass Dead
        Constant MinimumNConc: Value=0.008; Units=g/g
        PhaseLookup MaximumNConc
          PhaseLookupValue InitialPhase: Start=Flowering; End=StartGrainFill
            Constant InitialNconc: Value=0.05
          PhaseLookupValue LinearPhase: Start=StartGrainFill; End=EndGrainFill
            Constant FinalNconc: Value=0.013
        Constant WaterContent: Value=0.12; Units=g/g
        PhaseLookup NFillingRate
          PhaseLookupValue GrainFilling: Start=Flowering; End=EndGrainFill
            FillingRateFunction
              VariableReference GrainNumber: VariableName=[Grain].NumberFunction.Value
              AddFunction FillingDuration
                VariableReference FloweringToGrainFilling: VariableName=[Phenology].FloweringToGrainFilling.Target.Value
                VariableReference GrainFilling: VariableName=[Phenology].GrainFilling.Target.Value
              VariableReference ThermalTime: VariableName=[Phenology].ThermalTime.Value
              MultiplyFunction PotentialSizeIncrement
                Constant MaximumFinalNConc: Value=0.013
                VariableReference MaximumSize: VariableName=[Grain].MaximumPotentialGrainSize.Value
        MultiplyFunction NumberFunction
          VariableReference PotentialGrainNumber: VariableName=[MaximumGrainsPerCob].Value
          LinearInterpolationFunction GrowthRateFactor: XProperty=[GrowthRateGrainDevelopment].Value
            XYPairs: X=[0.55, 3.3, 6.6, 10]; Y=[0, 0.6, 1, 1]
          VariableReference Population: VariableName=[Maize].Population
        ExpressionFunction YieldBuPerAcre: Expression=[Grain].Live.Wt * 10 * 56 * 0.4536 * 2.471
        AccumulateFunction GrowthGrainDevelopment: StartStageName=FlagLeaf; EndStageName=StartGrainFill
          VariableReference DailyBiomassProduction: VariableName=[Arbitrator].DMSupply
        AccumulateFunction DaysGrainDevelopment: StartStageName=FlagLeaf; EndStageName=StartGrainFill
          Constant LenthOfADay: Value=1; Units=days/day
        DivideFunction GrowthRateGrainDevelopment
          VariableReference AccumulatedGrowth: VariableName=[GrowthGrainDevelopment].Value
          VariableReference GrowthDuration: VariableName=[DaysGrainDevelopment].Value
          VariableReference Population: VariableName=[Maize].Population
      Root: FractionRemoved=0; FractionToResidue=0; InitialDM=0.2; SpecificRootLength=40000; KNO3_yProperty=[0.03, 0.03]; KNO3_xRootLength=[0.003, 0.003]; KNH4_yProperty=[0, 0.0003]; KNH4_xRootLength=[0, 0.003]; NuptakeSupply=0
        CompositeBiomass Live: Propertys=[[Root].LayerLive]
        CompositeBiomass Dead: Propertys=[[Root].LayerDead]
        LinearInterpolationFunction KLModifier: XProperty=[Maize].Population
          Memo
            The parameter KL is is described by Meinke et al (1993) to combine elements of soil conductivity (K) with root length (L) in determining root water uptake.  Peake et al (2013) demonstrated that in maize KL varied with plant population through impacts on root length density.  Here we adjust KL linearly with plant population.
          XYPairs: X=[0, 10]; Y=[1, 1]
        Constant SoilWaterEffect: Value=1
          Memo
            No effect of soil water content on root growth is currently captured in the model.
        Constant TemperatureEffect: Value=1
          Memo
            No effect of temperature on root growth is currently captured in the model.
        Constant MaxDailyNUptake: Value=20; Units=g/m2/d
          Memo
            Maximum daily N uptake is set to an arbitrarily high value.
        Constant SenescenceRate: Value=0.005; Units=/d
          Memo
            Jones and Kiniry (1986) used a constant root senescence fraction in the CERES-Maize model.
        Constant StructuralFraction: Value=1
        Constant MaximumNConc: Value=0.01; Units=g/g
        Constant MinimumNConc: Value=0.01; Units=g/g
        LinearInterpolationFunction PartitionFraction: XProperty=[Phenology].Stage
          XYPairs: X=[0, 2.99, 3, 6, 7]; Y=[0, 0, 0.2, 0.2, 0]
        PhaseLookup RootFrontVelocity
          Memo
            [Hammer_etal_2009] used a constant extraction front velocity of 2.5cm per day in their analysis of historical maize yield trends in the US corn belt.
          PhaseLookupValue PreFlowering: Start=Germination; End=Flowering
            Constant RootFrontVelocity: Value=25; Units=mm/d
          PhaseLookupValue PostFlowering: Start=Flowering; End=Maturity
            Constant RootFrontVelocity: Value=0; Units=mm/d
        PhaseBasedSwitch NitrogenDemandSwitch: Start=Germination; End=Maturity
      Leaf: MaxCover=1; Albedo=0.18; Gsmax=0.009; R50=160; KDead=0.03
        zero: FractionRemoved, FractionToResidue, CurrentExpandingLeaf, StartFractionExpanded, FractionNextleafExpanded, _ExpandedNodeNo, DeadNodesYesterday, FRGR, PotentialEP, FractionDied
        LeafCohort InitialLeaves[1]: Rank=1; Area=380
        LeafCohort InitialLeaves[2]: Rank=2; Area=0
        LeafCohort InitialLeaves[3]: Rank=3; Area=0
        LeafCohort InitialLeaves[4]: Rank=4; Area=0
        LeafCohort InitialLeaves[5]: Rank=5; Area=0
        LeafCohort InitialLeaves[6]: Rank=6; Area=0
        CompositeBiomass Live: Propertys=[[Leaf].CohortLive]
        CompositeBiomass Dead: Propertys=[[Leaf].CohortDead]
        ArrayBiomass CohortArrayLive: Propertys=[[Leaf].Live]; ArraySize=[Leaf].MaxNodeNo
        ArrayBiomass CohortArrayDead: Propertys=[[Leaf].Dead]; ArraySize=[Leaf].MaxNodeNo
        LeafCohortParameters CohortParameters
          BellCurveFunction MaxArea
            Memo
              Potential leaf area is calculated from leaf number using the approach of Keating and Wafula (1992).
              Individual leaf size is described using a bell-shaped curve, the parameters of which are derived from final leaf number.
            MultiplyFunction LargestLeafPosition
              VariableReference FinalLeafNumber: VariableName=[Structure].MainStemFinalNodeNumber.Value
              Constant RelativePositionOfLargestLeaf: Value=0.67
            LinearInterpolationFunction AreaMax: XProperty=[Structure].MainStemFinalNodeNumber.Value
              XYPairs: X=[1, 5, 10, 15, 20, 25]; Y=[32530, 39259, 49659, 60000, 75000, 90000]
            LinearInterpolationFunction Breadth: XProperty=[Structure].MainStemFinalNodeNumber.Value
              XYPairs: X=[5, 10, 15, 20, 25]; Y=[-0.377, -0.144, -0.059, -0.027, -0.016]
            Constant Skewness: Value=0.00025
          Constant NReallocationFactor: Value=1
          Constant NRetranslocationFactor: Value=0.03
          Constant DMRetranslocationFactor: Value=0.5
          LinearInterpolationFunction CellDivisionStress: XProperty=[Maize].WaterSupplyDemandRatio
            XYPairs: X=[0.9, 1]; Y=[1, 1]
          LinearInterpolationFunction ExpansionStress: XProperty=[Maize].WaterSupplyDemandRatio
            XYPairs: X=[0.1, 0.7, 1]; Y=[0, 1, 1]
          LinearInterpolationFunction GrowthDuration: XProperty=[Structure].RelativeNodeApperance
            XYPairs: X=[0, 0.3, 0.5, 1]; Y=[0, 200, 250, 100]
          LinearInterpolationFunction LagDuration: XProperty=[Structure].RelativeNodeApperance
            XYPairs: X=[0, 0.4, 0.6]; Y=[300, 300, 650]
          LinearInterpolationFunction SenescenceDuration: XProperty=[Structure].RelativeNodeApperance
            XYPairs: X=[0, 0.4, 0.6]; Y=[150, 150, 350]
          Constant DetachmentLagDuration: Value=1000000
          Constant DetachmentDuration: Value=1000000
          LinearInterpolationFunction MaximumNConc: XProperty=[Structure].MainStemNodeNo
            XYPairs: X=[1, 10]; Y=[0.054, 0.03]
          Constant CriticalNConc: Value=0.015; Units=g/g
          Constant MinimumNConc: Value=0.008; Units=g/g
          AddFunction DroughtInducedSenAcceleration
            Constant One: Value=1
            MultiplyFunction Stress
              Constant StressResponseCoefficient: Value=1
              LinearInterpolationFunction StressFactor: XProperty=[Maize].WaterSupplyDemandRatio
                XYPairs: X=[0, 1]; Y=[0.5, 0]
          LinearInterpolationFunction SpecificLeafAreaMax: XProperty=[Structure].MainStemNodeNo
            XYPairs: X=[1, 9]; Y=[50000, 25000]
          LinearInterpolationFunction SpecificLeafAreaMin: XProperty=[Structure].MainStemNodeNo
            XYPairs: X=[1, 9]; Y=[8000, 8000]
          Constant StructuralFraction: Value=0.7
          Constant NonStructuralFraction: Value=0
          LinearInterpolationFunction ShadeInducedSenescenceRate: XProperty=[Leaf].CohortCurrentRankCoverAbove
            XYPairs: X=[0, 0.7, 0.8, 0.96, 0.99]; Y=[0, 0, 0, 0, 0]
          Constant InitialNConc: Value=0; Units=g/g
        RUEModel Photosynthesis
          Constant RUE: Value=2
          WeightedTemperatureFunction FT: MaximumTemperatureWeighting=0.75
            XYPairs: X=[0, 8, 15, 35, 50]; Y=[0, 0, 1, 1, 0]
          LinearInterpolationFunction FVPD: XProperty=[Leaf].Photosynthesis.VPD
            XYPairs: X=[0, 10, 50]; Y=[1, 1, 1]
          LinearInterpolationFunction FN: XProperty=[Leaf].Fn
            XYPairs: X=[0, 1]; Y=[0.3, 1]
          LinearInterpolationFunction FW: XProperty=[Leaf].Fw
            XYPairs: X=[0, 0.3]; Y=[0, 1]
          RUECO2Function FCO2: PhotosyntheticPathway=C4
          VariableReference RadnInt: VariableName=[Leaf].RadIntTot
        MultiplyFunction ExtinctionCoeff
          Memo
            Extinction coefficient is specified in terms of a potential extinction coefficient which is then discounted during periods of water stress to account for the impact of leaf curling.
          LinearInterpolationFunction PotentialExtinctionCoeff: XProperty=[Maize].SowingData.RowSpacing
            XYPairs: X=[0.2, 0.5, 1]; Y=[0.7, 0.5, 0.4]
          LinearInterpolationFunction WaterStressImpact: XProperty=[Maize].WaterSupplyDemandRatio
            XYPairs: X=[0, 0.7]; Y=[0.5, 1]
        LinearInterpolationFunction FrostFraction: XProperty=[Weather].MinT
          XYPairs: X=[-2, 2]; Y=[1, 0]
        VariableReference ThermalTime: VariableName=[Phenology].ThermalTime.Value
        MinimumFunction FRGRFunction
          VariableReference FT: VariableName=[Leaf].Photosynthesis.FT.Value
          VariableReference FN: VariableName=[Leaf].Photosynthesis.FN.Value
          VariableReference FVPD: VariableName=[Leaf].Photosynthesis.FVPD.Value
      GenericAboveGroundOrgan Husk: FractionRemoved=0; FractionToResidue=0
        PopulationBasedDemandFunction DMDemandFunction
          VariableReference ThermalTime: VariableName=[Phenology].ThermalTime.Value
          Constant StartStage: Value=5.2
          Constant GrowthDuration: Value=120
          Constant MaximumOrganWt: Value=25
          VariableReference OrganPopulation: VariableName=[Rachis].CobNumber.Value
          LinearInterpolationFunction ExpansionStress: XProperty=[Maize].WaterSupplyDemandRatio
            XYPairs: X=[0.3, 0.8]; Y=[0, 1]
        Biomass Live
        Biomass Dead
        Constant NReallocationFactor: Value=0
        Constant NRetranslocationFactor: Value=0.1
        Constant MaximumNConc: Value=0.01; Units=g/g
        Constant StructuralFraction: Value=0.3; Units=g/g
        Constant MinimumNConc: Value=0.01; Units=g/g
        Constant DMRetranslocationFactor: Value=0.1
      GenericAboveGroundOrgan Rachis: FractionRemoved=0; FractionToResidue=0
        MultiplyFunction CobNumber
          VariableReference StemNumber: VariableName=[Structure].TotalStemPopn
          Constant CobsPerStem: Value=1.1
        DivideFunction CobSize
          VariableReference CobMass: VariableName=[Rachis].Live.Wt
          VariableReference CobNumber: VariableName=[Rachis].CobNumber.Value
        PopulationBasedDemandFunction DMDemandFunction
          VariableReference ThermalTime: VariableName=[Phenology].ThermalTime.Value
          Constant StartStage: Value=5.5
          Constant GrowthDuration: Value=300
          Constant MaximumOrganWt: Value=23
          VariableReference OrganPopulation: VariableName=[Rachis].CobNumber.Value
          LinearInterpolationFunction ExpansionStress: XProperty=[Maize].WaterSupplyDemandRatio
            XYPairs: X=[0, 0.35]; Y=[0, 1]
        Biomass Live
        Biomass Dead
        Constant NReallocationFactor: Value=0
        Constant NRetranslocationFactor: Value=0.1
        Constant MaximumNConc: Value=0.008; Units=g/g
        Constant StructuralFraction: Value=1; Units=g/g
        Constant MinimumNConc: Value=0.003; Units=g/g
        LinearInterpolationFunction ExpansionStress: XProperty=[Maize].WaterSupplyDemandRatio
          XYPairs: X=[0.1, 0.7]; Y=[0, 1]
      GenericAboveGroundOrgan Stem: FractionRemoved=0; FractionToResidue=0
        Biomass Live
        Biomass Dead
        Constant StructuralFraction: Value=0.7
        LinearInterpolationFunction MaximumNConc: XProperty=[Structure].MainStemNodeNo
          XYPairs: X=[0, 10, 11]; Y=[0.03, 0.03, 0.005]
        Constant MinimumNConc: Value=0.006; Units=g/g
        PhaseBasedSwitch NitrogenDemandSwitch: Start=Emergence; End=StartGrainFill
        Constant NReallocationFactor: Value=0
        Constant NRetranslocationFactor: Value=0.5
        Constant DMRetranslocationFactor: Value=0.1
        MinimumFunction DMDemandFunctionX
          MultiplyFunction PotentialDMAccumulation
            VariableReference NodesAppearing: VariableName=[Structure].DeltaNodeNumber
            VariableReference Branches: VariableName=[Structure].TotalStemPopn
            LinearInterpolationFunction PotentialInternodeWt: XProperty=[Structure].RelativeNodeApperance
              XYPairs: X=[0, 0.2, 0.8, 1]; Y=[0, 2, 16, 16]
          MultiplyFunction HightLimitedDMAccumulation
            Constant SpecificStemLengthMax: Value=0.1
              Constant SpecificStemLengthMax: Value=0.1
            VariableReference Branches: VariableName=[Structure].TotalStemPopn
            VariableReference DeltaHeight: VariableName=[Structure].HeightModel.DeltaHeight
        PartitionFractionDemandFunction DMDemandFunction
          PhaseLookup PartitionFraction
            PhaseLookupValue PreStemElongation: Start=Emergence; End=FloralInitiation
              Constant StemFraction: Value=0.6
            PhaseLookupValue StemElongation: Start=FloralInitiation; End=Flowering
              Constant StemFraction: Value=0.82
      CompositeBiomass AboveGround
        Propertys=[[Leaf].Live, [Leaf].Dead, [Stem].Live, [Stem].Dead, [Husk].Live, [Husk].Dead, [Grain].Live, [Grain].Dead, [Rachis].Live, [Rachis].Dead]
        Memo
          The AboveGround composite biomass object includes all organs occurring above the soil surface to allow output for total dry matter and Nutrient contents, including total structural, non-structural and metabolic pools.
      CompositeBiomass BelowGround: Propertys=[[Root].Live, [Root].Dead]
        Memo
          The BelowGround composite biomass object includes all root biomass pools to allow output for total dry matter and Nutrient contents, including total structural, non-structural and metabolic pools.
      CompositeBiomass Total
        Propertys=[[Leaf].Live, [Leaf].Dead, [Stem].Live, [Stem].Dead, [Husk].Live, [Husk].Dead, [Grain].Live, [Grain].Dead, [Rachis].Live, [Rachis].Dead, [Root].Live, [Root].Dead]
        Memo
          The Total composite biomass object includes all organs (above+below ground) to allow output for total dry matter and Nutrient contents, including total structural, non-structural and metabolic pools.
      CompositeBiomass TotalLive
        Propertys=[[Leaf].Live, [Stem].Live, [Husk].Live, [Grain].Live, [Rachis].Live, [Root].Live]
        Memo
          The TotalLive composite biomass object includes the Live pools of all organs (above+below ground) to allow output for total dry matter and Nutrient contents, including total structural, non-structural and metabolic pools.
      CompositeBiomass TotalDead
        Propertys=[[Leaf].Dead, [Stem].Dead, [Husk].Dead, [Grain].Dead, [Rachis].Dead, [Root].Dead]
        Memo
          The TotalDead composite biomass object includes the Dead pools of all organs (above+below ground) to allow output for total dry matter and Nutrient contents, including total structural, non-structural and metabolic pools.
      CompositeBiomass EarLive: Propertys=[[Husk].Live, [Grain].Live, [Rachis].Live]
        Memo
          The EarLive composite biomass object includes the Live pools of all organs within the Ear to allow output for total dry matter and Nutrient contents, including total structural, non-structural and metabolic pools.
      CompositeBiomass AboveGroundLive
        Propertys=[[Leaf].Live, [Stem].Live, [Husk].Live, [Grain].Live, [Rachis].Live]
        Memo
          The AboveGroundLive composite biomass object includes the Live pools of all organs occurring above the soil surface to allow output for total dry matter and Nutrient contents, including total structural, non-structural and metabolic pools.
      CompositeBiomass AboveGroundDead
        Propertys=[[Leaf].Dead, [Stem].Dead, [Husk].Dead, [Grain].Dead, [Rachis].Dead]
        Memo
          The AboveGroundDead composite biomass object includes the Dead pools of all organs occurring above the soil surface to allow output for total dry matter and Nutrient contents, including total structural, non-structural and metabolic pools.
      Memo Future Development Needs
        ##Future Development requirements

        * Phenology not responding to stress events.  Requires better data sets for quantifying the effects of water and nitrogen on leaf apperance and the timing of development stages.
        * Phosphorus response
        * Improved parameterisation of supply and demand for N and DM from organs and arbitration of these resources.
        * Heat Stress responses in grain number
        * More validation under a wider range of environments with more detailed datasets
        * Seedling mortality
        * Water demand (MicroClimate) needs validation
      Cultivar Pioneer_39G12
        Command:
          [Phenology].GrainFilling.Target.Value = 550
          [Grain].MaximumGrainsPerCob.Value = 550
          [Grain].NumberFunction.GrowthRateFactor.XYPairs.X = 0.2,2,4,10
          [Grain].NumberFunction.GrowthRateFactor.XYPairs.Y = 0,0.6,1,1
      Cultivar Pioneer_3153
      Cultivar Katumani
        Command:
          [Phenology].Juvenile.Target.Value = 150
          [Phenology].Photosensitive.Target.XYPairs.X = 0, 12.5, 24
          [Phenology].Photosensitive.Target.XYPairs.Y = 0, 0, 115
          [Phenology].FlagLeafToFlowering.Target.Value = 10
          [Phenology].FloweringToGrainFilling.Target.Value = 120
          [Phenology].GrainFilling.Target.Value = 530
          [Rachis].DMDemandFunction.MaximumOrganWt.Value = 14
          [Grain].MaximumGrainsPerCob.Value = 405
          [Grain].MaximumPotentialGrainSize.Value = 0.375
        Memo
          The variety Katumani Composite B was formed in 1966 and released in 1968 as part of the maize breeding work undertaken at the Katumani Research Station in Kenya which started in 1956.  Katumani Composite B was an advanced generation of Katumani Synthetic V X Katumani Synthetic VI.  It has slight photoperiod sensitivity and relatively small potential cob size.
      Cultivar Makueni
        Command:
          [Phenology].Juvenile.Target.Value = 150
          [Phenology].Photosensitive.Target.XYPairs.X = 0, 12.5, 24
          [Phenology].Photosensitive.Target.XYPairs.Y = 0, 0, 115
          [Phenology].FlagLeafToFlowering.Target.Value = 10
          [Phenology].FloweringToGrainFilling.Target.Value = 120
          [Phenology].GrainFilling.Target.Value = 530
          [Rachis].DMDemandFunction.MaximumOrganWt.Value = 14
          [Grain].MaximumGrainsPerCob.Value = 432
          [Grain].MaximumPotentialGrainSize.Value = 0.375
        Memo
          The variety Makueni Composite is a kenyan variety with similar phenology but slightly higher cob size than Katumani composite.
      Cultivar NSCM_41
        Command:
          [Phenology].Juvenile.Target.Value = 230
          [Phenology].Photosensitive.Target.XYPairs.X = 0, 12.5, 24
          [Phenology].Photosensitive.Target.XYPairs.Y = 0, 0, 264.5
          [Phenology].FlagLeafToFlowering.Target.Value = 10
          [Phenology].FloweringToGrainFilling.Target.Value = 170
          [Phenology].GrainFilling.Target.Value = 550
          [Rachis].DMDemandFunction.MaximumOrganWt.Value = 14
          [Grain].MaximumGrainsPerCob.Value = 450
          [Grain].MaximumPotentialGrainSize.Value = 0.375
        Memo
          The variety NSCM_41 is a Zimbabwean early maturing hybrid.  Photoperiod response is taken from Ellis et al Crop Sci 32:1225 for SR52.
      Cultivar sc401: same as Replacements.Maize.NSCM_41
      Cultivar r201
        Command:
          [Phenology].Juvenile.Target.Value = 230
          [Phenology].Photosensitive.Target.XYPairs.X = 0, 12.5, 24
          [Phenology].Photosensitive.Target.XYPairs.Y = 0, 0, 264.5
          [Phenology].FlagLeafToFlowering.Target.Value = 10
          [Phenology].FloweringToGrainFilling.Target.Value = 170
          [Phenology].GrainFilling.Target.Value = 550
          [Rachis].DMDemandFunction.MaximumOrganWt.Value = 14
          [Grain].MaximumGrainsPerCob.Value = 450
          [Grain].MaximumPotentialGrainSize.Value = 0.375
        Memo
          The variety r201 is a Zimbabwean early maturing hybrid.  Photoperiod response is taken from Ellis et al Crop Sci 32:1225 for SR52.
      Cultivar sc501
        Command:
          [Phenology].Juvenile.Target.Value = 250
          [Phenology].Photosensitive.Target.XYPairs.X = 0, 12.5, 24
          [Phenology].Photosensitive.Target.XYPairs.Y = 0, 0, 264.5
          [Phenology].FlagLeafToFlowering.Target.Value = 10
          [Phenology].FloweringToGrainFilling.Target.Value = 170
          [Phenology].GrainFilling.Target.Value = 550
          [Rachis].DMDemandFunction.MaximumOrganWt.Value = 14
          [Grain].MaximumGrainsPerCob.Value = 468
          [Grain].MaximumPotentialGrainSize.Value = 0.361
        Memo
          The variety sc501 is a Zimbabwean early-medium maturing hybrid.  Photoperiod response is taken from Ellis et al Crop Sci 32:1225 for SR52.
      Cultivar sr52
        Command:
          [Phenology].Juvenile.Target.Value = 250
          [Phenology].Photosensitive.Target.XYPairs.X = 0, 12.5, 24
          [Phenology].Photosensitive.Target.XYPairs.Y = 0, 0, 264.5
          [Phenology].FlagLeafToFlowering.Target.Value = 10
          [Phenology].FloweringToGrainFilling.Target.Value = 170
          [Phenology].GrainFilling.Target.Value = 550
          [Rachis].DMDemandFunction.MaximumOrganWt.Value = 14
          [Grain].MaximumGrainsPerCob.Value = 468
          [Grain].MaximumPotentialGrainSize.Value = 0.361
        Memo
          The variety sr52 is a Zimbabwean early-medium maturing hybrid.  Photoperiod response is taken from Ellis et al Crop Sci 32:1225 for SR52.
      Cultivar Melkassa
        Command:
          [Phenology].Juvenile.Target.Value = 230
          [Phenology].Photosensitive.Target.XYPairs.X = 0, 12.5, 24
          [Phenology].Photosensitive.Target.XYPairs.Y = 0, 0, 264.5
          [Phenology].FlagLeafToFlowering.Target.Value = 10
          [Phenology].FloweringToGrainFilling.Target.Value = 160
          [Phenology].GrainFilling.Target.Value = 550
          [Rachis].DMDemandFunction.MaximumOrganWt.Value = 14
          [Grain].MaximumGrainsPerCob.Value = 387
          [Grain].MaximumPotentialGrainSize.Value = 0.33
        Memo
          The variety Melkassa is a local early-medium maturing Ethiopian variety.
      Cultivar r215
        Command:
          [Phenology].Juvenile.Target.Value = 250
          [Phenology].Photosensitive.Target.XYPairs.X = 0, 12.5, 24
          [Phenology].Photosensitive.Target.XYPairs.Y = 0, 0, 264.5
          [Phenology].FlagLeafToFlowering.Target.Value = 10
          [Phenology].FloweringToGrainFilling.Target.Value = 170
          [Phenology].GrainFilling.Target.Value = 550
          [Rachis].DMDemandFunction.MaximumOrganWt.Value = 14
          [Grain].MaximumGrainsPerCob.Value = 468
          [Grain].MaximumPotentialGrainSize.Value = 0.361
        Memo
          The variety r215 is a Zimbabwean early-medium maturing hybrid.  Photoperiod response is taken from Ellis et al Crop Sci 32:1225 for SR52.
      Cultivar mh18
        Command:
          [Phenology].Juvenile.Target.Value = 260
          [Phenology].Photosensitive.Target.XYPairs.X = 0, 12.5, 24
          [Phenology].Photosensitive.Target.XYPairs.Y = 0, 0, 264.5
          [Phenology].FlagLeafToFlowering.Target.Value = 10
          [Phenology].FloweringToGrainFilling.Target.Value = 170
          [Phenology].GrainFilling.Target.Value = 550
          [Rachis].DMDemandFunction.MaximumOrganWt.Value = 14
          [Grain].MaximumGrainsPerCob.Value = 486
          [Grain].MaximumPotentialGrainSize.Value = 0.361
        Memo
          The variety mh18 is a Zimbabwean early-medium maturing hybrid.  Photoperiod response is taken from Ellis et al Crop Sci 32:1225 for SR52.
      Cultivar CG4141
        Command:
          [Phenology].Juvenile.Target.Value = 233
          [Phenology].Photosensitive.Target.XYPairs.X = 0, 12.5, 24
          [Phenology].Photosensitive.Target.XYPairs.Y = 0, 0, 264.5
          [Phenology].FlagLeafToFlowering.Target.Value = 10
          [Phenology].FloweringToGrainFilling.Target.Value = 170
          [Phenology].GrainFilling.Target.Value = 550
          [Rachis].DMDemandFunction.MaximumOrganWt.Value = 14
          [Grain].MaximumGrainsPerCob.Value = 468
          [Grain].MaximumPotentialGrainSize.Value = 0.361
        Memo
          The variety CG4141 is a Zimbabwean early-medium maturing hybrid.  Photoperiod response is taken from Ellis et al Crop Sci 32:1225 for SR52.
      Cultivar sc601
        Command:
          [Phenology].Juvenile.Target.Value = 280
          [Phenology].Photosensitive.Target.XYPairs.X = 0, 12.5, 24
          [Phenology].Photosensitive.Target.XYPairs.Y = 0, 0, 264.5
          [Phenology].FlagLeafToFlowering.Target.Value = 10
          [Phenology].FloweringToGrainFilling.Target.Value = 170
          [Phenology].GrainFilling.Target.Value = 560
          [Rachis].DMDemandFunction.MaximumOrganWt.Value = 14
          [Grain].MaximumGrainsPerCob.Value = 495
          [Grain].MaximumPotentialGrainSize.Value = 0.361
        Memo
          The variety sc601 is a Zimbabwean medium-late maturing hybrid.  Photoperiod response is taken from Ellis et al Crop Sci 32:1225 for SR52.
      Cultivar sc625
        Command:
          [Phenology].Juvenile.Target.Value = 280
          [Phenology].Photosensitive.Target.XYPairs.X = 0, 12.5, 24
          [Phenology].Photosensitive.Target.XYPairs.Y = 0, 0, 264.5
          [Phenology].FlagLeafToFlowering.Target.Value = 10
          [Phenology].FloweringToGrainFilling.Target.Value = 170
          [Phenology].GrainFilling.Target.Value = 570
          [Rachis].DMDemandFunction.MaximumOrganWt.Value = 14
          [Grain].MaximumGrainsPerCob.Value = 504
          [Grain].MaximumPotentialGrainSize.Value = 0.361
        Memo
          The variety sc625 is a Zimbabwean medium-late maturing hybrid.  Photoperiod response is taken from Ellis et al Crop Sci 32:1225 for SR52.
      Cultivar sc623
        Command:
          [Phenology].Juvenile.Target.Value = 280
          [Phenology].Photosensitive.Target.XYPairs.X = 0, 12.5, 24
          [Phenology].Photosensitive.Target.XYPairs.Y = 0, 0, 264.5
          [Phenology].FlagLeafToFlowering.Target.Value = 10
          [Phenology].FloweringToGrainFilling.Target.Value = 170
          [Phenology].GrainFilling.Target.Value = 550
          [Rachis].DMDemandFunction.MaximumOrganWt.Value = 14
          [Grain].MaximumGrainsPerCob.Value = 504
          [Grain].MaximumPotentialGrainSize.Value = 0.361
        Memo
          The variety sc623 is a Zimbabwean medium-late maturing hybrid.  Photoperiod response is taken from Ellis et al Crop Sci 32:1225 for SR52.
      Cultivar mh12
        Command:
          [Phenology].Juvenile.Target.Value = 290
          [Phenology].Photosensitive.Target.XYPairs.X = 0, 12.5, 24
          [Phenology].Photosensitive.Target.XYPairs.Y = 0, 0, 264.5
          [Phenology].FlagLeafToFlowering.Target.Value = 10
          [Phenology].FloweringToGrainFilling.Target.Value = 170
          [Phenology].GrainFilling.Target.Value = 570
          [Rachis].DMDemandFunction.MaximumOrganWt.Value = 14
          [Grain].MaximumGrainsPerCob.Value = 504
          [Grain].MaximumPotentialGrainSize.Value = 0.361
        Memo
          The variety mh12 is a Malawian medium-late maturing hybrid.  Photoperiod response is taken from Ellis et al Crop Sci 32:1225 for SR52.
      Cultivar mh16
        Command:
          [Phenology].Juvenile.Target.Value = 290
          [Phenology].Photosensitive.Target.XYPairs.X = 0, 12.5, 24
          [Phenology].Photosensitive.Target.XYPairs.Y = 0, 0, 264.5
          [Phenology].FlagLeafToFlowering.Target.Value = 10
          [Phenology].FloweringToGrainFilling.Target.Value = 170
          [Phenology].GrainFilling.Target.Value = 570
          [Rachis].DMDemandFunction.MaximumOrganWt.Value = 14
          [Grain].MaximumGrainsPerCob.Value = 504
          [Grain].MaximumPotentialGrainSize.Value = 0.361
        Memo
          The variety mh16 is a Malawian medium-late maturing hybrid.  Photoperiod response is taken from Ellis et al Crop Sci 32:1225 for SR52.
      Cultivar mh17
        Command:
          [Phenology].Juvenile.Target.Value = 290
          [Phenology].Photosensitive.Target.XYPairs.X = 0, 12.5, 24
          [Phenology].Photosensitive.Target.XYPairs.Y = 0, 0, 264.5
          [Phenology].FlagLeafToFlowering.Target.Value = 10
          [Phenology].FloweringToGrainFilling.Target.Value = 170
          [Phenology].GrainFilling.Target.Value = 570
          [Rachis].DMDemandFunction.MaximumOrganWt.Value = 14
          [Grain].MaximumGrainsPerCob.Value = 504
          [Grain].MaximumPotentialGrainSize.Value = 0.361
        Memo
          The variety mh17 is a Malawian medium-late maturing hybrid.  Photoperiod response is taken from Ellis et al Crop Sci 32:1225 for SR52.
      Cultivar mh19
        Command:
          [Phenology].Juvenile.Target.Value = 290
          [Phenology].Photosensitive.Target.XYPairs.X = 0, 12.5, 24
          [Phenology].Photosensitive.Target.XYPairs.Y = 0, 0, 264.5
          [Phenology].FlagLeafToFlowering.Target.Value = 10
          [Phenology].FloweringToGrainFilling.Target.Value = 170
          [Phenology].GrainFilling.Target.Value = 570
          [Rachis].DMDemandFunction.MaximumOrganWt.Value = 14
          [Grain].MaximumGrainsPerCob.Value = 504
          [Grain].MaximumPotentialGrainSize.Value = 0.361
        Memo
          The variety mh19 is a Malawian medium-late maturing hybrid.  Photoperiod response is taken from Ellis et al Crop Sci 32:1225 for SR52.
      Cultivar malawi_local
        Command:
          [Phenology].Juvenile.Target.Value = 280
          [Phenology].Photosensitive.Target.XYPairs.X = 0, 12.5, 24
          [Phenology].Photosensitive.Target.XYPairs.Y = 0, 0, 264.5
          [Phenology].FlagLeafToFlowering.Target.Value = 10
          [Phenology].FloweringToGrainFilling.Target.Value = 170
          [Phenology].GrainFilling.Target.Value = 600
          [Rachis].DMDemandFunction.MaximumOrganWt.Value = 14
          [Grain].MaximumGrainsPerCob.Value = 360
          [Grain].MaximumPotentialGrainSize.Value = 0.217
        Memo
          The variety malawi_local is a Malawian medium-late maturing local variety.  Photoperiod response is taken from Ellis et al Crop Sci 32:1225 for SR52.
      Cultivar Dekalb_XL82
        Command:
          [Phenology].Juvenile.Target.Value = 211
          [Phenology].Photosensitive.Target.XYPairs.X = 0, 12.5, 24
          [Phenology].Photosensitive.Target.XYPairs.Y = 0, 0, 472
          [Phenology].FlagLeafToFlowering.Target.Value = 101
          [Phenology].FloweringToGrainFilling.Target.Value = 170
          [Phenology].GrainFilling.Target.Value = 813
          [Rachis].DMDemandFunction.MaximumOrganWt.Value = 25
          [Grain].MaximumGrainsPerCob.Value = 550
      Cultivar GH_5009
        Command:
          [Phenology].Juvenile.Target.Value = 220
          [Phenology].Photosensitive.Target.XYPairs.X = 0, 12.5, 24
          [Phenology].Photosensitive.Target.XYPairs.Y = 0, 0, 300
          [Phenology].FlagLeafToFlowering.Target.Value = 50
          [Phenology].FloweringToGrainFilling.Target.Value = 170
          [Phenology].GrainFilling.Target.Value = 713
          [Rachis].DMDemandFunction.MaximumOrganWt.Value = 25
          [Grain].MaximumGrainsPerCob.Value =  550
      Cultivar Hycorn_40
        Command:
          [Phenology].Juvenile.Target.Value = 220
          [Phenology].Photosensitive.Target.XYPairs.X = 0, 12.5, 24
          [Phenology].Photosensitive.Target.XYPairs.Y = 0, 0, 124
          [Phenology].FlagLeafToFlowering.Target.Value = 50
          [Phenology].FloweringToGrainFilling.Target.Value = 170
          [Phenology].GrainFilling.Target.Value = 713
          [Rachis].DMDemandFunction.MaximumOrganWt.Value = 25
          [Grain].MaximumGrainsPerCob.Value =  550
      Cultivar GH_5019WX
        Command:
          [Phenology].Juvenile.Target.Value = 255
          [Phenology].Photosensitive.Target.XYPairs.X = 0, 12.5, 24.0
          [Phenology].Photosensitive.Target.XYPairs.Y = 0, 0, 124
          [Phenology].FlagLeafToFlowering.Target.Value = 101
          [Phenology].FloweringToGrainFilling.Target.Value = 170
          [Phenology].GrainFilling.Target.Value = 694
          [Rachis].DMDemandFunction.MaximumOrganWt.Value = 25
          [Grain].MaximumGrainsPerCob.Value = 550
      Cultivar Laila
        Command:
          [Phenology].Juvenile.Target.Value = 211
          [Phenology].Photosensitive.Target.XYPairs.X = 0, 12.5, 24
          [Phenology].Photosensitive.Target.XYPairs.Y = 0, 0, 0
          [Phenology].FlagLeafToFlowering.Target.Value = 1
          [Phenology].FloweringToGrainFilling.Target.Value = 170
          [Phenology].GrainFilling.Target.Value = 812
          [Phenology].Maturing.Target.Value = 1
          [Phenology].MaturityToHarvestRipe.Target.Value = 1
          [Rachis].DMDemandFunction.MaximumOrganWt.Value = 36
          [Grain].MaximumGrainsPerCob.Value =  720
      Cultivar Pioneer_39V43
        Command:
          [Phenology].Juvenile.Target.Value = 150
          [Phenology].GrainFilling.Target.Value = 450
          [Phenology].FloweringToGrainFilling.Target.Value = 170
          [Structure].MainStemNodeAppearanceRate.Phyllochron.Phyllochron.XYPairs.X = 1, 4, 4.2, 10.5, 11
          [Structure].MainStemNodeAppearanceRate.Phyllochron.Phyllochron.XYPairs.Y = 26, 26, 46, 46, 70
          [Rachis].DMDemandFunction.MaximumOrganWt.Value = 18
          [Structure].HeightModel.PotentialHeight.XYPairs.X = 3, 4, 5, 6
          [Structure].HeightModel.PotentialHeight.XYPairs.Y = 20, 40, 50, 1300
        Memo
          VShort duration variety released in New Zealand by Pioneer
      Cultivar Pioneer_34K77
        Command:
          [Phenology].Juvenile.Target.Value = 280
          [Phenology].GrainFilling.Target.Value = 550
        Memo
          VShort duration variety released in New Zealand by Pioneer
      Cultivar Pioneer_38H20
        Command:
          [Phenology].Juvenile.Target.Value = 210
          [Phenology].GrainFilling.Target.Value = 550
      Cultivar Pioneer_33M54
        Command:
          [Phenology].GrainFilling.Target.Value = 550
          [Phenology].Juvenile.Target.Value = 270
      Cultivar Hycorn_53
        Command:
          [Phenology].Juvenile.Target.Value = 235
          [Phenology].Photosensitive.Target.XYPairs.X = 0, 12.5, 24
          [Phenology].Photosensitive.Target.XYPairs.Y = 0, 0, 124
          [Phenology].FlagLeafToFlowering.Target.Value = 10
          [Phenology].FloweringToGrainFilling.Target.Value = 170
          [Phenology].GrainFilling.Target.Value = 520
          [Rachis].DMDemandFunction.MaximumOrganWt.Value = 25
          [Grain].MaximumGrainsPerCob.Value =  550
  DataStore
    ExcelInput Observed: FileName=Observed.xlsx
      SheetNames=[Observed, TimeSeries, LeafAppearance, Zadok, SoilWater, ET]
    PredictedObserved: PredictedTableName=Report; ObservedTableName=Observed; FieldNameUsedForMatch=Wheat.Phenology.CurrentStageName
      Tests: POName=PredictedObserved
        AcceptedStats:
          Name                    n    Slope       Intercept   SEslope    SEintercept  R2        RMSE       NSE        ME            MAE         RSR
          Wheat.AboveGround.N     33   1.11033     2.11819     0.0816812  1.24747      0.856337  5.38764    0.621262   3.49892       3.83939     0.60602
          Wheat.AboveGround.Wt    137  0.73345     106.06      0.0279673  35.2284      0.835919  299.844    0.687401   -197.744      234.271     0.557061
          Wheat.Grain.Live.N      118  0.765021    -0.0340814  0.0334751  0.340608     0.818262  2.9309     0.590545   -2.16904      2.30098     0.63717
          Wheat.Grain.Live.NConc  70   -0.0700921  0.0225005   0.0198524  0.000433341  0.154918  0.0043617  -0.185123  -0.000460776  0.00341354  1.08083
          Wheat.Grain.Number      128  1.26026     5108.26     0.146903   1628.25      0.368728  10352.3    -5.4249    7789.98       8131.89     2.52482
          Wheat.Grain.Protein     108  0.0576156   11.2363     0.0174428  0.22697      0.093324  2.45273    -0.034181  -0.813773     2.09136     1.01223
          Wheat.Grain.Wt          157  0.840414    -12.7823    0.0453615  19.6577      0.688912  126.979    0.461905   -76.1828      99.3278     0.73121
          Wheat.Leaf.LAI          1    -           -           -          -            -         0          -          0             0           -
          Wheat.Stem.Live.Wt      6    0.671692    -73.0648    0.216677   92.5797      0.706093  224.029    -0.380037  -198.594      198.594     1.07239
        AcceptedStatsName=Name n Slope Intercept SEslope SEintercept R2 RMSE NSE ME MAE RSR
    Input NZObservations: FileName=%root%\Tests\Validation\Wheat\RainShelterBiomass.txt
    TimeSeriesStats: TableName=PredictedObserved
    PredictedObserved PreVsObsPhenology: PredictedTableName=Report; ObservedTableName=Zadok; FieldNameUsedForMatch=Clock.Today
      Tests: POName=PreVsObsPhenology
        AcceptedStats:
          {Name=Wheat.Phenology.Zadok.Stage, n=402, Slope=0.49307, Intercept=23.8786, SEslope=0.0496319, SEintercept=2.91168, R2=0.197907, RMSE=28.3174, NSE=-0.256043, ME=-2.96097, MAE=14.6219, RSR=1.11934}
        AcceptedStatsName=Name n Slope Intercept SEslope SEintercept R2 RMSE NSE ME MAE RSR
    PredictedObserved PreVsObsLeafNumber: PredictedTableName=Report; ObservedTableName=LeafAppearance; FieldNameUsedForMatch=Clock.Today
      Tests: POName=PreVsObsLeafNumber
        AcceptedStats:
          Name                         n    Slope     Intercept  SEslope    SEintercept  R2        RMSE      NSE        ME        MAE       RSR
          Wheat.Leaf.AppearedCohortNo  325  0.910903  2.4258     0.0387827  0.34007      0.630711  2.44392   0.0661201  1.67774   1.84612   0.964887
          Wheat.Leaf.DeadCohortNo      17   1.05378   0.476144   0.0965326  0.82276      0.888198  1.86368   0.817591   0.869872  1.37137   0.414341
          Wheat.Leaf.ExpandedCohortNo  99   1.06119   -0.4269    0.0108115  0.101822     0.990032  0.438286  0.983921   0.109139  0.309071  0.126161
        AcceptedStatsName=Name n Slope Intercept SEslope SEintercept R2 RMSE NSE ME MAE RSR
    PredictedObserved PreVsObsET: PredictedTableName=Report; ObservedTableName=ET; FieldNameUsedForMatch=Clock.Today
      Tests: POName=PreVsObsET
        AcceptedStats:
          {Name=ET, n=123, Slope=0.958197, Intercept=-0.616392, SEslope=0.0594818, SEintercept=0.230733, R2=0.681999, RMSE=1.25478, NSE=0.315163, ME=-0.765646, MAE=0.928216, RSR=0.824178}
        AcceptedStatsName=Name n Slope Intercept SEslope SEintercept R2 RMSE NSE ME MAE RSR
    PredictedObserved PredictedObservedAll: PredictedTableName=Report; ObservedTableName=Observed; FieldNameUsedForMatch=Clock.Today
      Tests: POName=PredictedObservedAll
        AcceptedStats:
          Name                    n   Slope      Intercept    SEslope    SEintercept  R2         RMSE        NSE        ME          MAE         RSR
          Wheat.AboveGround.N     74  1.36484    -0.00427339  0.0376399  0.32351      0.948083   3.64122     0.607452   2.30595     2.49882     0.622289
          Wheat.AboveGround.Wt    74  0.64283    35.6523      0.0261046  18.0921      0.893867   245.877     0.727022   -146.071    159.05      0.518931
          Wheat.Grain.Live.N      13  0.77585    -0.958738    0.0916219  0.796423     0.866999   3.07555     0.378127   -2.70004    2.70004     0.757652
          Wheat.Grain.Live.NConc  14  -0.013372  0.0217037    0.0218098  0.0003871    0.0303746  0.00721779  -0.73652   0.00459533  0.00508301  1.26984
          Wheat.Grain.Number      14  0.882171   994.181      0.102751   1137.16      0.859995   1774.59     0.857862   -186.022    1550.6      0.363298
          Wheat.Grain.Protein     6   0.0200036  11.9545      0.05652    0.562449     0.0303643  3.18295     -1.30849   2.4208      3.00588     1.38699
          Wheat.Grain.Wt          44  0.610639   -5.43169     0.0435277  11.5339      0.824125   122.048     0.665524   -67.8256    72.1466     0.571729
          Wheat.Leaf.Dead.N       24  7.91922    0.480763     0.679456   0.294605     0.860622   3.49645     -127.035   2.58536     2.58536     11.077
          Wheat.Leaf.Dead.Wt      24  2.28589    22.2949      0.236073   14.2206      0.809953   104.532     -6.74611   82.8551     82.8551     2.72458
          Wheat.Leaf.LAI          60  1.00443    1.04047      0.0789178  0.196903     0.736354   1.498       0.292179   1.04822     1.14942     0.834281
          Wheat.Leaf.Live.N       35  1.67775    1.16903      0.0964473  0.334606     0.90167    3.55101     -0.860126  2.72302     2.72302     1.34424
          Wheat.Leaf.Live.Wt      35  1.34665    27.2013      0.0937959  9.86032      0.862      70.7966     0.0271816  53.826      54.9775     0.972123
          Wheat.Stem.Live.N       36  0.722666   0.218368     0.0419012  0.118562     0.897422   0.860621    0.848235   -0.271974   0.418305    0.384121
          Wheat.Stem.Live.Wt      42  0.44072    2.00161      0.0503589  17.9745      0.656918   213.023     0.246111   -142.985    147.555     0.857869
        AcceptedStatsName=Name n Slope Intercept SEslope SEintercept R2 RMSE NSE ME MAE RSR
  Experiment APS26
    Factors
      Factor NRate: Specifications=[ApplyFertiliser].Script.Amount=0,40,80,160
      Factor Water: Specifications=[IrrigationSchedule]
        Operations Wet
          1995-05-31  [Irrigation].Apply(amount:31);
          1995-06-01  [Irrigation].Apply(amount:13);
          1995-06-02  [Irrigation].Apply(amount:26);
          1995-06-05  [Irrigation].Apply(amount:26);
          1995-06-06  [Irrigation].Apply(amount:26);
          1995-06-07  [Irrigation].Apply(amount:26);
          1995-06-08  [Irrigation].Apply(amount:26);
          1995-06-15  [Wheat].Sow(population:120, cultivar:"GattonHartog", depth:40, rowSpacing:250);
          1995-07-05  [Irrigation].Apply(amount:26);
          1995-07-21  [Irrigation].Apply(amount:14);
          1995-08-01  [Irrigation].Apply(amount:28);
          1995-08-11  [Irrigation].Apply(amount:30);
          1995-08-25  [Irrigation].Apply(amount:15);
          1995-08-31  [Irrigation].Apply(amount:14);
          1995-09-04  [Irrigation].Apply(amount:15);
          1995-09-15  [Irrigation].Apply(amount:25);
          1995-09-22  [Irrigation].Apply(amount:20);
          1995-10-02  [Irrigation].Apply(amount:11);
        Operations Dry
          1995-06-15  [Wheat].Sow(population:120, cultivar:"GattonHartog", depth:40, rowSpacing:250);
    Simulation APS26NRate160WaterWet: Area=0; Slope=0
      Clock: StartDate=1995-06-13; EndDate=1995-10-31
      Summary summaryfile
      Weather: FileName=APS26.met
      SoilArbitrator Soil Arbitrator
      Zone paddock: Area=1; Slope=0
        Irrigation
        Fertiliser
        Manager ApplyFertiliser
          FertDayOfYear = 186
          Amount = 160
```csharp
using System;
using Models.Core;
using Models.PMF;
using APSIM.Shared.Utilities;

namespace Models
{
	[Serializable]
	public class Script : Model
	{
		[Link] Clock Clock;
		[Link] Fertiliser Fertiliser;
		[Link] Summary Summary;
		
		[Description("Day of year fertiliser is to be applied")]
		public int FertDayOfYear { get; set; }

		[Description("Amount of fertiliser to be applied")]
		public double Amount { get; set; }

		[EventSubscribe("DoManagement")]
		private void OnDoManagement(object sender, EventArgs e)
		{
			if (Clock.Today.DayOfYear == FertDayOfYear)
			{
				Fertiliser.Apply(Amount: Amount, Type: Fertiliser.Types.NO3N);
			}
		
		}
		
	}
}
```
        Soil APS26Field: SoilType=APS26Soil; LocalName=APS26Site; Site=APS26Site; NearestTown=Unknown; Region=Lawes; NaturalVegetation=Unknown; Latitude=0; Longitude=0
          Water
            Thickness  BD    AirDry  LL15   DUL       SAT
            150        1.38  0.1     0.235  0.37277   0.44
            150        1.38  0.1     0.235  0.37277   0.44
            300        1.38  0.1     0.22   0.389017  0.44
            300        1.46  0.1     0.24   0.35      0.43
            300        1.51  0.1     0.23   0.36      0.42
            300        1.49  0.1     0.23   0.35      0.43
            300        1.47  0.1     0.19   0.33      0.43
            SoilCrop WheatSoil: LL=[0.24, 0.24, 0.22, 0.24, 0.23, 0.23, 0.18]; KL=[0.1, 0.1, 0.06, 0.06, 0.06, 0.06, 0.06]; XF=[1, 1, 1, 1, 1, 1, 1]
          SoilWater: residueinterception=0; SummerDate=1-Nov; SummerU=6; SummerCona=3.5; WinterDate=1-Apr; WinterU=6; WinterCona=3.5; DiffusConst=10; DiffusSlope=16; Salb=0.13; CN2Bare=60; CNRed=20; CNCov=0.8; slope=0; discharge_width=0; catchment_area=0; max_pond=0
            Thickness  SWCON  KLAT
            150        0.3    0
            150        0.3    0
            150        0.3    0
            150        0.3    0
            300        0.3    0
            300        0.3    0
            300        0.3    0
            300        0.3    0
          SoilNitrogen: fom_type=[default, manure, mucuna, lablab, shemp, stable]; fract_carb=[0.2, 0.3, 0.54, 0.57, 0.45, 0]; fract_cell=[0.7, 0.3, 0.37, 0.37, 0.47, 0.1]; fract_lign=[0.1, 0.4, 0.09, 0.06, 0.08, 0.9]; wfpsN2N2O_x=[22, 88]; wfpsN2N2O_y=[0.1, 1]
          SoilOrganicMatter: RootCN=40; RootWt=500; SoilCN=14.5; EnrACoeff=1; EnrBCoeff=1; OCUnits=Total
            Thickness  OC    FBiom  FInert
            150        2.2   0.024  0.45
            150        1.6   0.024  0.6
            150        1.35  0.01   0.7
            150        0.95  0.01   0.85
            300        1     0.01   0.9
            300        0.8   0.01   0.95
            300        0.45  0.01   0.95
            300        0.45  0.01   0.95
          Analysis: Thickness=[150, 150, 150, 150, 300, 300, 300, 300]; PH=[7.5, 8, 8, 8, 8, 8, 8, 8]; PHUnits=Water; BoronUnits=HotWater
          Sample Initial Water: Thickness=[150, 150, 150, 150, 300, 300, 300, 300]; NO3Units=ppm; NH4Units=ppm; SWUnits=Volumetric; OCUnits=Total; PHUnits=Water
            SW=[0.327449, 0.34295, 0.334038, 0.334038, 0.330344, 0.310632, 0.30604, 0.269447]
          Sample Initial Nitrogen: NO3Units=ppm; NH4Units=ppm; SWUnits=Volumetric; OCUnits=Total; PHUnits=Water
            Thickness  NO3  NH4
            150        1.5  0.5
            150        1.8  0.8
            150        1.5  0.5
            150        1.5  0.5
            300        0.4  0.42
            300        0.2  0.42
            300        0.4  0.37
            300        0.3  0.25
        SurfaceOrganicMatter: PoolName=wheat_stubble; type=Wheat; mass=0; standing_fraction=0; cpr=0; cnr=80; CriticalResidueWeight=2000; OptimumDecompTemp=20; MaxCumulativeEOS=20; CNRatioDecompCoeff=0.277; CNRatioDecompThreshold=25; TotalLeachRain=25; MinRainToLeach=10; CriticalMinimumOrganicC=0.004; DefaultCPRatio=0; DefaultStandingFraction=0; StandingExtinctCoeff=0.5; FractionFaecesAdded=0.5
          Pools:
            {PoolName=wheat_stubble, ResidueType=Wheat, Mass=0, CNRatio=80, CPRatio=0, StandingFraction=0}
          ResidueTypes: LoadFromResource=ResidueTypes
        Plant Wheat: CropType=Wheat
        Operations IrrigationSchedule: same as APS26.Factors.Water.Wet
        MicroClimate: a_interception=0; b_interception=1; c_interception=0; d_interception=0; soil_albedo=0.3; air_pressure=1010; soil_emissivity=0.96; sun_angle=15; soil_heat_flux_fraction=0.4; night_interception_fraction=0.5; windspeed_default=3; refheight=2; albedo=0.15; emissivity=0.96; gsmax=0.01; r50=200
        Manager Calculations
          NitTot = 27077.4
          CarbonTot = 0
```csharp
using System;
using Models.Core;
using Models.PMF;
using Models.PMF.OilPalm;
using Models.Soils;
using Models.SurfaceOM;
using APSIM.Shared.Utilities;

namespace Models
{
	[Serializable]
	[System.Xml.Serialization.XmlInclude(typeof(Model))]
	public class Script : Model
	{
		[Link] Clock Clock;
		[Link] Soil Soil;
		[Link] SurfaceOrganicMatter SurfaceOM;
		[Link] Summary Summary;
		
		public double NitTot { get; set; }
		public double CarbonTot { get; set; }
		
		[EventSubscribe("Commencing")]
		private void OnSimulationCommencing(object sender, EventArgs e)
		{	
			NitTot = 0;
			CarbonTot = 0;
		}
		
		
		[EventSubscribe("DoManagement")]
		private void OnDoManagement(object sender, EventArgs e)
		{
			NitTot = MathUtilities.Sum(Soil.SoilNitrogen.TotalN);
			CarbonTot = MathUtilities.Sum(Soil.SoilNitrogen.TotalC);
		}
	}
}
```
        Report
          VariableNames:
            [Clock].Today
            Wheat.Zadok.Stage
            Wheat.Phenology.CurrentStageName
            Wheat.AboveGround.Wt
            Wheat.AboveGround.N
            Wheat.Grain.Wt
            Wheat.Grain.Protein
            Wheat.Grain.Size
            Wheat.Grain.Number
            Wheat.Grain.Live.Wt
            Wheat.Grain.Live.N
            Wheat.Grain.Live.NConc
            Wheat.Leaf.LAI
            Wheat.Leaf.Live.Wt
            Wheat.Leaf.Live.N
            Wheat.Spike.Wt
            Wheat.Spike.N
            Wheat.Stem.Live.Wt
            Wheat.Stem.Live.N
            Wheat.Root.Depth
            [Wheat].Root.WaterUptake
            [Wheat].Leaf.Fw
            [Wheat].Leaf.Fn
            [Wheat].Total.Wt
            sum([Soil].SoilWater.SWmm[2:7]) as TotalSoilWater
            [Soil].SoilWater.SW
          EventNames:
            [Clock].DoReport
  Experiment APS6
    Factors
      Factor NRate: Specifications=[ApplyFertiliser]
        Operations 0
        Operations 40
          1992-06-16  [Fertiliser].Apply(Amount: 40, Type: Fertiliser.Types.NO3N);
        Operations 80
          1992-06-16  [Fertiliser].Apply(Amount: 80, Type: Fertiliser.Types.NO3N);
        Operations 120
          1992-06-16  [Fertiliser].Apply(Amount: 60, Type: Fertiliser.Types.NO3N);
          1992-08-05  [Fertiliser].Apply(Amount: 60, Type: Fertiliser.Types.NO3N);
        Operations 160
          1992-06-16  [Fertiliser].Apply(Amount: 40, Type: Fertiliser.Types.NO3N);
          1992-08-05  [Fertiliser].Apply(Amount: 120, Type: Fertiliser.Types.NO3N);
        Operations 360
          1992-06-16  [Fertiliser].Apply(Amount: 120, Type: Fertiliser.Types.NO3N);
          1992-08-05  [Fertiliser].Apply(Amount: 120, Type: Fertiliser.Types.NO3N);
          1992-09-08  [Fertiliser].Apply(Amount: 120, Type: Fertiliser.Types.NO3N);
    Simulation APS6NRate0: Area=0; Slope=0
      Clock: StartDate=1992-06-14; EndDate=1992-11-17
      Summary summaryfile
      Weather: FileName=APS6.met
      Zone paddock: Area=1; Slope=0
        Irrigation
        Fertiliser
        Soil APS6Field: SoilType=APS6Soil; LocalName=APS6Site; Site=APS6Site; NearestTown=Unknown; Region=Lawes; NaturalVegetation=Unknown; Latitude=0; Longitude=0
          Water
            Thickness  BD    AirDry  LL15  DUL   SAT
            150        1.38  0.1     0.2   0.38  0.43
            150        1.34  0.1     0.2   0.38  0.43
            300        1.35  0.1     0.22  0.4   0.43
            300        1.5   0.1     0.18  0.4   0.43
            300        1.49  0.1     0.14  0.39  0.42
            300        1.46  0.1     0.2   0.38  0.4
            300        1.46  0.1     0.2   0.38  0.4
            SoilCrop WheatSoil: LL=[0.2, 0.2, 0.22, 0.18, 0.14, 0.25, 0.28]; KL=[0.06, 0.06, 0.06, 0.06, 0.06, 0.06, 0.06]; XF=[1, 1, 1, 1, 1, 1, 1]
          SoilWater: residueinterception=0; SummerDate=1-Nov; SummerU=6; SummerCona=3.5; WinterDate=1-Apr; WinterU=6; WinterCona=3.5; DiffusConst=88; DiffusSlope=35.4; Salb=0.13; CN2Bare=60; CNRed=20; CNCov=0.8; slope=0; discharge_width=0; catchment_area=0; max_pond=0
            Thickness  SWCON  KLAT
            150        0.3    0
            150        0.3    0
            300        0.3    0
            300        0.3    0
            300        0.3    0
            300        0.3    0
            300        0.3    0
          SoilNitrogen: fom_type=[default, manure, mucuna, lablab, shemp, stable]; fract_carb=[0.2, 0.3, 0.54, 0.57, 0.45, 0]; fract_cell=[0.7, 0.3, 0.37, 0.37, 0.47, 0.1]; fract_lign=[0.1, 0.4, 0.09, 0.06, 0.08, 0.9]; wfpsN2N2O_x=[22, 88]; wfpsN2N2O_y=[0.1, 1]
          SoilOrganicMatter: RootCN=60; RootWt=2000; SoilCN=14.5; EnrACoeff=1; EnrBCoeff=1; OCUnits=Total
            Thickness  OC    FBiom  FInert
            150        2.2   0.03   0.45
            150        1.6   0.02   0.6
            300        1.15  0.01   0.78
            300        1     0.01   0.9
            300        0.8   0.01   0.99
            300        0.45  0.01   0.99
            300        0.45  0.01   0.99
          Analysis: Thickness=[150, 150, 300, 300, 300, 300, 300]; PH=[7.5, 8, 8, 8, 8, 8, 8]; PHUnits=Water; BoronUnits=HotWater
          Sample Initial Water: Thickness=[150, 150, 300, 300, 300, 300, 300]; SW=[0.326, 0.326, 0.346, 0.333, 0.315, 0.326, 0.326]; NO3Units=ppm; NH4Units=ppm; SWUnits=Volumetric; OCUnits=Total; PHUnits=Water
          Sample Initial Nitrogen: NO3Units=ppm; NH4Units=ppm; SWUnits=Volumetric; OCUnits=Total; PHUnits=Water
            Thickness  NO3   NH4
            150        1.3   1.3
            150        0.6   1
            300        0.25  1
            300        0.2   0.8
            300        0.1   0.8
            300        0.1   0.5
            300        0.1   0.5
        SurfaceOrganicMatter: PoolName=wheat_stubble; type=wheat; mass=500; standing_fraction=0; cnr=100; CriticalResidueWeight=2000; OptimumDecompTemp=20; MaxCumulativeEOS=20; CNRatioDecompCoeff=0.277; CNRatioDecompThreshold=25; TotalLeachRain=25; MinRainToLeach=10; CriticalMinimumOrganicC=0.004; DefaultCPRatio=0; DefaultStandingFraction=0; StandingExtinctCoeff=0.5; FractionFaecesAdded=0.5
          Pools:
            {PoolName=wheat_stubble, ResidueType=wheat, Mass=500, CNRatio=100, StandingFraction=0}
          ResidueTypes: LoadFromResource=ResidueTypes
        Plant Wheat: CropType=Wheat
        Operations ApplyFertiliser
          1992-06-16  [Fertiliser].Apply(Amount: 0, Type: Fertiliser.Types.NO3N);
        Operations IrrigationSchedule
          1992-06-17  [Wheat].Sow(population:121.61, cultivar:"GattonHartog", depth:30, rowSpacing:250);
          1992-06-24  [Irrigation].Apply(amount:10);
          1992-06-26  [Irrigation].Apply(amount:10);
          1992-07-28  [Irrigation].Apply(amount:30);
          1992-08-05  [Irrigation].Apply(amount:30);
          1992-08-19  [Irrigation].Apply(amount:40);
          1992-08-26  [Irrigation].Apply(amount:40);
          1992-09-09  [Irrigation].Apply(amount:40);
          1992-09-21  [Irrigation].Apply(amount:40);
          1992-10-01  [Irrigation].Apply(amount:50);
          1992-10-07  [Irrigation].Apply(amount:20);
          1992-10-08  [Irrigation].Apply(amount:20);
          1992-10-09  [Irrigation].Apply(amount:20);
          1992-10-13  [Irrigation].Apply(amount:20);
        MicroClimate: same as APS26.APS26NRate160WaterWet.paddock.MicroClimate
        Report
          VariableNames:
            [Clock].Today
            Wheat.Zadok.Stage
            Wheat.Phenology.CurrentStageName
            Wheat.AboveGround.Wt
            Wheat.AboveGround.N
            Wheat.Grain.Wt
            Wheat.Grain.Protein
            Wheat.Grain.Size
            Wheat.Grain.Number
            Wheat.Grain.Live.Wt
            Wheat.Grain.Live.N
            Wheat.Grain.Live.NConc
            Wheat.Leaf.LAI
            Wheat.Leaf.Live.Wt
            Wheat.Leaf.Live.N
            Wheat.Leaf.Live.NConc
            Wheat.Leaf.Dead.Wt
            Wheat.Leaf.Dead.N
            Wheat.Leaf.Dead.NConc
            Wheat.Spike.Wt
            Wheat.Spike.N
            Wheat.Stem.Live.Wt
            Wheat.Stem.Live.N
            Wheat.Stem.Live.NConc
            Wheat.Root.Depth
            [Wheat].Root.WaterUptake
            [Wheat].Leaf.Fw
            [Wheat].Leaf.Fn
            [Wheat].Total.Wt
            Wheat.Structure.TotalStemPopn
          EventNames:
            [Clock].DoReport
      SoilArbitrator Soil Arbitrator
  Experiment APS14
    Factors
      Factor Stubble: Specifications=[OMSchedule]
        Operations Bare
          1993-06-03  [SurfaceOrganicMatter].Incorporate(fraction: 1.0, depth:100);
        Operations Lucerne
          1993-06-03  [SurfaceOrganicMatter].Add(mass: 3560, N: 108.8, P:0.0, type: "lucerne", name: "");
          1993-06-03  [SurfaceOrganicMatter].Incorporate(fraction: 1.0, depth:100);
        Operations Straw
          1993-06-03  [SurfaceOrganicMatter].Add(mass: 3584, N: 28.8, P:0.0, type: "barley", name: "");
          1993-06-03  [SurfaceOrganicMatter].Incorporate(fraction: 1.0, depth:100);
      Factor NRate: Specifications=[FertiliserSchedule]
        Operations 000
          1993-06-18  [Fertiliser].Apply(Amount: 0, Type: Fertiliser.Types.NO3N);
        Operations 040
          1993-06-18  [Fertiliser].Apply(Amount: 40, Type: Fertiliser.Types.NO3N);
        Operations 080
          1993-06-18  [Fertiliser].Apply(Amount: 80, Type: Fertiliser.Types.NO3N);
        Operations 200
          1993-06-18  [Fertiliser].Apply(Amount: 120, Type: Fertiliser.Types.NO3N);
          1993-08-18  [Fertiliser].Apply(Amount: 80, Type: Fertiliser.Types.NO3N);
    Simulation APS14StubbleBareNRate0: Area=0; Slope=0
      Clock: StartDate=1993-06-02; EndDate=1993-11-26
      Summary summaryfile
      Weather: FileName=APS14.met
      Zone paddock: Area=1; Slope=0
        Irrigation
        Fertiliser
        Soil APS14Field: SoilType=Clay Loam; LocalName=Gatton; Site=Gatton; NearestTown=Gatton; Region=Lockyer Valley; State=Qld; Country=Australia; NaturalVegetation=Unknown; Latitude=0; Longitude=0
          Water
            Thickness  BD    AirDry  LL15  DUL   SAT
            150        1.38  0.1     0.2   0.38  0.43
            150        1.34  0.2     0.2   0.38  0.43
            150        1.31  0.24    0.24  0.4   0.45
            150        1.4   0.19    0.19  0.41  0.45
            300        1.5   0.18    0.18  0.4   0.43
            300        1.49  0.14    0.14  0.39  0.43
            300        1.46  0.2     0.2   0.38  0.4
            300        1.46  0.2     0.2   0.38  0.4
            SoilCrop WheatSoil: LL=[0.2, 0.2, 0.24, 0.19, 0.18, 0.14, 0.25, 0.28]; KL=[0.06, 0.06, 0.06, 0.05, 0.04, 0.03, 0.02, 0.02]; XF=[1, 1, 1, 1, 1, 1, 1, 1]
          SoilWater: residueinterception=0; SummerDate=1-Nov; SummerU=6; SummerCona=3.5; WinterDate=1-Apr; WinterU=6; WinterCona=3.5; DiffusConst=40; DiffusSlope=16; Salb=0.13; CN2Bare=60; CNRed=20; CNCov=0.8; slope=0; discharge_width=0; catchment_area=0; max_pond=0
            Thickness  SWCON  KLAT
            150        0.3    0
            150        0.3    0
            150        0.3    0
            150        0.3    0
            300        0.3    0
            300        0.3    0
            300        0.3    0
            300        0.3    0
          SoilNitrogen: fom_type=[default, manure, mucuna, lablab, shemp, stable]; fract_carb=[0.2, 0.3, 0.54, 0.57, 0.45, 0]; fract_cell=[0.7, 0.3, 0.37, 0.37, 0.47, 0.1]; fract_lign=[0.1, 0.4, 0.09, 0.06, 0.08, 0.9]; wfpsN2N2O_x=[22, 88]; wfpsN2N2O_y=[0.1, 1]
          SoilOrganicMatter: RootCN=40; RootWt=1500; SoilCN=14.5; EnrACoeff=0; EnrBCoeff=0; OCUnits=Total
            Thickness  OC    FBiom  FInert
            150        2.2   0.02   0.4
            150        1.6   0.02   0.6
            150        1.35  0.01   0.7
            150        0.95  0.01   0.8
            300        1     0.01   0.9
            300        0.8   0.01   0.9
            300        0.45  0.01   0.9
            300        0.45  0.01   0.9
          Analysis: Thickness=[150, 150, 150, 150, 300, 300, 300, 300]; PH=[7.5, 8, 8, 8, 8, 8, 8, 8]; PHUnits=Water; BoronUnits=HotWater
          Sample Initial Water: Thickness=[150, 150, 150, 150, 300, 300, 300, 300]; SW=[0.336, 0.336, 0.302, 0.302, 0.319, 0.345, 0.294, 0.264]; NO3Units=ppm; NH4Units=ppm; SWUnits=Volumetric; OCUnits=Total; PHUnits=Water
          Sample Initial Nitrogen: NO3Units=ppm; NH4Units=ppm; SWUnits=Volumetric; OCUnits=Total; PHUnits=Water
            Thickness  NO3  NH4
            150        2    0.3
            150        0.5  0.3
            150        0.2  0.2
            150        0.2  0.1
            300        0.2  0.1
            300        0.2  0.1
            300        0.2  0.1
            300        0.2  0.1
        SurfaceOrganicMatter: PoolName=wheat_stubble; type=Wheat; mass=500; standing_fraction=0; cpr=0; cnr=120; CriticalResidueWeight=2000; OptimumDecompTemp=20; MaxCumulativeEOS=20; CNRatioDecompCoeff=0.277; CNRatioDecompThreshold=25; TotalLeachRain=25; MinRainToLeach=10; CriticalMinimumOrganicC=0.004; DefaultCPRatio=0; DefaultStandingFraction=0; StandingExtinctCoeff=0.5; FractionFaecesAdded=0.5
          Pools:
            {PoolName=wheat_stubble, ResidueType=Wheat, Mass=500, CNRatio=120, CPRatio=0, StandingFraction=0}
          ResidueTypes: LoadFromResource=ResidueTypes
        Plant Wheat: CropType=Wheat
        Operations IrrigationSchedule
          1993-06-04  [Irrigation].Apply(amount:14);
          1993-06-18  [Irrigation].Apply(amount:26);
          1993-06-23  [Irrigation].Apply(amount:13);
          1993-07-09  [Irrigation].Apply(amount:25);
          1993-07-22  [Irrigation].Apply(amount:20);
          1993-08-06  [Irrigation].Apply(amount:31);
          1993-08-18  [Irrigation].Apply(amount:36);
          1993-08-27  [Irrigation].Apply(amount:38);
          1993-09-06  [Irrigation].Apply(amount:33);
          1993-09-24  [Irrigation].Apply(amount:35);
          1993-10-01  [Irrigation].Apply(amount:36);
        MicroClimate: same as APS26.APS26NRate160WaterWet.paddock.MicroClimate
        Operations FertiliserSchedule
          1993-06-18  [Fertiliser].Apply(Amount: 0, Type: Fertiliser.Types.NO3N);
        Operations OMSchedule
          1993-06-03  [SurfaceOrganicMatter].Add(mass: 0, N: 0, P:0.0, type: "wheat", name: "");
          1993-06-03  [SurfaceOrganicMatter].Incorporate(fraction: 1.0, depth:100);
        Operations SowingSchedule
          1993-06-29  [Wheat].Sow(population:114, cultivar:"GattonHartog", depth:30, rowSpacing:250);
        PredictedObserved: FieldNameUsedForMatch=Wheat.Zadok.Stage
        Manager ExtraVariables
```csharp
        using System;
        using Models.Core;
		using System.Collections.Generic;
        using System.Text;
        using Models.PMF.OldPlant;
        using Models.PMF;
        using Models.Soils;
        using Models;
        using System.Xml.Serialization;
        using APSIM.Shared.Utilities;

        namespace Models
        {
[Serializable] 
public class Script : Model
{      
[Link] Clock Clock;
[Link] Soils.Soil Soil;
[Link] Models.SurfaceOM.SurfaceOrganicMatter SOM;
[Link] Plant Plant;          
[Link] Weather Met;   
[Link] Fertiliser Fert;
[Link] Irrigation Irrig;  
               
[XmlIgnore] public bool InitialDay { get; set; }

[XmlIgnore] public double AccumPlantN { get; set; }
[XmlIgnore] public double AccumMineralisation { get; set; }
[XmlIgnore] public double AccumDenit { get; set; }
[XmlIgnore] public double AccumFert { get; set; }
[XmlIgnore] public double AccumLeach { get; set; }
[XmlIgnore] public double AccumDetach { get; set; }
[XmlIgnore] public double DeltaSoilOMN { get; set; }
[XmlIgnore] public double DeltaSurfaceOMN { get; set; }
[XmlIgnore] public double DeltaSoilMineralN { get; set; }
[XmlIgnore] public double SoilNitrogenContent { get; set; }

[XmlIgnore] public double AccumEO { get; set; }
[XmlIgnore] public double AccumEP { get; set; }
[XmlIgnore] public double AccumES { get; set; }
[XmlIgnore] public double AccumDrainage { get; set; }
[XmlIgnore] public double AccumRunoff { get; set; }
[XmlIgnore] public double AccumOutflowLat { get; set; }
[XmlIgnore] public double AccumIrrigation { get; set; }
[XmlIgnore] public double AccumRainfall { get; set; }
[XmlIgnore] public double SoilWaterDeficit { get; set; }

[XmlIgnore] public double AccumTtemerg { get; set; }

[XmlIgnore] public double  InitialSoilOMN { get; set; }
[XmlIgnore] public double  InitialSurfaceOMN { get; set; }
[XmlIgnore] public double  InitialMineralN { get; set; }

[XmlIgnore] public double SWC { get; set; }
[XmlIgnore] public double DUL { get; set; }
[XmlIgnore] public double OutFlowLat { get; set; }
[XmlIgnore] public double MineralN {get; set;}
[XmlIgnore] public double TotalNO3 {get; set;}
[XmlIgnore] public double TotalNH4 {get; set;}

[EventSubscribe("Initialised")]
private void OnInitialised(object sender, EventArgs e)
{
InitialDay = true;
AccumPlantN = 0;
AccumMineralisation = 0;
AccumDenit = 0;
AccumFert = 0;
AccumLeach = 0;
AccumDetach = 0;
DeltaSoilOMN = 0;
DeltaSurfaceOMN = 0;
DeltaSoilMineralN = 0;
SoilNitrogenContent = 0;

AccumEO = 0;
AccumEP = 0;
AccumES = 0;
AccumDrainage = 0;
AccumRunoff = 0;
AccumOutflowLat = 0;
AccumIrrigation = 0;
AccumRainfall = 0;
SoilWaterDeficit = 0;

AccumTtemerg = 0;

SWC = 0;
DUL = 0;
}	   

[EventSubscribe("DoManagementCalculations")]
private void OnDoManagementCalculations(object sender, EventArgs e)
{
	int layers = Soil.Thickness.Length;
    if (InitialDay)
	{
      InitialSurfaceOMN = SOM.N;
      for (int layer = 0; layer < layers; layer++)
      { 
      InitialSoilOMN += (Soil.SoilNitrogen.MicrobialN[layer] + Soil.SoilNitrogen.FOMN[layer] + Soil.SoilNitrogen.HumicN[layer]);
      InitialMineralN += (Soil.NO3N[layer] + Soil.NH4N[layer] + Soil.SoilNitrogen.urea[layer]);
      }
      InitialDay = false;
    }

//!!!!!! Nitrogen balance components !!!!!!
//!!!!!!^^^^^^^^^^^^^^^^^^^^^^^^^^^^^!!!!!!
//AccumPlantN -= (double)this.Get("[Plant].Root.NUptake");
AccumFert += Fert.NitrogenApplied;
DeltaSurfaceOMN = SOM.N - InitialSurfaceOMN;
AccumDetach = 0; //plant2 doesn't detach yet
MineralN = 0;
TotalNO3 = 0;
TotalNH4 = 0;
double OrganicN = 0;
//AccumLeach = AccumLeach - Soil.SoilNitrogen.leach_urea - Soil.SoilNitrogen.leach_no3 - Soil.SoilNitrogen.leach_nh4; //Fails
   for (int layer = 0; layer < layers; layer++)
    { 
    AccumMineralisation += (Soil.SoilNitrogen.MineralisedN[layer] + Soil.SoilNitrogen.dlt_n_min_res[layer]);
    AccumDenit -= MathUtilities.Sum(Soil.SoilNitrogen.Denitrification);
    OrganicN += (Soil.SoilNitrogen.MicrobialN[layer] + Soil.SoilNitrogen.FOMN[layer] + Soil.SoilNitrogen.HumicN[layer]);
    MineralN += (Soil.NO3N[layer] + Soil.NH4N[layer] + Soil.SoilNitrogen.urea[layer]);
    TotalNO3 += Soil.NO3N[layer];
    TotalNH4 += Soil.NH4N[layer];
    }
DeltaSoilOMN = OrganicN - InitialSoilOMN;
DeltaSoilMineralN = MineralN - InitialMineralN;
SoilNitrogenContent = MineralN;
//!!!!!! Water balance components !!!!!!
//!!!!!!^^^^^^^^^^^^^^^^^^^^^^^^^^!!!!!!
AccumEO -= Soil.SoilWater.Eo;
//AccumEP -= (double)this.Get("[Plant].Leaf.Transpiration");
AccumES -= Soil.SoilWater.Es; 
AccumDrainage -= Soil.SoilWater.Drainage; 
AccumRunoff -= Soil.SoilWater.Runoff; 
AccumIrrigation += Irrig.IrrigationApplied; 
AccumRainfall += Met.Rain;
SWC = 0;
DUL = 0;
double OutFlowLat = 0;
   for (int layer = 0; layer < layers; layer++)
   {
     SWC += Soil.SoilWater.SWmm[layer];
     DUL += Soil.SoilWater.DULmm[layer];
     OutFlowLat = Soil.SoilWater.outflow_lat[layer];
   }
AccumOutflowLat -= OutFlowLat;
SoilWaterDeficit =  (SWC - DUL);
}

[EventSubscribe("DoManagement")]
private void OnDoManagement(object sender, EventArgs e)
{
//!!!!!! Thermal time calculation !!!!!!
//!!!!!! ^^^^^^^^^^^^^^^^^^^^^^^^ !!!!!!

}
}
}
```
        Report
          VariableNames:
            [Clock].Today
            Wheat.Zadok.Stage
            Wheat.Phenology.CurrentStageName
            Wheat.AboveGround.Wt
            Wheat.AboveGround.N
            Wheat.Grain.Wt
            Wheat.Grain.Protein
            Wheat.Grain.Size
            Wheat.Grain.Number
            Wheat.Grain.Live.Wt
            Wheat.Grain.Live.N
            Wheat.Grain.Live.NConc
            Wheat.Leaf.LAI
            Wheat.Leaf.Live.Wt
            Wheat.Leaf.Live.N
            Wheat.Spike.Wt
            Wheat.Spike.N
            Wheat.Stem.Live.Wt
            Wheat.Stem.Live.N
            Wheat.Root.Depth
            [Wheat].Root.WaterUptake
            [Wheat].Leaf.Fw
            [Wheat].Leaf.Fn
            [Wheat].Total.Wt
          EventNames:
            [Clock].DoReport
      SoilArbitrator Soil Arbitrator
  Experiment Mer86
    Factors
      Factor NRate: Specifications=[FertiliserOperations]
        Operations 15
          1986-06-14  [Fertiliser].Apply(Amount: 15, Type: Fertiliser.Types.NO3N, Depth: 50);
        Operations 60
          1986-05-29  [Fertiliser].Apply(Amount: 30, Type: Fertiliser.Types.NO3N, Depth: 50);
      Factor Water: Specifications=[IrrigationOperations]
        Operations Dry
          1986-09-03  [Irrigation].Apply (amount:0);
          1986-09-05  [Irrigation].Apply (amount:0);
          1986-09-10  [Irrigation].Apply (amount:0);
          1986-09-11  [Irrigation].Apply (amount:0);
          1986-09-14  [Irrigation].Apply (amount:0);
          1986-09-16  [Irrigation].Apply (amount:0);
          1986-09-18  [Irrigation].Apply (amount:0);
          1986-09-21  [Irrigation].Apply (amount:0);
          1986-09-23  [Irrigation].Apply (amount:0);
          1986-09-24  [Irrigation].Apply (amount:0);
          1986-09-30  [Irrigation].Apply (amount:0);
          1986-10-02  [Irrigation].Apply (amount:0);
          1986-10-04  [Irrigation].Apply (amount:0);
          1986-10-10  [Irrigation].Apply (amount:0);
          1986-10-12  [Irrigation].Apply (amount:0);
          1986-10-14  [Irrigation].Apply (amount:0);
          1986-10-16  [Irrigation].Apply (amount:0);
          1986-10-18  [Irrigation].Apply (amount:0);
          1986-10-20  [Irrigation].Apply (amount:0);
          1986-10-22  [Irrigation].Apply (amount:0);
          1986-10-25  [Irrigation].Apply (amount:0);
          1986-10-26  [Irrigation].Apply (amount:0);
          1986-10-28  [Irrigation].Apply (amount:0);
          1986-10-30  [Irrigation].Apply (amount:0);
          1986-11-01  [Irrigation].Apply (amount:0);
          1986-11-03  [Irrigation].Apply (amount:0);
          1986-11-05  [Irrigation].Apply (amount:0);
          1986-11-07  [Irrigation].Apply (amount:0);
        Operations Wet
          1986-09-03  [Irrigation].Apply (amount:10);
          1986-09-05  [Irrigation].Apply (amount:20);
          1986-09-10  [Irrigation].Apply (amount:20);
          1986-09-11  [Irrigation].Apply (amount:10);
          1986-09-14  [Irrigation].Apply (amount:10);
          1986-09-16  [Irrigation].Apply (amount:10);
          1986-09-18  [Irrigation].Apply (amount:10);
          1986-09-21  [Irrigation].Apply (amount:10);
          1986-09-23  [Irrigation].Apply (amount:10);
          1986-09-24  [Irrigation].Apply (amount:20);
          1986-09-30  [Irrigation].Apply (amount:30);
          1986-10-02  [Irrigation].Apply (amount:20);
          1986-10-04  [Irrigation].Apply (amount:20);
          1986-10-10  [Irrigation].Apply (amount:20);
          1986-10-12  [Irrigation].Apply (amount:20);
          1986-10-14  [Irrigation].Apply (amount:20);
          1986-10-16  [Irrigation].Apply (amount:20);
          1986-10-18  [Irrigation].Apply (amount:20);
          1986-10-20  [Irrigation].Apply (amount:20);
          1986-10-22  [Irrigation].Apply (amount:20);
          1986-10-25  [Irrigation].Apply (amount:20);
          1986-10-26  [Irrigation].Apply (amount:20);
          1986-10-28  [Irrigation].Apply (amount:20);
          1986-10-30  [Irrigation].Apply (amount:20);
          1986-11-01  [Irrigation].Apply (amount:20);
          1986-11-03  [Irrigation].Apply (amount:20);
          1986-11-05  [Irrigation].Apply (amount:20);
          1986-11-07  [Irrigation].Apply (amount:20);
    Simulation Mer86Base: Area=0; Slope=0
      Clock: StartDate=1986-05-01; EndDate=1986-11-30
      Summary summaryfile
      Weather: FileName=MER-86.met
      Zone paddock: Area=1; Slope=0
        Soil MER-86Field: SoilType=sand; LocalName=Merredin; Site=Merredin; NearestTown=Unknown; Region=WA; NaturalVegetation=Unknown; Latitude=0; Longitude=0
          Water
            Thickness  BD    AirDry  LL15  DUL   SAT
            100        1.7   0.03    0.03  0.16  0.26
            100        1.75  0.03    0.03  0.21  0.26
            100        1.8   0.03    0.03  0.22  0.25
            100        1.85  0.04    0.05  0.23  0.24
            100        1.85  0.04    0.1   0.22  0.23
            100        1.85  0.04    0.12  0.22  0.22
            100        1.85  0.04    0.17  0.22  0.22
            200        1.85  0.04    0.17  0.22  0.23
            200        1.85  0.04    0.17  0.22  0.23
            200        1.85  0.04    0.17  0.22  0.23
            SoilCrop WheatSoil
              LL=[0.03, 0.03, 0.03, 0.05, 0.1, 0.12, 0.17, 0.17, 0.17, 0.17]
              KL=[0.06, 0.06, 0.06, 0.06, 0.06, 0.06, 0.06, 0.06, 0.06, 0.06]
              XF=[0.2, 0.6, 0.6, 0.6, 0.6, 0.6, 0.6, 0.6, 0.6, 0.6]
          SoilWater: residueinterception=0; SummerDate=1-Nov; SummerU=6; SummerCona=2; WinterDate=1-Apr; WinterU=6; WinterCona=2; DiffusConst=88; DiffusSlope=35; Salb=0.13; CN2Bare=60; CNRed=20; CNCov=0.8; slope=0; discharge_width=0; catchment_area=0; max_pond=0
            Thickness  SWCON  KLAT
            100        1      0
            100        1      0
            100        1      0
            100        1      0
            100        0.3    0
            100        1      0
            100        1      0
            200        1      0
            200        1      0
            200        1      0
          SoilNitrogen: fom_type=[default, manure, mucuna, lablab, shemp, stable]; fract_carb=[0.2, 0.3, 0.54, 0.57, 0.45, 0]; fract_cell=[0.7, 0.3, 0.37, 0.37, 0.47, 0.1]; fract_lign=[0.1, 0.4, 0.09, 0.06, 0.08, 0.9]; wfpsN2N2O_x=[22, 88]; wfpsN2N2O_y=[0.1, 1]
          SoilOrganicMatter: RootCN=40; RootWt=1000; SoilCN=13; EnrACoeff=1; EnrBCoeff=1; OCUnits=Total
            Thickness  OC    FBiom  FInert
            100        0.5   0.04   0.1
            100        0.1   0.03   0.1
            100        0.1   0.02   0.2
            100        0.05  0.01   0.8
            100        0.05  0.01   0.9
            100        0.05  0.01   0.9
            100        0.05  0.01   0.9
            200        0.05  0.01   0.9
            200        0.05  0.01   0.9
            200        0.05  0.01   0.9
          Analysis: Thickness=[100, 100, 100, 100, 100, 100, 100, 200, 200, 200]; PH=[4.7, 4.7, 4.7, 6, 6, 6, 6, 6, 6, 6]; PHUnits=Water; BoronUnits=HotWater
          Sample Initial Water: Thickness=[100, 100, 100, 100, 100, 100, 100, 200, 200, 200]; SW=[0.03, 0.03, 0.07, 0.1, 0.22, 0.22, 0.22, 0.22, 0.21, 0.19]; NO3Units=ppm; NH4Units=ppm; SWUnits=Volumetric; OCUnits=Total; PHUnits=Water
          Sample Initial Nitrogen: NO3Units=ppm; NH4Units=ppm; SWUnits=Volumetric; OCUnits=Total; PHUnits=Water
            Thickness  NO3  NH4
            100        10   5
            100        5    3
            100        0.3  1
            100        0    0
            100        0    0
            100        0    0
            100        0    0
            200        0    0
            200        0    0
            200        0    0
        Irrigation
        SurfaceOrganicMatter: PoolName=wheat_stubble; type=wheat; mass=0; standing_fraction=0; cpr=0; cnr=80; CriticalResidueWeight=2000; OptimumDecompTemp=20; MaxCumulativeEOS=20; CNRatioDecompCoeff=0.277; CNRatioDecompThreshold=25; TotalLeachRain=25; MinRainToLeach=10; CriticalMinimumOrganicC=0.004; DefaultCPRatio=0; DefaultStandingFraction=0; StandingExtinctCoeff=0.5; FractionFaecesAdded=0.5
          Pools:
            {PoolName=wheat_stubble, ResidueType=wheat, Mass=0, CNRatio=80, CPRatio=0, StandingFraction=0}
          ResidueTypes: LoadFromResource=ResidueTypes
        Operations SowingOperations
          1986-05-29  [Wheat].Sow(population:149, cultivar:"Gutha", depth:30, rowSpacing:250);
        Plant Wheat: CropType=Wheat
        MicroClimate: same as APS26.APS26NRate160WaterWet.paddock.MicroClimate
        Fertiliser
        Operations FertiliserOperations
          1986-06-14  [Fertiliser].Apply(Amount: 15, Type: Fertiliser.Types.NO3N, Depth: 50);
        Operations IrrigationOperations: same as Mer86.Factors.Water.Wet
        MicroClimate: same as APS26.APS26NRate160WaterWet.paddock.MicroClimate
        Report
          VariableNames:
            [Clock].Today
            Wheat.Zadok.Stage
            Wheat.Phenology.CurrentStageName
            Wheat.AboveGround.Wt
            Wheat.AboveGround.N
            Wheat.Grain.Wt
            Wheat.Grain.Protein
            Wheat.Grain.Size
            Wheat.Grain.Number
            Wheat.Grain.Live.Wt
            Wheat.Grain.Live.N
            Wheat.Leaf.LAI
            Wheat.Leaf.Live.Wt
            Wheat.Leaf.Live.N
            Wheat.Spike.Wt
            Wheat.Spike.N
            Wheat.Stem.Live.Wt
            Wheat.Stem.Live.N
            Wheat.Root.Depth
            [Wheat].Root.WaterUptake
            [Wheat].Leaf.Fw
            [Wheat].Leaf.Fn
            [Wheat].Total.Wt
          EventNames:
            [Clock].DoReport
      SoilArbitrator Soil Arbitrator
  Experiment Mer73
    Factors
      Factor NRate: Specifications=[FertiliserOperations]
        Operations 0
          1986-06-14  [Fertiliser].Apply(Amount: 0, Type: Fertiliser.Types.NO3N, Depth: 50);
        Operations 15
          1973-06-21  [Fertiliser].Apply(Amount: 15, Type: Fertiliser.Types.NO3N, Depth: 50);
      Factor Water: Specifications=[IrrigationOperations]
        Operations Dry: same as Mer86.Factors.Water.Dry
        Operations 40
          1973-09-21  [Irrigation].Apply (amount:40);
        Operations 150
          1973-08-28  [Irrigation].Apply (amount:20);
          1973-09-21  [Irrigation].Apply (amount:30);
          1973-10-12  [Irrigation].Apply (amount:50);
          1973-10-28  [Irrigation].Apply (amount:50);
    Simulation Mer73Base: Area=0; Slope=0
      Clock: StartDate=1973-05-01; EndDate=1973-11-30
      Summary summaryfile
      Weather: FileName=MER-73.met
      Zone paddock: Area=1; Slope=0
        Soil MER-73Field: SoilType=sand; LocalName=Merredin; Site=Merredin; NearestTown=Unknown; Region=WA; NaturalVegetation=Unknown; Latitude=0; Longitude=0
          Water
            Thickness  BD    AirDry  LL15  DUL   SAT
            100        1.7   0.03    0.03  0.15  0.28
            100        1.85  0.03    0.04  0.2   0.27
            100        1.75  0.03    0.04  0.2   0.27
            100        1.7   0.04    0.05  0.2   0.25
            100        1.7   0.04    0.05  0.21  0.25
            100        1.85  0.04    0.08  0.21  0.25
            100        1.95  0.04    0.11  0.21  0.25
            200        2     0.04    0.14  0.21  0.23
            200        2     0.04    0.16  0.23  0.23
            200        2     0.04    0.14  0.23  0.23
            SoilCrop WheatSoil
              LL=[0.03, 0.03, 0.03, 0.05, 0.1, 0.12, 0.17, 0.17, 0.17, 0.17]
              KL=[0.06, 0.06, 0.06, 0.06, 0.06, 0.06, 0.06, 0.06, 0.06, 0.06]
              XF=[0.2, 0.2, 0.4, 0.4, 0.4, 0.4, 0.4, 0.4, 0.2, 0]
          SoilWater: residueinterception=0; SummerDate=1-Nov; SummerU=6; SummerCona=2; WinterDate=1-Apr; WinterU=6; WinterCona=2; DiffusConst=88; DiffusSlope=35; Salb=0.13; CN2Bare=60; CNRed=20; CNCov=0.8; slope=0; discharge_width=0; catchment_area=0; max_pond=0
            Thickness  SWCON  KLAT
            100        1      0
            100        1      0
            100        1      0
            100        1      0
            100        0.1    0
            100        1      0
            100        1      0
            200        1      0
            200        1      0
            200        1      0
          SoilNitrogen: fom_type=[default, manure, mucuna, lablab, shemp, stable]; fract_carb=[0.2, 0.3, 0.54, 0.57, 0.45, 0]; fract_cell=[0.7, 0.3, 0.37, 0.37, 0.47, 0.1]; fract_lign=[0.1, 0.4, 0.09, 0.06, 0.08, 0.9]; wfpsN2N2O_x=[22, 88]; wfpsN2N2O_y=[0.1, 1]
            oc=[1.2033, 0.792285, 0.299009, 0.0513806, 0.0510005, 0.0506757, 0.0504969, 0.0501203, 0.0500588, 0.05002]
          SoilOrganicMatter: RootCN=20; RootWt=1500; SoilCN=13; EnrACoeff=1; EnrBCoeff=1; OCUnits=Total
            Thickness  OC    FBiom  FInert
            100        1.2   0.04   0.1
            100        0.8   0.03   0.1
            100        0.3   0.02   0.2
            100        0.05  0.01   0.8
            100        0.05  0.01   0.9
            100        0.05  0.01   0.9
            100        0.05  0.01   0.9
            200        0.05  0.01   0.9
            200        0.05  0.01   0.9
            200        0.05  0.01   0.9
          Analysis: Thickness=[100, 100, 100, 100, 100, 100, 100, 200, 200, 200]; PH=[4.7, 4.7, 4.7, 6, 6, 6, 6, 6, 6, 6]; PHUnits=Water; BoronUnits=HotWater
          Sample Initial Water: Thickness=[100, 100, 100, 100, 100, 100, 100, 200, 200, 200]; SW=[0.03, 0.03, 0.07, 0.1, 0.22, 0.22, 0.22, 0.22, 0.21, 0.19]; NO3Units=ppm; NH4Units=ppm; SWUnits=Volumetric; OCUnits=Total; PHUnits=Water
          Sample Initial Nitrogen: NO3Units=ppm; NH4Units=ppm; SWUnits=Volumetric; OCUnits=Total; PHUnits=Water
            Thickness  NO3  NH4
            100        2    1
            100        1    0
            100        0    0
            100        0    0
            100        0    0
            100        0    0
            100        0    0
            200        0    0
            200        0    0
            200        0    0
        Irrigation
        SurfaceOrganicMatter: PondActive=no; ReportAdditions=no; ReportRemovals=no; PoolName=wheat_stubble; type=wheat; mass=2500; standing_fraction=0; cpr=0; cnr=30; CriticalResidueWeight=2000; OptimumDecompTemp=20; MaxCumulativeEOS=20; CNRatioDecompCoeff=0.277; CNRatioDecompThreshold=25; TotalLeachRain=25; MinRainToLeach=10; CriticalMinimumOrganicC=0.004; DefaultCPRatio=0; DefaultStandingFraction=0; StandingExtinctCoeff=0.5; FractionFaecesAdded=0.5
          Pools:
            {PoolName=wheat_stubble, ResidueType=wheat, Mass=2500, CNRatio=30, CPRatio=0, StandingFraction=0}
          ResidueTypes: LoadFromResource=ResidueTypes
          TillageTypes TillageTypesList
        Operations SowingOperations
          1973-06-21  [Wheat].Sow(population:100, cultivar:"Gamenya", depth:30, rowSpacing:250);
        Plant Wheat: CropType=Wheat
        MicroClimate: same as APS26.APS26NRate160WaterWet.paddock.MicroClimate
        Fertiliser
        Operations FertiliserOperations
          1986-06-14  [Fertiliser].Apply(Amount: 15, Type: Fertiliser.Types.NO3N, Depth: 50);
        Operations IrrigationOperations: same as Mer86.Factors.Water.Wet
        Manager ExtraVariables: same as APS14.APS14StubbleBareNRate0.paddock.ExtraVariables
        Report: same as Mer86.Mer86Base.paddock.Report
      SoilArbitrator Soil Arbitrator
  Experiment RainShelter
    Factors
      Factor Irrig: Specifications=[IrrigationEvents]
        Operations Control
          1991-08-30  [Irrigation].Apply(20);
          1991-09-08  [Irrigation].Apply(12);
          1991-09-13  [Irrigation].Apply(22);
          1991-09-20  [Irrigation].Apply(14);
          1991-10-04  [Irrigation].Apply(27);
          1991-10-11  [Irrigation].Apply(18);
          1991-10-18  [Irrigation].Apply(30);
          1991-10-25  [Irrigation].Apply(42);
          1991-11-01  [Irrigation].Apply(33);
          1991-11-08  [Irrigation].Apply(24);
          1991-11-15  [Irrigation].Apply(28);
          1991-11-22  [Irrigation].Apply(37);
          1991-11-28  [Irrigation].Apply(51);
          1991-12-06  [Irrigation].Apply(36);
          1991-12-13  [Irrigation].Apply(38);
          1991-12-20  [Irrigation].Apply(35);
          1991-12-27  [Irrigation].Apply(47);
          1992-01-04  [Irrigation].Apply(40);
          1992-01-10  [Irrigation].Apply(41);
        Operations SpringD1
          1991-08-30  [Irrigation].Apply(0);
          1991-09-08  [Irrigation].Apply(0);
          1991-09-13  [Irrigation].Apply(0);
          1991-09-20  [Irrigation].Apply(0);
          1991-10-04  [Irrigation].Apply(0);
          1991-10-11  [Irrigation].Apply(18);
          1991-10-18  [Irrigation].Apply(30);
          1991-10-25  [Irrigation].Apply(42);
          1991-11-01  [Irrigation].Apply(33);
          1991-11-08  [Irrigation].Apply(24);
          1991-11-15  [Irrigation].Apply(28);
          1991-11-22  [Irrigation].Apply(37);
          1991-11-28  [Irrigation].Apply(51);
          1991-12-06  [Irrigation].Apply(36);
          1991-12-13  [Irrigation].Apply(38);
          1991-12-20  [Irrigation].Apply(35);
          1991-12-27  [Irrigation].Apply(47);
          1992-01-04  [Irrigation].Apply(40);
          1992-01-10  [Irrigation].Apply(41);
        Operations SpringD2
          1991-08-30  [Irrigation].Apply(0);
          1991-09-08  [Irrigation].Apply(0);
          1991-09-13  [Irrigation].Apply(0);
          1991-09-20  [Irrigation].Apply(0);
          1991-10-04  [Irrigation].Apply(0);
          1991-10-11  [Irrigation].Apply(0);
          1991-10-18  [Irrigation].Apply(0);
          1991-10-25  [Irrigation].Apply(42);
          1991-11-01  [Irrigation].Apply(33);
          1991-11-08  [Irrigation].Apply(24);
          1991-11-15  [Irrigation].Apply(28);
          1991-11-22  [Irrigation].Apply(37);
          1991-11-28  [Irrigation].Apply(51);
          1991-12-06  [Irrigation].Apply(36);
          1991-12-13  [Irrigation].Apply(38);
          1991-12-20  [Irrigation].Apply(35);
          1991-12-27  [Irrigation].Apply(47);
          1992-01-04  [Irrigation].Apply(40);
          1992-01-10  [Irrigation].Apply(41);
        Operations SpringD3
          1991-08-30  [Irrigation].Apply(20);
          1991-09-08  [Irrigation].Apply(0);
          1991-09-13  [Irrigation].Apply(0);
          1991-09-20  [Irrigation].Apply(0);
          1991-10-04  [Irrigation].Apply(0);
          1991-10-11  [Irrigation].Apply(0);
          1991-10-18  [Irrigation].Apply(0);
          1991-10-25  [Irrigation].Apply(0);
          1991-11-01  [Irrigation].Apply(0);
          1991-11-08  [Irrigation].Apply(0);
          1991-11-15  [Irrigation].Apply(0);
          1991-11-22  [Irrigation].Apply(37);
          1991-11-28  [Irrigation].Apply(51);
          1991-12-06  [Irrigation].Apply(36);
          1991-12-13  [Irrigation].Apply(38);
          1991-12-20  [Irrigation].Apply(35);
          1991-12-27  [Irrigation].Apply(47);
          1992-01-04  [Irrigation].Apply(40);
          1992-01-10  [Irrigation].Apply(41);
        Operations SpringD4
          1991-08-30  [Irrigation].Apply(20);
          1991-09-08  [Irrigation].Apply(12);
          1991-09-13  [Irrigation].Apply(24);
          1991-09-20  [Irrigation].Apply(14);
          1991-10-04  [Irrigation].Apply(0);
          1991-10-11  [Irrigation].Apply(0);
          1991-10-18  [Irrigation].Apply(0);
          1991-10-25  [Irrigation].Apply(0);
          1991-11-01  [Irrigation].Apply(0);
          1991-11-08  [Irrigation].Apply(0);
          1991-11-15  [Irrigation].Apply(0);
          1991-11-22  [Irrigation].Apply(0);
          1991-11-28  [Irrigation].Apply(0);
          1991-12-06  [Irrigation].Apply(0);
          1991-12-13  [Irrigation].Apply(0);
          1991-12-20  [Irrigation].Apply(35);
          1991-12-27  [Irrigation].Apply(47);
          1992-01-04  [Irrigation].Apply(40);
          1992-01-10  [Irrigation].Apply(41);
        Operations SummerD1
          1991-08-30  [Irrigation].Apply(20);
          1991-09-08  [Irrigation].Apply(12);
          1991-09-13  [Irrigation].Apply(24);
          1991-09-20  [Irrigation].Apply(14);
          1991-10-04  [Irrigation].Apply(0);
          1991-10-11  [Irrigation].Apply(0);
          1991-10-18  [Irrigation].Apply(0);
          1991-10-25  [Irrigation].Apply(0);
          1991-11-01  [Irrigation].Apply(0);
          1991-11-08  [Irrigation].Apply(0);
          1991-11-15  [Irrigation].Apply(0);
          1991-11-22  [Irrigation].Apply(0);
          1991-11-28  [Irrigation].Apply(0);
          1991-12-06  [Irrigation].Apply(0);
          1991-12-13  [Irrigation].Apply(0);
          1991-12-20  [Irrigation].Apply(0);
          1991-12-27  [Irrigation].Apply(0);
          1992-01-04  [Irrigation].Apply(0);
          1992-01-10  [Irrigation].Apply(0);
        Operations SummerD2
          1991-08-30  [Irrigation].Apply(20);
          1991-09-08  [Irrigation].Apply(12);
          1991-09-13  [Irrigation].Apply(24);
          1991-09-20  [Irrigation].Apply(14);
          1991-10-04  [Irrigation].Apply(27);
          1991-10-11  [Irrigation].Apply(18);
          1991-10-18  [Irrigation].Apply(30);
          1991-10-25  [Irrigation].Apply(0);
          1991-11-01  [Irrigation].Apply(0);
          1991-11-08  [Irrigation].Apply(0);
          1991-11-15  [Irrigation].Apply(0);
          1991-11-22  [Irrigation].Apply(0);
          1991-11-28  [Irrigation].Apply(0);
          1991-12-06  [Irrigation].Apply(0);
          1991-12-13  [Irrigation].Apply(0);
          1991-12-20  [Irrigation].Apply(0);
          1991-12-27  [Irrigation].Apply(0);
          1992-01-04  [Irrigation].Apply(0);
          1992-01-10  [Irrigation].Apply(0);
        Operations SummerD3
          1991-08-30  [Irrigation].Apply(20);
          1991-09-08  [Irrigation].Apply(12);
          1991-09-13  [Irrigation].Apply(24);
          1991-09-20  [Irrigation].Apply(14);
          1991-10-04  [Irrigation].Apply(27);
          1991-10-11  [Irrigation].Apply(18);
          1991-10-18  [Irrigation].Apply(30);
          1991-10-25  [Irrigation].Apply(42);
          1991-11-01  [Irrigation].Apply(33);
          1991-11-08  [Irrigation].Apply(24);
          1991-11-15  [Irrigation].Apply(0);
          1991-11-22  [Irrigation].Apply(0);
          1991-11-28  [Irrigation].Apply(0);
          1991-12-06  [Irrigation].Apply(0);
          1991-12-13  [Irrigation].Apply(0);
          1991-12-20  [Irrigation].Apply(0);
          1991-12-27  [Irrigation].Apply(0);
          1992-01-04  [Irrigation].Apply(0);
          1992-01-10  [Irrigation].Apply(0);
        Operations SummerD4
          1991-08-30  [Irrigation].Apply(20);
          1991-09-08  [Irrigation].Apply(12);
          1991-09-13  [Irrigation].Apply(24);
          1991-09-20  [Irrigation].Apply(14);
          1991-10-04  [Irrigation].Apply(27);
          1991-10-11  [Irrigation].Apply(18);
          1991-10-18  [Irrigation].Apply(30);
          1991-10-25  [Irrigation].Apply(42);
          1991-11-01  [Irrigation].Apply(33);
          1991-11-08  [Irrigation].Apply(24);
          1991-11-15  [Irrigation].Apply(28);
          1991-11-22  [Irrigation].Apply(37);
          1991-11-28  [Irrigation].Apply(51);
          1991-12-06  [Irrigation].Apply(0);
          1991-12-13  [Irrigation].Apply(0);
          1991-12-20  [Irrigation].Apply(0);
          1991-12-27  [Irrigation].Apply(0);
          1992-01-04  [Irrigation].Apply(0);
          1992-01-10  [Irrigation].Apply(0);
        Operations SummerD5
          1991-08-30  [Irrigation].Apply(20);
          1991-09-08  [Irrigation].Apply(12);
          1991-09-13  [Irrigation].Apply(24);
          1991-09-20  [Irrigation].Apply(14);
          1991-10-04  [Irrigation].Apply(27);
          1991-10-11  [Irrigation].Apply(18);
          1991-10-18  [Irrigation].Apply(30);
          1991-10-25  [Irrigation].Apply(42);
          1991-11-01  [Irrigation].Apply(33);
          1991-11-08  [Irrigation].Apply(24);
          1991-11-15  [Irrigation].Apply(28);
          1991-11-22  [Irrigation].Apply(37);
          1991-11-28  [Irrigation].Apply(51);
          1991-12-06  [Irrigation].Apply(36);
          1991-12-13  [Irrigation].Apply(38);
          1991-12-20  [Irrigation].Apply(0);
          1991-12-27  [Irrigation].Apply(0);
          1992-01-04  [Irrigation].Apply(0);
          1992-01-10  [Irrigation].Apply(0);
        Operations Nil
          1991-08-30  [Irrigation].Apply(0);
          1991-09-08  [Irrigation].Apply(0);
          1991-09-13  [Irrigation].Apply(0);
          1991-09-20  [Irrigation].Apply(0);
          1991-10-04  [Irrigation].Apply(0);
          1991-10-11  [Irrigation].Apply(0);
          1991-10-18  [Irrigation].Apply(0);
          1991-10-25  [Irrigation].Apply(0);
          1991-11-01  [Irrigation].Apply(0);
          1991-11-08  [Irrigation].Apply(0);
          1991-11-15  [Irrigation].Apply(0);
          1991-11-22  [Irrigation].Apply(0);
          1991-11-28  [Irrigation].Apply(0);
          1991-12-06  [Irrigation].Apply(0);
          1991-12-13  [Irrigation].Apply(0);
          1991-12-20  [Irrigation].Apply(0);
          1991-12-27  [Irrigation].Apply(0);
          1992-01-04  [Irrigation].Apply(0);
          1992-01-10  [Irrigation].Apply(0);
        Operations Half
          1991-08-30  [Irrigation].Apply(20);
          1991-09-08  [Irrigation].Apply(0);
          1991-09-13  [Irrigation].Apply(22);
          1991-09-20  [Irrigation].Apply(0);
          1991-10-04  [Irrigation].Apply(0);
          1991-10-11  [Irrigation].Apply(18);
          1991-10-18  [Irrigation].Apply(0);
          1991-10-25  [Irrigation].Apply(42);
          1991-11-01  [Irrigation].Apply(0);
          1991-11-08  [Irrigation].Apply(24);
          1991-11-15  [Irrigation].Apply(0);
          1991-11-22  [Irrigation].Apply(37);
          1991-11-28  [Irrigation].Apply(0);
          1991-12-06  [Irrigation].Apply(36);
          1991-12-13  [Irrigation].Apply(0);
          1991-12-20  [Irrigation].Apply(35);
          1991-12-27  [Irrigation].Apply(0);
          1992-01-04  [Irrigation].Apply(40);
          1992-01-10  [Irrigation].Apply(0);
    Simulation Control_full_irrig: Area=0; Slope=0
      Clock: StartDate=1991-06-08; EndDate=1992-01-26
      Summary summaryfile
      Weather: FileName=lincoln.met
      Zone paddock: Area=1; Slope=0
        Folder Manager folder
          Operations
            1991-06-08  [Wheat].Sow(population:300, cultivar:"BattenWinter", depth:40, rowSpacing:250);
          Operations IrrigationEvents: same as RainShelter.Factors.Irrig.Control
          Operations FertiliserEvents
            1991-06-10  [Fertiliser].Apply(60, Fertiliser.Types.UreaN, 0);
            1991-06-10  [Irrigation].Apply(7);
            1991-08-16  [Fertiliser].Apply(100, Fertiliser.Types.UreaN,0);
            1991-08-16  [Irrigation].Apply(7);
            1991-09-26  [Fertiliser].Apply(50, Fertiliser.Types.UreaN,0);
            1991-09-26  [Irrigation].Apply(7);
          Manager RainShelter
```csharp
using System;
using Models.Core;
using APSIM.Shared.Utilities;

namespace Models
{
	[Serializable] 
	[System.Xml.Serialization.XmlInclude(typeof(Model))]
	public class Script : Model
	{
		[Link] Weather Met;
               
		[EventSubscribe("PreparingNewWeatherData")]
		private void OnPreparingNewWeatherData(object sender, EventArgs e)
		{
			Met.Rain = 0;		
		}
	}
}
```
        Irrigation
        Soil LincolnField: SoilType=LincolnSoil; LocalName=Lincoln; Site=Lincoln; NearestTown=Unknown; Region=NZ; NaturalVegetation=Unknown; Latitude=0; Longitude=0
          Water
            Thickness  BD   AirDry  LL15  DUL   SAT
            100        1.3  0.05    0.08  0.31  0.44
            200        1.3  0.05    0.07  0.3   0.44
            200        1.3  0.05    0.07  0.28  0.44
            200        1.3  0.05    0.09  0.31  0.44
            200        1.3  0.05    0.11  0.3   0.44
            200        1.3  0.05    0.16  0.28  0.44
            200        1.3  0.05    0.15  0.3   0.44
            200        1.3  0.05    0.12  0.34  0.44
            SoilCrop WheatSoil: LL=[0.08, 0.07, 0.07, 0.09, 0.11, 0.16, 0.15, 0.12]; KL=[0.06, 0.06, 0.06, 0.04, 0.03, 0.02, 0.02, 0.02]; XF=[1, 1, 1, 1, 0.6, 0.4, 0.4, 0.4]
          SoilWater: residueinterception=0; SummerDate=1-Nov; SummerU=7; SummerCona=3; WinterDate=1-Apr; WinterU=7; WinterCona=3; DiffusConst=40; DiffusSlope=16; Salb=0.2; CN2Bare=75; CNRed=20; CNCov=0.8; slope=0; discharge_width=0; catchment_area=0; max_pond=0
            Thickness  SWCON  KLAT
            100        0.6    0
            200        0.6    0
            200        0.6    0
            200        0.6    0
            200        0.6    0
            200        0.6    0
            200        0.6    0
            200        0.6    0
          SoilNitrogen: fom_type=[default, manure, mucuna, lablab, shemp, stable]; fract_carb=[0.2, 0.3, 0.54, 0.57, 0.45, 0]; fract_cell=[0.7, 0.3, 0.37, 0.37, 0.47, 0.1]; fract_lign=[0.1, 0.4, 0.09, 0.06, 0.08, 0.9]; wfpsN2N2O_x=[22, 88]; wfpsN2N2O_y=[0.1, 1]
          SoilOrganicMatter: RootCN=0; RootWt=0; SoilCN=0; EnrACoeff=0; EnrBCoeff=0; OCUnits=Total
            Thickness  OC    FBiom  FInert
            100        0.35  0.04   0.31
            200        0.27  0.03   0.31
            200        0.24  0.02   0.31
            200        0.16  0.01   0.31
            200        0.16  0.01   0.31
            200        0.3   0.01   0.25
            200        0.1   0.01   0.2
            200        0.1   0.01   0.2
          Analysis: Thickness=[100, 200, 200, 200, 200, 200, 200, 200]; PH=[8.5, 8.5, 8.6, 8.6, 8.6, 8.6, 8.6, 8.6]; PHUnits=Water; BoronUnits=HotWater
          Sample Initial nitrogen: NO3Units=ppm; NH4Units=ppm; SWUnits=Volumetric; OCUnits=Total; PHUnits=Water
            Thickness  NO3   NH4
            100        24.9  1.3
            200        16    1
            200        9.8   1
            200        9.8   0.8
            200        2.1   0.8
            200        2.1   0.5
            200        2.1   0.5
            200        2.1   0.5
          Sample Initial water: Thickness=[100, 200, 200, 200, 200, 200, 200, 200]; SW=[0.24, 0.27, 0.26, 0.23, 0.24, 0.23, 0.23, 0.18]; NO3Units=ppm; NH4Units=ppm; SWUnits=Volumetric; OCUnits=Total; PHUnits=Water
        SurfaceOrganicMatter Surface Organic Matter: PoolName=wheat_stubble; type=wheat; mass=1000; standing_fraction=0; cnr=80; CriticalResidueWeight=2000; OptimumDecompTemp=20; MaxCumulativeEOS=20; CNRatioDecompCoeff=0.277; CNRatioDecompThreshold=25; TotalLeachRain=25; MinRainToLeach=10; CriticalMinimumOrganicC=0.004; DefaultCPRatio=0; DefaultStandingFraction=0; StandingExtinctCoeff=0.5; FractionFaecesAdded=0.5
          Pools:
            {PoolName=wheat_stubble, ResidueType=wheat, Mass=1000, CNRatio=80, StandingFraction=0}
          ResidueTypes: LoadFromResource=ResidueTypes
        Plant Wheat: CropType=Wheat
        Fertiliser
        MicroClimate: a_interception=0; b_interception=1; c_interception=0; d_interception=0; soil_albedo=0.3; air_pressure=1010; soil_emissivity=0.96; sun_angle=15; soil_heat_flux_fraction=0.4; night_interception_fraction=0.5; windspeed_default=3; refheight=2; albedo=0.293662; emissivity=0.96; gsmax=0.01; r50=200
        Report: same as Mer86.Mer86Base.paddock.Report
      SoilArbitrator Soil Arbitrator
  Experiment Lincoln9192
    Factors
      Factor Irrig: Specifications=[IrrigationEvents]
        Operations 01
          1991-06-10  [Irrigation].Apply(7);
          1991-08-16  [Irrigation].Apply(7);
          1991-08-29  [Irrigation].Apply(20);
          1991-09-07  [Irrigation].Apply(12);
          1991-09-12  [Irrigation].Apply(22);
          1991-09-19  [Irrigation].Apply(4);
          1991-09-26  [Irrigation].Apply(7);
          1991-10-03  [Irrigation].Apply(27);
          1991-10-10  [Irrigation].Apply(18);
          1991-10-17  [Irrigation].Apply(30);
          1991-10-24  [Irrigation].Apply(42);
          1991-10-31  [Irrigation].Apply(33);
          1991-11-07  [Irrigation].Apply(24);
          1991-11-14  [Irrigation].Apply(28);
          1991-11-21  [Irrigation].Apply(37);
          1991-11-27  [Irrigation].Apply(51);
          1991-12-05  [Irrigation].Apply(36);
          1991-12-12  [Irrigation].Apply(38);
          1991-12-19  [Irrigation].Apply(35);
          1991-12-26  [Irrigation].Apply(47);
          1992-01-03  [Irrigation].Apply(40);
          1992-01-09  [Irrigation].Apply(41);
        Operations 03
          1991-06-10  [Irrigation].Apply(7);
          1991-08-16  [Irrigation].Apply(7);
          1991-08-29  [Irrigation].Apply(20);
          1991-09-26  [Irrigation].Apply(7);
          1991-10-24  [Irrigation].Apply(42);
          1991-10-31  [Irrigation].Apply(33);
          1991-11-07  [Irrigation].Apply(24);
          1991-11-14  [Irrigation].Apply(28);
          1991-11-21  [Irrigation].Apply(37);
          1991-11-27  [Irrigation].Apply(51);
          1991-12-05  [Irrigation].Apply(36);
          1991-12-12  [Irrigation].Apply(38);
          1991-12-19  [Irrigation].Apply(35);
          1991-12-26  [Irrigation].Apply(47);
          1992-01-03  [Irrigation].Apply(40);
          1992-01-09  [Irrigation].Apply(41);
        Operations 05
          1991-06-10  [Irrigation].Apply(7);
          1991-08-16  [Irrigation].Apply(7);
          1991-08-29  [Irrigation].Apply(20);
          1991-09-26  [Irrigation].Apply(7);
          1991-12-19  [Irrigation].Apply(35);
          1991-12-26  [Irrigation].Apply(47);
          1992-01-03  [Irrigation].Apply(40);
        Operations 06
          1991-06-10  [Irrigation].Apply(7);
          1991-08-16  [Irrigation].Apply(7);
          1991-08-29  [Irrigation].Apply(20);
          1991-09-07  [Irrigation].Apply(12);
          1991-09-12  [Irrigation].Apply(22);
          1991-09-19  [Irrigation].Apply(14);
          1991-09-26  [Irrigation].Apply(7);
        Operations 07
          1991-06-10  [Irrigation].Apply(7);
          1991-08-16  [Irrigation].Apply(7);
          1991-08-29  [Irrigation].Apply(20);
          1991-09-07  [Irrigation].Apply(12);
          1991-09-12  [Irrigation].Apply(22);
          1991-09-19  [Irrigation].Apply(14);
          1991-09-26  [Irrigation].Apply(7);
          1991-10-03  [Irrigation].Apply(27);
          1991-10-10  [Irrigation].Apply(18);
          1991-10-17  [Irrigation].Apply(30);
        Operations 08
          1991-06-10  [Irrigation].Apply(7);
          1991-08-16  [Irrigation].Apply(7);
          1991-08-29  [Irrigation].Apply(20);
          1991-09-07  [Irrigation].Apply(12);
          1991-09-12  [Irrigation].Apply(22);
          1991-09-19  [Irrigation].Apply(14);
          1991-09-26  [Irrigation].Apply(7);
          1991-10-03  [Irrigation].Apply(27);
          1991-10-10  [Irrigation].Apply(18);
          1991-10-17  [Irrigation].Apply(30);
          1991-10-24  [Irrigation].Apply(42);
          1991-10-31  [Irrigation].Apply(33);
          1991-11-07  [Irrigation].Apply(24);
        Operations 11
          1991-06-10  [Irrigation].Apply(7);
          1991-08-16  [Irrigation].Apply(7);
          1991-09-26  [Irrigation].Apply(7);
    Simulation LincolnBase: Area=0; Slope=0
      Clock: StartDate=1991-06-08; EndDate=1992-01-26
      Summary summaryfile
      Weather: FileName=Lincoln9192.met
      Zone paddock: Area=1; Slope=0
        Folder Manager folder
          Operations
            1991-06-08  [Wheat].Sow(population:300, cultivar:"Rongotea", depth:40, rowSpacing:250);
          Operations IrrigationEvents: same as RainShelter.Factors.Irrig.SpringD1
          Operations FertiliserEvents
            1991-06-10  [Fertiliser].Apply(30, Fertiliser.Types.NO3N, 0);
            1991-08-16  [Fertiliser].Apply(100, Fertiliser.Types.NO3N,0);
            1991-09-26  [Fertiliser].Apply(50, Fertiliser.Types.NO3N,0);
        Irrigation
        Soil: SoilType=LincolnSoil; LocalName=Lincoln; Site=Lincoln; NearestTown=Unknown; Region=NZ; NaturalVegetation=Unknown; Latitude=0; Longitude=0
          Water: same as RainShelter.Control_full_irrig.paddock.LincolnField.Water
          SoilWater: same as RainShelter.Control_full_irrig.paddock.LincolnField.SoilWater
          SoilNitrogen: fom_type=[default, manure, mucuna, lablab, shemp, stable]; fract_carb=[0.2, 0.3, 0.54, 0.57, 0.45, 0]; fract_cell=[0.7, 0.3, 0.37, 0.37, 0.47, 0.1]; fract_lign=[0.1, 0.4, 0.09, 0.06, 0.08, 0.9]; wfpsN2N2O_x=[22, 88]; wfpsN2N2O_y=[0.1, 1]
            oc=[0.360302, 0.270806, 0.241057, 0.16141, 0.160396, 0.299235, 0.0996345, 0.0996568]
          SoilOrganicMatter: same as RainShelter.Control_full_irrig.paddock.LincolnField.SoilOrganicMatter
          Analysis: Thickness=[100, 200, 200, 200, 200, 200, 200, 200]; PH=[8.5, 8.5, 8.6, 8.6, 8.6, 8.6, 8.6, 8.6]; PHUnits=Water; BoronUnits=HotWater
          Sample Initial nitrogen: NO3Units=ppm; NH4Units=ppm; SWUnits=Volumetric; OCUnits=Total; PHUnits=Water
            Thickness  NO3   NH4
            100        24.9  1.3
            200        16    1
            200        9.8   1
            200        9.8   0.8
            200        2.1   0.8
            200        2.1   0.5
            200        2.1   0.5
            200        2.1   0.5
          Sample Initial water: Thickness=[100, 200, 200, 200, 200, 200, 200, 200]; SW=[0.24, 0.27, 0.26, 0.23, 0.24, 0.23, 0.23, 0.18]; NO3Units=ppm; NH4Units=ppm; SWUnits=Volumetric; OCUnits=Total; PHUnits=Water
        SurfaceOrganicMatter Surface Organic Matter: same as RainShelter.Control_full_irrig.paddock.Surface Organic Matter
        Fertiliser
        MicroClimate: same as RainShelter.Control_full_irrig.paddock.MicroClimate
        Plant Wheat: CropType=Wheat
        Manager ResetSW
          reset_date = 1991-09-02
```csharp
using System;
using Models.Core;
using Models.PMF;
using Models.PMF.OilPalm;
using Models.Soils;
using Models.SurfaceOM;
using APSIM.Shared.Utilities;

namespace Models
{
	[Serializable]
	[System.Xml.Serialization.XmlInclude(typeof(Model))]
	public class Script : Model
	{
		[Link] Clock Clock;
		[Link] Soil Soil;
		[Link] SurfaceOrganicMatter SurfaceOM;
		[Description("Reset date")]
		public DateTime reset_date { get; set; }

		
		[EventSubscribe("DoManagement")]
		private void OnDoManagement(object sender, EventArgs e)
		{
			if (Clock.Today == reset_date)
				Soil.SoilWater.Reset();
		}
	}
}
```
        Report: same as Mer86.Mer86Base.paddock.Report
      SoilArbitrator Soil Arbitrator
  Experiment Cunderdin97
    Factors
      Factor Sow: Specifications=[SowingSchedule]
        Operations SpearEarly
          1997-06-06  [Wheat].Sow(population:150, cultivar:"Spear", depth:30, rowSpacing:250);
        Operations SpearMid
          1997-07-08  [Wheat].Sow(population:108, cultivar:"Spear", depth:30, rowSpacing:250);
        Operations WilgoyneEarly
          1997-06-06  [Wheat].Sow(population:150, cultivar:"Wilgoyne", depth:30, rowSpacing:250);
        Operations WilgoyneMid
          1997-07-08  [Wheat].Sow(population:108, cultivar:"Wilgoyne", depth:30, rowSpacing:250);
        Operations WilgoyneLate
          1997-07-08  [Wheat].Sow(population:100, cultivar:"Wilgoyne", depth:30, rowSpacing:250);
      Factor SowN: Specifications=[SowingFertiliser].Script.Amount=0,50
      Factor TopN: Specifications=[SowingFertiliser].Script.Amount=0,30
      Factor Irr: Specifications=[IrrigationSchedule]
        Operations Wet
          1997-09-23  [Irrigation].Apply(amount:15);
          1997-10-01  [Irrigation].Apply(amount:15);
          1997-10-06  [Irrigation].Apply(amount:15);
          1997-10-14  [Irrigation].Apply(amount:20);
          1997-10-21  [Irrigation].Apply(amount:17.5);
          1997-10-26  [Irrigation].Apply(amount:17.5);
        Operations Dry
    Simulation Cunderdin97Base: Area=0; Slope=0
      Clock: StartDate=1997-04-16; EndDate=1997-12-30
      Summary summaryfile
      Weather: FileName=Cunderdin.met
      Zone paddock: Area=1; Slope=0
        Irrigation
        Soil: SoilType=heavy; LocalName=Beverley; Site=Cunderdin; NearestTown=Cunderdin; Region=WA; NaturalVegetation=Unknown; Latitude=0; Longitude=0
          Water
            Thickness  BD   AirDry  LL15   DUL    SAT
            50         1.3  0.034   0.07   0.156  0.48
            50         1.3  0.034   0.07   0.156  0.48
            100        1.4  0.121   0.121  0.22   0.44
            100        1.4  0.123   0.123  0.224  0.44
            100        1.5  0.132   0.132  0.243  0.4
            100        1.5  0.132   0.132  0.243  0.4
            100        1.5  0.135   0.135  0.243  0.4
            100        1.5  0.145   0.145  0.243  0.4
            200        1.5  0.145   0.145  0.243  0.4
            200        1.5  0.145   0.145  0.243  0.4
            200        1.5  0.145   0.145  0.243  0.4
            200        1.5  0.145   0.145  0.243  0.4
            200        1.5  0.145   0.145  0.243  0.4
            200        1.5  0.145   0.145  0.243  0.4
            200        1.5  0.145   0.145  0.243  0.4
            200        1.5  0.145   0.145  0.243  0.4
            200        1.5  0.145   0.145  0.243  0.4
            SoilCrop wheatSoil
              LL=[0.07, 0.07, 0.121, 0.123, 0.132, 0.132, 0.135, 0.145, 0.145, 0.145, 0.145, 0.145, 0.145, 0.145, 0.145, 0.145, 0.145]
              KL=[0.06, 0.06, 0.05, 0.05, 0.04, 0.04, 0.04, 0.04, 0.03, 0.03, 0.03, 0.03, 0.03, 0.03, 0.03, 0.03, 0.03]
              XF=[0.7, 0.6, 0.5, 0.5, 0.5, 0.5, 0.5, 0.5, 0.3, 0.3, 0.3, 0.3, 0.3, 0.3, 0.3, 0.3, 0.3]
          SoilWater: residueinterception=0; SummerDate=1-Nov; SummerU=7.5; SummerCona=3; WinterDate=1-Apr; WinterU=7.5; WinterCona=3; DiffusConst=88; DiffusSlope=35; Salb=0.13; CN2Bare=25; CNRed=20; CNCov=0.8; slope=0; discharge_width=0; catchment_area=0; max_pond=0
            Thickness  SWCON  KLAT
            50         0.6    0
            50         0.6    0
            100        0.6    0
            100        0.6    0
            100        0.6    0
            100        0.6    0
            100        0.6    0
            100        0.6    0
            200        0.6    0
            200        0.6    0
            200        0.6    0
            200        0.6    0
            200        0.6    0
            200        0.6    0
            200        0.6    0
            200        0.6    0
            200        0.6    0
          SoilOrganicMatter: RootCN=40; RootWt=500; SoilCN=13; EnrACoeff=1; EnrBCoeff=1; OCUnits=Total
            Thickness  OC    FBiom  FInert
            50         0.73  0.03   0.3
            50         0.73  0.03   0.3
            100        0.46  0.02   0.3
            100        0.39  0.01   0.4
            100        0.3   0.01   0.8
            100        0.22  0.01   0.9
            100        0.19  0.01   0.9
            100        0.19  0.01   0.9
            200        0.1   0.01   0.9
            200        0.1   0.01   0.9
            200        0.1   0.01   0.9
            200        0.1   0.01   0.9
            200        0.1   0.01   0.9
            200        0.1   0.01   0.9
            200        0.1   0.01   0.9
            200        0.1   0.01   0.9
            200        0.1   0.01   0.9
          Analysis: PH=[4.7, 4.7, 4.7, 4.7, 6, 6, 6, 6, 6, 6, 6, 6, 6, 6, 6, 6, 6]; PHUnits=Water; BoronUnits=HotWater
            Thickness=[50, 50, 100, 100, 100, 100, 100, 100, 200, 200, 200, 200, 200, 200, 200, 200, 200]
          Sample: NO3Units=ppm; NH4Units=ppm; SWUnits=Volumetric; OCUnits=Total; PHUnits=Water
            Thickness  NO3  NH4  SW
            50         23   2    0.034
            50         23   2    0.156
            100        12   1    0.22
            100        9    2    0.224
            100        4    1    0.244
            100        2    1    0.245
            100        2    1    0.246
            100        2    1    0.243
            200        2    1    0.24
            200        2    1    0.145
            200        2    1    0.145
            200        2    1    0.145
            200        2    1    0.145
            200        2    1    0.145
            200        2    1    0.145
            200        2    1    0.145
            200        2    1    0.145
          SoilNitrogen: fom_type=[default, manure, mucuna, lablab, shemp, stable]; fract_carb=[0.2, 0.3, 0.54, 0.57, 0.45, 0]; fract_cell=[0.7, 0.3, 0.37, 0.37, 0.47, 0.1]; fract_lign=[0.1, 0.4, 0.09, 0.06, 0.08, 0.9]; wfpsN2N2O_x=[22, 88]; wfpsN2N2O_y=[0.1, 1]
            oc=[0.723526, 0.723012, 0.45528, 0.387092, 0.299501, 0.219998, 0.190011, 0.189986, 0.099965, 0.0999681, 0.0999903, 0.100014, 0.100005, 0.1, 0.1, 0.1, 0.0999999]
        SurfaceOrganicMatter: PondActive=no; ReportAdditions=no; ReportRemovals=no; PoolName=wheat_stubble; type=wheat; mass=500; standing_fraction=0; cpr=0; cnr=120; CriticalResidueWeight=2000; OptimumDecompTemp=20; MaxCumulativeEOS=20; CNRatioDecompCoeff=0.277; CNRatioDecompThreshold=25; TotalLeachRain=25; MinRainToLeach=10; CriticalMinimumOrganicC=0.004; DefaultCPRatio=0; DefaultStandingFraction=0; StandingExtinctCoeff=0.5; FractionFaecesAdded=0.5
          Pools:
            {PoolName=wheat_stubble, ResidueType=wheat, Mass=500, CNRatio=120, CPRatio=0, StandingFraction=0}
          ResidueTypes: LoadFromResource=ResidueTypes
          TillageTypes TillageTypesList
        Fertiliser
        Plant Wheat: CropType=Wheat
        Operations IrrigationSchedule: same as APS14.APS14StubbleBareNRate0.paddock.IrrigationSchedule
        MicroClimate: same as APS26.APS26NRate160WaterWet.paddock.MicroClimate
        Operations SowingSchedule
          1993-06-29  [Wheat].Sow(population:114, cultivar:"GattonHartog", depth:30, rowSpacing:250);
        PredictedObserved: FieldNameUsedForMatch=Wheat.Zadok.Stage
        Manager ExtraVariables: same as APS14.APS14StubbleBareNRate0.paddock.ExtraVariables
        Manager SowingFertiliser
          Amount = 160
```csharp
using System;
using Models.Core;
using Models.PMF;
using APSIM.Shared.Utilities;

namespace Models
{
	[Serializable]
	public class Script : Model
	{
		[Link] Clock Clock;
		[Link] Fertiliser Fertiliser;
		[Link] Summary Summary;
		
		[Description("Amount of fertiliser to be applied")]
		public double Amount { get; set; }

		[EventSubscribe("Sowing")]
		private void OnSowing(object sender, EventArgs e)
		{
			Fertiliser.Apply(Amount: Amount, Type: Fertiliser.Types.NO3N);
		}
		
	}
}
```
        Manager TopdressFertiliser
          FertDayOfYear = 239
          Amount = 0
          script: same as in APS26.APS26NRate160WaterWet.paddock.ApplyFertiliser
        Report: same as Mer86.Mer86Base.paddock.Report
      SoilArbitrator Soil Arbitrator
  Experiment Mouse
    Factors
      Factor Damage: Specifications=[DamageSchedule]
        Operations Control
          2002-09-10  //[Wheat].Population.KillCrop(KillFraction:0.0);
        Operations Emerg05
          2002-09-10  //[Wheat].Population.KillCrop(KillFraction:0.05);
        Operations Emerg10
          2002-09-10  //[Wheat].Population.KillCrop(KillFraction:0.10);
        Operations Emerg25
          2002-09-10  //[Wheat].Population.KillCrop(KillFraction:0.25);
        Operations Emerg50
          2002-09-10  //[Wheat].Population.KillCrop(KillFraction:0.5);
        Operations Tiller05
          2002-10-11  //[Wheat].Population.KillCrop(KillFraction:0.05);
        Operations Tiller10
          2002-10-11  //[Wheat].Population.KillCrop(KillFraction:0.10);
        Operations Tiller25
          2002-10-11  //[Wheat].Population.KillCrop(KillFraction:0.25);
        Operations Tiller50
          2002-10-11  //[Wheat].Population.KillCrop(KillFraction:0.5);
        Operations Boot05
          2002-10-31  //[Wheat].Population.KillCrop(KillFraction:0.05);
        Operations Boot10
          2002-10-31  //[Wheat].Population.KillCrop(KillFraction:0.10);
        Operations Boot25
          2002-10-31  //[Wheat].Population.KillCrop(KillFraction:0.25);
        Operations Boot50
          2002-10-31  //[Wheat].Population.KillCrop(KillFraction:0.5);
        Operations PreHarv05
          2002-12-13  //[Wheat].Population.KillCrop(KillFraction:0.05);
        Operations PreHarv10
          2002-12-13  //[Wheat].Population.KillCrop(KillFraction:0.10);
        Operations PreHarv25
          2002-12-13  //[Wheat].Population.KillCrop(KillFraction:0.25);
        Operations PreHarv50
          2002-12-13  //[Wheat].Population.KillCrop(KillFraction:0.5);
    Simulation MouseBase: Area=0; Slope=0
      Clock: StartDate=2002-07-10; EndDate=2002-12-31
      Summary summaryfile
      Weather: FileName=hall2002.met
      Zone paddock: Area=1; Slope=0
        Irrigation
        Soil: SoilType=unknown; LocalName=Ginninderra; Site=Ginninderra; NearestTown=Ginninderra; Region=ACT; NaturalVegetation=Unknown; Latitude=0; Longitude=0
          InitialWater: PercentMethod=FilledFromTop; FractionFull=1
          Water
            Thickness  BD    AirDry  LL15   DUL    SAT
            100        1.45  0.04    0.073  0.21   0.414
            100        1.5   0.04    0.075  0.234  0.394
            100        1.55  0.06    0.074  0.22   0.375
            100        1.5   0.1     0.12   0.29   0.394
            100        1.52  0.1     0.16   0.293  0.386
            100        1.55  0.1     0.25   0.37   0.375
            100        1.57  0.1     0.25   0.36   0.367
            100        1.6   0.1     0.24   0.35   0.355
            100        1.62  0.1     0.259  0.34   0.347
            100        1.65  0.1     0.281  0.33   0.335
            100        1.62  0.1     0.295  0.34   0.347
            100        1.6   0.1     0.272  0.35   0.355
            100        1.58  0.1     0.269  0.36   0.363
            100        1.55  0.1     0.264  0.37   0.375
            100        1.55  0.1     0.256  0.37   0.375
            100        1.55  0.1     0.256  0.355  0.375
            100        1.55  0.1     0.256  0.35   0.375
            100        1.55  0.1     0.256  0.33   0.375
            100        1.55  0.1     0.256  0.33   0.375
            100        1.55  0.1     0.256  0.33   0.375
            SoilCrop wheatSoil
              LL=[0.073, 0.075, 0.074, 0.12, 0.16, 0.25, 0.25, 0.24, 0.259, 0.281, 0.295, 0.272, 0.269, 0.264, 0.256, 0.256, 0.256, 0.256, 0.256, 0.256]
              KL=[0.08, 0.08, 0.08, 0.08, 0.08, 0.08, 0.08, 0.08, 0.08, 0.07, 0.07, 0.06, 0.06, 0.05, 0.05, 0.04, 0.04, 0.03, 0.02, 0.01]
              XF=[1, 1, 1, 1, 1, 1, 1, 1, 1, 1, 1, 1, 1, 1, 1, 1, 1, 1, 0, 0]
          SoilWater: residueinterception=0; SummerDate=1-Nov; SummerU=2; SummerCona=2; WinterDate=1-Apr; WinterU=2; WinterCona=2; DiffusConst=88; DiffusSlope=35.4; Salb=0.13; CN2Bare=72; CNRed=20; CNCov=0.8; slope=0; discharge_width=0; catchment_area=0; max_pond=0
            Thickness  SWCON  KLAT
            100        0.4    0
            100        0.4    0
            100        0.4    0
            100        0.4    0
            100        0.4    0
            100        0.4    0
            100        0.4    0
            100        0.4    0
            100        0.4    0
            100        0.4    0
            100        0.4    0
            100        0.4    0
            100        0.4    0
            100        0.4    0
            100        0.4    0
            100        0.4    0
            100        0.4    0
            100        0.4    0
            100        0.4    0
            100        0.4    0
          SoilOrganicMatter: RootCN=40; RootWt=2000; SoilCN=14.5; EnrACoeff=1; EnrBCoeff=1; OCUnits=Total
            Thickness  OC    FBiom  FInert
            100        0.83  0.04   0.36
            100        0.35  0.03   0.35
            100        0.33  0.03   0.45
            100        0.22  0.02   0.45
            100        0.22  0.02   0.59
            100        0.22  0.02   0.6
            100        0.19  0.02   0.84
            100        0.17  0.02   0.8
            100        0.15  0.01   0.8
            100        0.12  0.01   0.99
            100        0.11  0.01   0.99
            100        0.1   0.01   0.99
            100        0.1   0.01   0.99
            100        0.1   0.01   0.99
            100        0.1   0.01   0.99
            100        0.1   0.01   0.99
            100        0.1   0.01   0.99
            100        0.1   0.01   0.99
            100        0.1   0.01   0.99
            100        0.1   0.01   0.99
          Analysis: PHUnits=Water; BoronUnits=HotWater
            Thickness=[100, 100, 100, 100, 100, 100, 100, 100, 100, 100, 100, 100, 100, 100, 100, 100, 100, 100, 100, 100]
            PH=[5.8, 5.9, 6.6, 6.8, 7, 7.1, 7.2, 7.3, 7.4, 7.4, 7.6, 7.8, 8, 8.2, 8.3, 8.4, 8.4, 8.5, 8.5, 8.5]
          Sample: NO3Units=ppm; NH4Units=ppm; SWUnits=Volumetric; OCUnits=Total; PHUnits=Water
            Thickness  NO3  NH4
            100        10   1
            100        15   1
            100        10   1
            100        8    1
            100        5    1
            100        2    1
            100        1    1
            100        1    1
            100        1    1
            100        1    1
            100        1    1
            100        1    1
            100        1    1
            100        1    1
            100        0    0
            100        0    0
            100        0    0
            100        0    0
            100        0    0
            100        0    0
          SoilNitrogen: fom_type=[default, manure, mucuna, lablab, shemp, stable]; fract_carb=[0.2, 0.3, 0.54, 0.57, 0.45, 0]; fract_cell=[0.7, 0.3, 0.37, 0.37, 0.47, 0.1]; fract_lign=[0.1, 0.4, 0.09, 0.06, 0.08, 0.9]; wfpsN2N2O_x=[22, 88]; wfpsN2N2O_y=[0.1, 1]
            oc=[0.830987, 0.349129, 0.329455, 0.220339, 0.220441, 0.220335, 0.190667, 0.170504, 0.150477, 0.120544, 0.110476, 0.100412, 0.100356, 0.100312, 0.100249, 0.100216, 0.100177, 0.100129, 0.100094, 0.100043]
        SurfaceOrganicMatter: PondActive=no; ReportAdditions=no; ReportRemovals=no; PoolName=canola_stubble; type=canola; mass=1000; standing_fraction=0; cpr=0; cnr=20; CriticalResidueWeight=2000; OptimumDecompTemp=20; MaxCumulativeEOS=20; CNRatioDecompCoeff=0.277; CNRatioDecompThreshold=25; TotalLeachRain=25; MinRainToLeach=10; CriticalMinimumOrganicC=0.004; DefaultCPRatio=0; DefaultStandingFraction=0; StandingExtinctCoeff=0.5; FractionFaecesAdded=0.5
          Pools:
            {PoolName=canola_stubble, ResidueType=canola, Mass=1000, CNRatio=20, CPRatio=0, StandingFraction=0}
          ResidueTypes: LoadFromResource=ResidueTypes
          TillageTypes TillageTypesList
        Fertiliser
        Plant Wheat: CropType=Wheat
        Operations IrrigationSchedule
          2002-11-08  [Irrigation].Apply(amount:35);
          2002-11-22  [Irrigation].Apply(amount:35);
        MicroClimate: same as APS26.APS26NRate160WaterWet.paddock.MicroClimate
        Operations SowingSchedule
          2002-08-15  [Wheat].Sow(population:100, cultivar:"Hartog", depth:30, rowSpacing:250);
        Manager SowingFertiliser
          Amount = 100
          script: same as in Cunderdin97.Cunderdin97Base.paddock.SowingFertiliser
        Manager ExtraVariables: same as APS14.APS14StubbleBareNRate0.paddock.ExtraVariables
        Operations DamageSchedule
          2002-09-10  [Wheat].Population.KillCrop(KillFraction:0.0);
        Report: same as Mer86.Mer86Base.paddock.Report
      SoilArbitrator Soil Arbitrator
  Experiment Wongan83
    Factors
      Factor Soil: Specifications=[WonganSoil]
        Soil Ripped: SoilType=sand; LocalName=WonganSite; Site=WonganSite; NearestTown=Unknown; Region=WA; NaturalVegetation=Unknown; Latitude=0; Longitude=0
          Water
            Thickness  BD    AirDry  LL15  DUL   SAT
            50         1.31  0.04    0.07  0.11  0.35
            50         1.31  0.05    0.07  0.11  0.35
            100        1.45  0.05    0.08  0.14  0.35
            200        1.48  0.05    0.09  0.14  0.35
            200        1.53  0.05    0.09  0.15  0.35
            200        1.5   0.05    0.09  0.15  0.35
            400        1.5   0.05    0.1   0.16  0.35
            400        1.5   0.05    0.11  0.17  0.35
            600        1.5   0.05    0.13  0.17  0.35
            600        1.5   0.05    0.13  0.17  0.35
            SoilCrop WheatSoil
              LL=[0.08, 0.08, 0.09, 0.1, 0.11, 0.12, 0.12, 0.12, 0.14, 0.14]
              KL=[0.06, 0.06, 0.06, 0.06, 0.06, 0.06, 0.06, 0.06, 0.06, 0.06]
              XF=[1, 1, 1, 1, 1, 1, 1, 1, 1, 1]
          SoilWater: residueinterception=0; SummerDate=1-Nov; SummerU=6; SummerCona=2; WinterDate=1-Apr; WinterU=6; WinterCona=2; DiffusConst=88; DiffusSlope=35; Salb=0.13; CN2Bare=60; CNRed=20; CNCov=0.8; max_pond=0; Thickness=[50, 50, 100, 200, 200, 200, 400, 400, 600, 600]
            SWCON=[0.35, 0.35, 0.35, 0.35, 0.35, 0.35, 0.35, 0.35, 0.35, 0.35]
          SoilOrganicMatter: RootCN=40; RootWt=1500; SoilCN=13; EnrACoeff=1; EnrBCoeff=1; OCUnits=Total
            Thickness  OC    FBiom  FInert
            50         1.23  0.04   0.1
            50         0.43  0.04   0.1
            100        0.37  0.03   0.1
            200        0.26  0.02   0.2
            200        0.21  0.01   0.8
            200        0.2   0.01   0.9
            400        0.18  0.01   0.9
            400        0.18  0.01   0.9
            600        0.17  0.01   0.9
            600        0.17  0.01   0.9
          Analysis: Thickness=[50, 50, 100, 200, 200, 200, 400, 400, 600, 600]; PH=[4.7, 5.1, 5.1, 6, 6, 6, 6, 6, 6, 6]; PHUnits=Water; BoronUnits=HotWater
          Sample: NO3Units=ppm; NH4Units=ppm; SWUnits=Volumetric; OCUnits=Total; PHUnits=Water
            Thickness  NO3  NH4  SW
            50         7    2    0.07
            50         7    2    0.07
            100        5    1    0.13
            200        3    1    0.14
            200        2    0    0.14
            200        2    0    0.11
            400        2    0    0.1
            400        1    0    0.11
            600        1    0    0.12
            600        1    0    0.13
          SoilNitrogen: same as Mouse.MouseBase.paddock.Soil.SoilNitrogen
        Soil Unripped: SoilType=sand; LocalName=WonganSite; Site=WonganSite; NearestTown=Unknown; Region=WA; NaturalVegetation=Unknown; Latitude=0; Longitude=0
          Water
            Thickness  BD    AirDry  LL15  DUL   SAT
            50         1.31  0.04    0.07  0.13  0.35
            50         1.31  0.05    0.07  0.13  0.35
            100        1.45  0.05    0.08  0.14  0.35
            200        1.48  0.05    0.09  0.14  0.35
            200        1.53  0.05    0.09  0.15  0.35
            200        1.5   0.05    0.09  0.15  0.35
            400        1.5   0.05    0.1   0.16  0.35
            400        1.5   0.05    0.11  0.17  0.35
            600        1.5   0.05    0.13  0.17  0.35
            600        1.5   0.05    0.13  0.17  0.35
            SoilCrop WheatSoil
              LL=[0.08, 0.08, 0.09, 0.1, 0.11, 0.12, 0.12, 0.12, 0.14, 0.14]
              KL=[0.06, 0.06, 0.06, 0.06, 0.06, 0.06, 0.06, 0.06, 0.06, 0.06]
              XF=[0.2, 0.1, 0.2, 0.7, 1, 1, 1, 1, 1, 1]
          SoilWater: same as Wongan83.Factors.Soil.Ripped.SoilWater
          SoilOrganicMatter: same as Wongan83.Factors.Soil.Ripped.SoilOrganicMatter
          Analysis: Thickness=[50, 50, 100, 200, 200, 200, 400, 400, 600, 600]; PH=[4.7, 5.1, 5.1, 6, 6, 6, 6, 6, 6, 6]; PHUnits=Water; BoronUnits=HotWater
          Sample: same as Wongan83.Factors.Soil.Ripped.Sample
          SoilNitrogen: same as Mouse.MouseBase.paddock.Soil.SoilNitrogen
      Factor N: Specifications=[SowingFertiliser].Script.Amount=0,10,25,50,100
    Simulation WonganBase: Area=0; Slope=0
      Clock: StartDate=1983-06-13; EndDate=1983-11-11
      Summary summaryfile
      Weather: FileName=Wongan83.met
      Zone paddock: Area=1; Slope=0
        Irrigation
        Soil WonganSoil: SoilType=unknown; LocalName=Ginninderra; Site=Ginninderra; NearestTown=Ginninderra; Region=ACT; NaturalVegetation=Unknown; Latitude=0; Longitude=0
          InitialWater: PercentMethod=FilledFromTop; FractionFull=1
          Water: same as Mouse.MouseBase.paddock.Soil.Water
          SoilWater: same as Mouse.MouseBase.paddock.Soil.SoilWater
          SoilOrganicMatter: same as Mouse.MouseBase.paddock.Soil.SoilOrganicMatter
          Analysis: PHUnits=Water; BoronUnits=HotWater
            Thickness=[100, 100, 100, 100, 100, 100, 100, 100, 100, 100, 100, 100, 100, 100, 100, 100, 100, 100, 100, 100]
            PH=[5.8, 5.9, 6.6, 6.8, 7, 7.1, 7.2, 7.3, 7.4, 7.4, 7.6, 7.8, 8, 8.2, 8.3, 8.4, 8.4, 8.5, 8.5, 8.5]
          Sample: same as Mouse.MouseBase.paddock.Soil.Sample
          SoilNitrogen: fom_type=[default, manure, mucuna, lablab, shemp, stable]; fract_carb=[0.2, 0.3, 0.54, 0.57, 0.45, 0]; fract_cell=[0.7, 0.3, 0.37, 0.37, 0.47, 0.1]; fract_lign=[0.1, 0.4, 0.09, 0.06, 0.08, 0.9]; wfpsN2N2O_x=[22, 88]; wfpsN2N2O_y=[0.1, 1]
            oc=[0.835354, 0.35073, 0.330728, 0.221338, 0.221193, 0.220685, 0.191071, 0.170898, 0.150786, 0.120778, 0.110619, 0.100528, 0.100411, 0.100323, 0.100272, 0.100233, 0.100199, 0.10017, 0.100144, 0.100122]
        SurfaceOrganicMatter: PondActive=no; ReportAdditions=no; ReportRemovals=no; PoolName=wheat_stubble; type=wheat; mass=1000; standing_fraction=0; cpr=0; cnr=20; CriticalResidueWeight=2000; OptimumDecompTemp=20; MaxCumulativeEOS=20; CNRatioDecompCoeff=0.277; CNRatioDecompThreshold=25; TotalLeachRain=25; MinRainToLeach=10; CriticalMinimumOrganicC=0.004; DefaultCPRatio=0; DefaultStandingFraction=0; StandingExtinctCoeff=0.5; FractionFaecesAdded=0.5
          Pools:
            {PoolName=wheat_stubble, ResidueType=wheat, Mass=1000, CNRatio=20, CPRatio=0, StandingFraction=0}
          ResidueTypes: LoadFromResource=ResidueTypes
          TillageTypes TillageTypesList
        Fertiliser
        Plant Wheat: CropType=Wheat
        MicroClimate: same as APS26.APS26NRate160WaterWet.paddock.MicroClimate
        Operations SowingSchedule
          1983-06-14  [Wheat].Sow(population:159, cultivar:"gamenya", depth:80, rowSpacing:250);
        Manager SowingFertiliser
          Amount = 0
          script: same as in Cunderdin97.Cunderdin97Base.paddock.SowingFertiliser
        Manager ExtraVariables: same as APS14.APS14StubbleBareNRate0.paddock.ExtraVariables
        Report: same as Mer86.Mer86Base.paddock.Report
      SoilArbitrator Soil Arbitrator
  Experiment Lincoln2014
    Factors
      Factor Irrig: Specifications=[IrrigationEvents]
        Operations Full
          2013-05-14  [Irrigation].Apply(25);
          2013-05-29  [Irrigation].Apply(9.2);
          2013-06-11  [Irrigation].Apply(12);
          2013-09-16  [Irrigation].Apply(34.6);
          2013-09-25  [Irrigation].Apply(46.3);
          2013-10-01  [Irrigation].Apply(19.3);
          2013-10-08  [Irrigation].Apply(24.9);
          2013-10-15  [Irrigation].Apply(21);
          2013-10-22  [Irrigation].Apply(39);
          2013-10-29  [Irrigation].Apply(44);
          2013-11-05  [Irrigation].Apply(40);
          2013-11-12  [Irrigation].Apply(35);
          2013-11-19  [Irrigation].Apply(33);
          2013-11-26  [Irrigation].Apply(32);
          2013-12-03  [Irrigation].Apply(35);
          2013-12-10  [Irrigation].Apply(49);
          2013-12-17  [Irrigation].Apply(47);
          2013-12-24  [Irrigation].Apply(0);
          2013-12-31  [Irrigation].Apply(0);
        Operations Nil
          2013-09-16  [Irrigation].Apply(4.6);
          2013-09-25  [Irrigation].Apply(3.5);
        Operations VeryEarly
          2013-09-16  [Irrigation].Apply(4.6);
          2013-09-25  [Irrigation].Apply(3.5);
          2013-11-19  [Irrigation].Apply(33);
          2013-11-26  [Irrigation].Apply(32);
          2013-12-03  [Irrigation].Apply(35);
          2013-12-10  [Irrigation].Apply(49);
          2013-12-17  [Irrigation].Apply(47);
          2013-12-24  [Irrigation].Apply(49);
        Operations Early
          2013-05-14  [Irrigation].Apply(25);
          2013-05-29  [Irrigation].Apply(9.2);
          2013-06-11  [Irrigation].Apply(12);
          2013-09-16  [Irrigation].Apply(34.6);
          2013-09-25  [Irrigation].Apply(46.5);
          2013-12-10  [Irrigation].Apply(49);
          2013-12-17  [Irrigation].Apply(47);
          2013-12-24  [Irrigation].Apply(49);
          2013-12-31  [Irrigation].Apply(20.3);
          2013-12-24  [Irrigation].Apply(49);
          2013-12-31  [Irrigation].Apply(20.3);
        Operations Middle
          2013-05-14  [Irrigation].Apply(25);
          2013-05-29  [Irrigation].Apply(9.2);
          2013-06-11  [Irrigation].Apply(12);
          2013-09-16  [Irrigation].Apply(34.6);
          2013-09-25  [Irrigation].Apply(46.3);
          2013-10-01  [Irrigation].Apply(19.3);
          2013-12-17  [Irrigation].Apply(47);
          2013-12-24  [Irrigation].Apply(49);
          2013-12-31  [Irrigation].Apply(20.3);
        Operations Late
          2013-05-14  [Irrigation].Apply(25);
          2013-05-29  [Irrigation].Apply(9.2);
          2013-06-11  [Irrigation].Apply(12);
          2013-09-16  [Irrigation].Apply(34.6);
          2013-09-25  [Irrigation].Apply(46.3);
          2013-10-01  [Irrigation].Apply(19.3);
          2013-10-08  [Irrigation].Apply(24.9);
          2013-10-15  [Irrigation].Apply(21);
          2013-10-22  [Irrigation].Apply(39);
    Simulation Rainshelter2013: Area=0; Slope=0
      Clock: StartDate=2013-02-01; EndDate=2014-02-01
      Summary summaryfile
      Weather: FileName=%root%\Examples\WeatherFiles\lincoln.met
      SoilArbitrator Soil Arbitrator
      Zone paddock: Area=1; Slope=0
        Soil TempletonSiltLoam: SoilType=NZ_sedementary; Region=Plains; State=Canterbury; Country=New Zealand; Latitude=0; Longitude=0
          DataSource=Generic profile descriptions provided by Trevor Webb and data for functional horizions based on SWAMP project results
          Comments=Bulk density values were measured on the fine earth fraction so values entered into apsim soil are adjusted down to account for stone content (assuming stones are inert from all soil process so their mass and volume is removed from model paramaters).  SAT, DUL, LL15 and Air dry have been adjusted down to account for stone content.  OC has not been adjusted so the model will get the correct carbon and N amounts using the adjusted BD.
          Analysis: Thickness=[180, 150, 400, 270, 500]; PH=[6, 6, 6, 6, 6]; PHUnits=Water; BoronUnits=HotWater
          Water
            Thickness  BD     AirDry  LL15  DUL   SAT
            200        1      0.05    0.1   0.32  0.419
            200        1.324  0.12    0.15  0.35  0.405
            200        1.35   0.1     0.1   0.3   0.37
            200        1.301  0.08    0.08  0.3   0.37
            200        1.301  0.06    0.07  0.28  0.33
            200        1.301  0.06    0.08  0.25  0.32
            200        1.301  0.1     0.1   0.23  0.3
            200        1.301  0.1     0.1   0.24  0.31
            SoilCrop WheatSoil: LL=[0.1, 0.12, 0.1, 0.08, 0.06, 0.08, 0.1, 0.1]; KL=[0.06, 0.06, 0.1, 0.1, 0.05, 0.03, 0.02, 0.01]; XF=[1, 1, 1, 1, 1, 1, 1, 1]
          SoilWater: residueinterception=0; SummerDate=1-sep; SummerU=9; SummerCona=4.4; WinterDate=1-Apr; WinterU=2; WinterCona=1.5; DiffusConst=88; DiffusSlope=35; Salb=0.13; CN2Bare=73; CNRed=20; CNCov=0.8; max_pond=0; Thickness=[200, 200, 200, 200, 200, 200, 200, 200]; SWCON=[0.9, 0.5, 0.6, 0.4, 0.4, 0.4, 0.9, 0.9]
          SoilNitrogen: fom_type=[default, manure, mucuna, lablab, shemp, stable]; fract_carb=[0.2, 0.3, 0.54, 0.57, 0.45, 0]; fract_cell=[0.7, 0.3, 0.37, 0.37, 0.47, 0.1]; fract_lign=[0.1, 0.4, 0.09, 0.06, 0.08, 0.9]; wfpsN2N2O_x=[22, 88]; wfpsN2N2O_y=[0.1, 1]
          SoilOrganicMatter: RootCN=40; RootWt=1000; SoilCN=11; EnrACoeff=7.4; EnrBCoeff=0.2; OCUnits=Total
            Thickness  OC        FBiom      FInert
            180        2.6251    0.0333099  0.437121
            150        1.24694   0.0186614  0.656885
            400        0.316004  0.0116634  0.849635
            270        0.207954  0.0102229  0.94496
            500        0.200366  0.0100221  0.982659
          Sample: NO3Units=kgha; NH4Units=kgha; SWUnits=Volumetric; OCUnits=Total; PHUnits=Water
            Thickness  NO3  NH4  SW
            200        530  3    0.35
            200        15   2    0.35
            200        15   1    0.25
            200        10   1    0.25
            200        5    1    0.25
            200        5    1    0.2
            200        5    1    0.18
            200        5    1    0.2
        Plant Wheat: CropType=Wheat
        Folder Manager folder
          Operations SowingAndHarvest
            2013-03-25  [Wheat].Sow(population:165, cultivar:"Wakanui", depth:20, rowSpacing:130);
          Operations IrrigationEvents
            2013-05-14  [Irrigation].Apply(25);
            2013-05-29  [Irrigation].Apply(9.2);
            2013-06-11  [Irrigation].Apply(12);
            2013-09-16  [Irrigation].Apply(34.6);
            2013-09-25  [Irrigation].Apply(43);
            2013-10-01  [Irrigation].Apply(19.3);
            2013-10-08  [Irrigation].Apply(24.9);
            2013-10-15  [Irrigation].Apply(21);
            2013-10-22  [Irrigation].Apply(39);
            2013-10-29  [Irrigation].Apply(44);
            2013-11-05  [Irrigation].Apply(40);
            2013-11-12  [Irrigation].Apply(35);
            2013-11-19  [Irrigation].Apply(33);
            2013-11-26  [Irrigation].Apply(32);
            2013-12-03  [Irrigation].Apply(35);
            2013-12-10  [Irrigation].Apply(49);
            2013-12-17  [Irrigation].Apply(47);
            2013-12-24  [Irrigation].Apply(0);
            2013-12-31  [Irrigation].Apply(0);
          Operations FertiliserEvents
            2013-09-26  [Fertiliser].Apply(100, Fertiliser.Types.UreaN, 10);
            2013-11-13  [Fertiliser].Apply(100, Fertiliser.Types.UreaN, 10);;
          Operations Flood
            2013-06-18  [Irrigation].Apply(80);
        Irrigation
        Manager ClimateControl
          StartDate = 2013-04-01
          EndDate = 2014-05-01
```csharp
using System;
using Models.Core;
using APSIM.Shared.Utilities;



using System.Collections.Generic;
using System.Text;
using Models.PMF;
using Models;
using System.Xml.Serialization;

namespace Models
{
	[Serializable] 
	[System.Xml.Serialization.XmlInclude(typeof(Model))]
	public class Script : Model
	{
		[Link] Weather Met;
		[Link] Clock Clock;
    
		[Description("Start Date")]
		public DateTime StartDate { get; set; }
        
		[Description("End Date")]
		public DateTime EndDate { get; set; }
 
    
		[EventSubscribe("PreparingNewWeatherData")]
		private void OnPreparingNewWeatherData(object sender, EventArgs e)
		{
			if ((Clock.Today.Date >= StartDate) && (Clock.Today.Date <= EndDate))
				Met.Rain = 0;		
		}
	}
}
```
        SurfaceOrganicMatter Surface Organic Matter: same as RainShelter.Control_full_irrig.paddock.Surface Organic Matter
        Fertiliser
        MicroClimate: same as RainShelter.Control_full_irrig.paddock.MicroClimate
        Manager ExtraVariables
```csharp
using System;
using Models.Core;
using System.Collections.Generic;
using System.Text;
using Models.Soils;
using Models.PMF;
using Models;
using System.Xml.Serialization;
using APSIM.Shared.Utilities;

namespace Models
{
	[Serializable] 
	public class Script : Model
	{
		[Link] Clock Clock;
		[Link] Soils.Soil Soil;
		[Link] Models.SurfaceOM.SurfaceOrganicMatter SOM;
		[Link] Weather Met;
		[Link] Fertiliser Fert;
		[Link] Irrigation Irrig;
		[Link] Plant Wheat;
		[Link] Zone zone;
					
		[XmlIgnore] public bool InitialDay { get; set; }
		
		[XmlIgnore] public double AccumPlantN { get; set; }
		[XmlIgnore] public double AccumMineralisation { get; set; }
		[XmlIgnore] public double AccumDenit { get; set; }
		[XmlIgnore] public double AccumFert { get; set; }
		[XmlIgnore] public double AccumLeach { get; set; }
		[XmlIgnore] public double AccumDetach { get; set; }
		[XmlIgnore] public double DeltaSoilOMN { get; set; }
		[XmlIgnore] public double DeltaSurfaceOMN { get; set; }
		[XmlIgnore] public double DeltaSoilMineralN { get; set; }
		[XmlIgnore] public double SoilNitrogenContent { get; set; }
		
		[XmlIgnore] public double AccumEO { get; set; }
		[XmlIgnore] public double AccumEP { get; set; }
		[XmlIgnore] public double AccumES { get; set; }
		[XmlIgnore] public double AccumDrainage { get; set; }
		[XmlIgnore] public double AccumRunoff { get; set; }
		[XmlIgnore] public double AccumOutflowLat { get; set; }
		[XmlIgnore] public double AccumIrrigation { get; set; }
		[XmlIgnore] public double AccumRainfall { get; set; }
		[XmlIgnore] public double SoilWaterDeficit { get; set; }
	
		[XmlIgnore] public double  InitialSoilOMN { get; set; }
		[XmlIgnore] public double  InitialSurfaceOMN { get; set; }
		[XmlIgnore] public double  InitialMineralN { get; set; }
		
		[XmlIgnore] public double SWC { get; set; }
		[XmlIgnore] public double DUL { get; set; }
		[XmlIgnore] public double OutFlowLat { get; set; }

		[XmlIgnore] public double FomN { get; set; }
		[XmlIgnore] public double BiomN { get; set; }
		[XmlIgnore] public double HumN { get; set; }
		[XmlIgnore] public double OrganicN { get; set; }
		[XmlIgnore] public double NO3N { get; set; }
		[XmlIgnore] public double NH4N { get; set; }
		[XmlIgnore] public double UreaN { get; set; }
		[XmlIgnore] public double MineralN { get; set; }
		[XmlIgnore] public double DltNMinRes { get; set; }
		[XmlIgnore] public double DltNMinTot { get; set; }
		
		[XmlIgnore] public double LeafExpandedPosition { get; set; }
		[XmlIgnore] public double LeafAppearedPosition { get; set; }
		[XmlIgnore] public double ExpandedLeafNoYesterday { get; set; }
		[XmlIgnore] public double AppearedLeafNoYesterday { get; set; }
		[XmlIgnore] public double MostRecentlyExpandedLeafSize { get; set; }
		[XmlIgnore] public double MostRecentlyAppearedLeafMaxSize { get; set; }
		[XmlIgnore] public double TTSinceSowing { get; set; }
        
		[EventSubscribe("Commencing")]
		private void OnSimulationCommencing(object sender, EventArgs e)
		{
			InitialDay = true;
			LeafExpandedPosition = 0;
			LeafAppearedPosition = 0;
			ExpandedLeafNoYesterday = 0;
			AppearedLeafNoYesterday = 0;
			MostRecentlyExpandedLeafSize = 0;
			MostRecentlyAppearedLeafMaxSize = 0;
			TTSinceSowing = 0;
		}
		
		[EventSubscribe("DoManagement")]
		private void OnDoManagement(object sender, EventArgs e)
		{
			//!!!!!! Nitrogen balance components !!!!!!
			//!!!!!!^^^^^^^^^^^^^^^^^^^^^^^^^^^^^!!!!!!
			FomN = MathUtilities.Sum(Soil.SoilNitrogen.FOMN);
			HumN = MathUtilities.Sum(Soil.SoilNitrogen.HumicN);
			BiomN = MathUtilities.Sum(Soil.SoilNitrogen.MicrobialN);
			OrganicN = FomN + HumN + BiomN;
			NO3N = MathUtilities.Sum(Soil.NO3N);
			NH4N = MathUtilities.Sum(Soil.NH4N);
			UreaN = MathUtilities.Sum(Soil.SoilNitrogen.urea);
			MineralN = NO3N + NH4N + UreaN; 
			DltNMinRes = MathUtilities.Sum(Soil.SoilNitrogen.dlt_n_min_res);
			DltNMinTot = MathUtilities.Sum(Soil.SoilNitrogen.MineralisedN);
			int layers = Soil.Thickness.Length;
			if (InitialDay == true)
			{
				InitialSurfaceOMN = SOM.N;
				InitialSoilOMN = OrganicN;
				InitialMineralN = MineralN;
				InitialDay = false;
			}
			AccumFert += Fert.NitrogenApplied;
			DeltaSurfaceOMN = SOM.N - InitialSurfaceOMN;
			AccumLeach = AccumLeach - Soil.SoilWater.LeachNH4 - Soil.SoilWater.LeachNO3 - Soil.SoilWater.LeachUrea; //Fails
			AccumMineralisation += MathUtilities.Sum(Soil.SoilNitrogen.MineralisedN);
			AccumDenit -= MathUtilities.Sum(Soil.SoilNitrogen.Denitrification);
			AccumPlantN -= (double)zone.Get("Wheat.Root.NUptake");
			DeltaSoilOMN = OrganicN - InitialSoilOMN;
			DeltaSoilMineralN = MineralN - InitialMineralN;
			SoilNitrogenContent = MineralN;
			
			//!!!!!! Water balance components !!!!!!
			//!!!!!!^^^^^^^^^^^^^^^^^^^^^^^^^^!!!!!!

			AccumIrrigation += Irrig.IrrigationApplied;
			AccumRainfall += Met.Rain;
			//AccumEP -= (double)zone.Get("[Wheat].Leaf.Transpiration");
			AccumEP -= (double)zone.Get("Wheat.Root.WaterUptake");
			SoilWaterDeficit = (SWC - DUL);
			double OutFlowLat = MathUtilities.Sum(Soil.SoilWater.outflow_lat);
			AccumOutflowLat -= OutFlowLat;
			
			//Leaf number variable
			ExpandedLeafNoYesterday = (double)zone.Get("Wheat.Leaf.ExpandedCohortNo");
			AppearedLeafNoYesterday = (double)zone.Get("Wheat.Leaf.AppearedCohortNo");
			TTSinceSowing += (double)zone.Get("Wheat.Phenology.ThermalTime.Value");
		}
		
		[EventSubscribe("DoManagementCalculations")]
		private void OnDoManagementCalculations(object sender, EventArgs e)
		{
			FomN = MathUtilities.Sum(Soil.SoilNitrogen.FOMN);
			HumN = MathUtilities.Sum(Soil.SoilNitrogen.HumicN);
			BiomN = MathUtilities.Sum(Soil.SoilNitrogen.MicrobialN);
			
			
			AccumEO -= Soil.SoilWater.Eo;
			AccumES -= Soil.SoilWater.Es; 
			AccumDrainage -= Soil.SoilWater.Drainage;
			AccumRunoff -= Soil.SoilWater.Runoff;
			SWC = MathUtilities.Sum(Soil.SoilWater.SWmm);
			DUL = MathUtilities.Sum(Soil.SoilWater.DULmm);
			
			if ((double)zone.Get("Wheat.Leaf.ExpandedCohortNo") > ExpandedLeafNoYesterday)
			{
				LeafExpandedPosition = (double)zone.Get("Wheat.Leaf.ExpandedCohortNo");
				MostRecentlyExpandedLeafSize = (double)zone.Get("Wheat.Leaf.CohortSize[" + (int)LeafExpandedPosition + "]");
			}
			//else
			//	LeafExpandedPosition = 0;
			
			if ((double)zone.Get("Wheat.Leaf.AppearedCohortNo") > AppearedLeafNoYesterday)
			{
				LeafAppearedPosition = (double)zone.Get("Wheat.Leaf.AppearedCohortNo");
				MostRecentlyAppearedLeafMaxSize = (double)zone.Get("Wheat.Leaf.CohortParameters.MaxArea.Value");
			}
			//else
			//LeafAppearedPosition = 0;
			
		}
	}
}
```
        Report: EventNames=[Clock].DoReport
          VariableNames:
            [Clock].Today
            [ExtraVariables].Script.AccumPlantN
            [ExtraVariables].Script.AccumMineralisation
            [ExtraVariables].Script.AccumDenit
            [ExtraVariables].Script.AccumFert
            [ExtraVariables].Script.AccumLeach
            [ExtraVariables].Script.AccumDetach
            [ExtraVariables].Script.DeltaSoilOMN
            [ExtraVariables].Script.DeltaSurfaceOMN
            [ExtraVariables].Script.DeltaSoilMineralN
            [ExtraVariables].Script.SWC
            [ExtraVariables].Script.DUL
            [ExtraVariables].Script.OutFlowLat
            [ExtraVariables].Script.AccumEO
            [ExtraVariables].Script.AccumEP
            [ExtraVariables].Script.AccumES
            [ExtraVariables].Script.AccumDrainage
            [ExtraVariables].Script.AccumRunoff
            [ExtraVariables].Script.AccumRainfall
            [ExtraVariables].Script.AccumIrrigation
            [ExtraVariables].Script.AccumOutflowLat
            [ExtraVariables].Script.SoilWaterDeficit
            [ExtraVariables].Script.SoilNitrogenContent
            [ExtraVariables].Script.FomN
            [ExtraVariables].Script.HumN
            [ExtraVariables].Script.BiomN
            [ExtraVariables].Script.DltNMinRes
            [ExtraVariables].Script.DltNMinTot
            [ExtraVariables].Script.TTSinceSowing
            [Soil].SoilWater.SW
            [Soil].SoilWater.Eo
            [Soil].SoilWater.Es
            [Soil].SoilWater.Drainage
            [Soil].SoilWater.Runoff
            [Soil].SoilWater.pond
            sum([Soil].SoilWater.SWmm) as ProfileWater
            [Soil].NO3N
            [MicroClimate].net_radn
            [MicroClimate].peta
            [MicroClimate].petr
            [Wheat].Grain.Live.Wt
            [Wheat].Stem.Live.Wt
            [Wheat].EarLive.Wt
            [Wheat].Leaf.Live.Wt
            [Wheat].Root.Live.Wt
            [Wheat].Spike.Live.Wt
            [Wheat].HeadLive.N
            [Wheat].Grain.Live.N
            [Wheat].Stem.Live.N
            [Wheat].Leaf.Live.N
            [Wheat].Root.Live.N
            [Wheat].Spike.Live.N
            [Wheat].Root.WaterSupply
            [Wheat].Root.WaterUptake
            [Wheat].Leaf.Transpiration
            [Wheat].Leaf.WaterDemand
            [Wheat].Root.Depth
            [Wheat].Leaf.CoverTotal
            [Wheat].Leaf.CoverDead
            [Wheat].Leaf.LAI
            [Wheat].Leaf.Height
            [Wheat].Leaf.CohortParameters.MaxArea.Value
            [Wheat].Leaf.Fw
            [Wheat].Leaf.Photosynthesis.FVPD.Value
            [Wheat].Leaf.Photosynthesis.FT.Value
            [Wheat].Leaf.Fn
            [Wheat].Phenology.CurrentPhaseName
            [Wheat].Phenology.Stage
            [Wheat].AboveGroundLive.N
            [Wheat].AboveGroundLive.Wt
            [Wheat].Total.N
            [Wheat].Total.Wt
            [Wheat].Arbitrator.NDemand
            [Wheat].Phenology.Stage
            [Wheat].Leaf.ExpandedCohortNo
            [Wheat].Leaf.AppearedCohortNo
            [Wheat].Leaf.DeadCohortNo
            [Wheat].Leaf.InitialisedCohortNo
            [Wheat].Structure.MainStemFinalNodeNo
            [Wheat].Structure.MainStemNodeNo
            [Wheat].Structure.MainStemPrimordiaNo
            [Wheat].Leaf.CohortParameters.SpecificLeafAreaMax.Value
            [Wheat].Leaf.CohortParameters.SpecificLeafAreaMin.Value
            [Wheat].Arbitrator.NDemand
            [Wheat].Arbitrator.DMSupply
            [Wheat].Arbitrator.DMDemand
            [Wheat].Arbitrator.DMAllocated
            [Wheat].Arbitrator.DMSinkLimitation
            [Wheat].Arbitrator.DMNutrientLimitation
            [Wheat].Leaf.CohortParameters.GrowthDuration.Value
            [Wheat].Leaf.CohortParameters.LagDuration.Value
            [Wheat].Leaf.CohortParameters.SenescenceDuration.Value
            [Wheat].Structure.MainStemNodeAppearanceRate.Value
            [Wheat].Structure.Height
            [Wheat].Stem.DMDemandFunction.PotentialDMAccumulation.Value
            [Wheat].Stem.DMDemandFunction.HightLimitedDMAccumulation.Value
            [Wheat].Structure.MainStemPrimordiaNo
            [Wheat].Grain.NumberFunction.Value
            [ExtraVariables].Script.LeafAppearedPosition
            [ExtraVariables].Script.MostRecentlyAppearedLeafMaxSize
            [ExtraVariables].Script.LeafExpandedPosition
            [ExtraVariables].Script.MostRecentlyExpandedLeafSize
            [Wheat].Leaf.DeadCohortNo
            [Phenology].ThermalTime.Value
            [Wheat].Leaf.SenescingCohortNo
            [Wheat].Stem.MaximumNConc.Value
            [Wheat].Stem.MinimumNConc.Value
            [Wheat].Stem.Live.NConc
            [Wheat].Leaf.Live.NConc
            [Wheat].Grain.Live.NConc
            [Wheat].Spike.Live.NConc
            [Wheat].Leaf.Dead.NConc
            [Wheat].Leaf.Photosynthesis.RueAct
            [Wheat].Stem.Live.StructuralWt
            [Wheat].Phenology.Zadok.Stage
            [Wheat].Structure.TotalStemPopn
            [Wheat].Structure.MainStemPopn
            [Wheat].Leaf.CohortArea[4]
            [Wheat].Arbitrator.FN
            [Wheat].Leaf.SpecificArea
            [Wheat].Leaf.CohortParameters.SpecificLeafAreaMax.Value
            [Wheat].Leaf.CohortParameters.SpecificLeafAreaMin.Value
            [Wheat].Leaf.CohortSLA[1:10]
  Experiment Gatton2009
    Factors
      Factor TOS: Specifications=[SowingRule].Script.TOS = 1, 2, 3
      Factor Cv
        Specifications=[SowingRule].Script.Cultivar = Bolac, Derrimut, EGAGregory, Gladius, H46, Hartog, Janz, Kelallac, Kennedy, Mckellar, Ruby, Ventura, Wedgetail, Wyalkatchem, Yitpi, Young
    Simulation Gatton2009Base: Area=0; Slope=0
      Clock: StartDate=2009-04-01; EndDate=2009-12-30
      Summary summaryfile
      Weather: FileName=Gatton2009.met
      SoilArbitrator Soil Arbitrator
      Zone Field: Area=1; Slope=0
        Irrigation
        Fertiliser
        Soil APS6Field: same as APS6.APS6NRate0.paddock.APS6Field
        Manager SowingRule
          TOS = 1
          Cultivar = Hartog
```csharp
using System;
using Models.Core;
using Models.PMF;
namespace Models
{
           
	[Serializable] 
	[System.Xml.Serialization.XmlInclude(typeof(Model))]
	public class Script : Model
	{
	
		[Link] Plant Wheat;
		[Link] Clock Clock;
			
		[Description("Time of Sowing")]
		public int TOS { get; set; }

		[Description("Cultivar")]
		public String Cultivar { get; set; }
		
		[EventSubscribe("DoManagement")]
		private void OnDoManagement(object sender, EventArgs e)
		{
			if (((Clock.Today.DayOfYear == 120) && (TOS == 1)) ||
			    ((Clock.Today.DayOfYear == 150) && (TOS == 2)) ||
			    ((Clock.Today.DayOfYear == 177) && (TOS == 3)))
			{
				Wheat.Sow(population: 100, cultivar: Cultivar, depth: 30, rowSpacing: 250);
			}
		}


	}
}
```
        SurfaceOrganicMatter: same as APS6.APS6NRate0.paddock.SurfaceOrganicMatter
        Plant Wheat: CropType=Wheat
        MicroClimate: same as APS26.APS26NRate160WaterWet.paddock.MicroClimate
        Report
          VariableNames:
            [Clock].Today
            Wheat.Zadok.Stage
            Wheat.Phenology.CurrentStageName
            Wheat.AboveGround.Wt
            Wheat.AboveGround.N
            Wheat.Grain.Wt
            Wheat.Grain.Protein
            Wheat.Grain.Size
            Wheat.Grain.Number
            Wheat.Grain.Live.Wt
            Wheat.Grain.Live.N
            Wheat.Leaf.LAI
            Wheat.Leaf.Live.Wt
            Wheat.Leaf.Live.N
            Wheat.Spike.Wt
            Wheat.Spike.N
            Wheat.Stem.Live.Wt
            Wheat.Stem.Live.N
            Wheat.Root.Depth
            [Wheat].Root.WaterUptake
            [Wheat].Leaf.Fw
            [Wheat].Leaf.Fn
            [Wheat].Total.Wt
            [Wheat].Phenology.Zadok.Stage
            [Wheat].Leaf.AppearedCohortNo
            [Wheat].Structure.MainStemNodeNo
          EventNames:
            [Clock].DoReport
  Experiment APS2
    Factors
      Factor TOS: Specifications=[SowingRule].Script.TOS = 1, 2
    Simulation APS2Base: Area=0; Slope=0
      Clock: StartDate=1991-05-30; EndDate=1991-12-30
      Summary summaryfile
      Weather: FileName=aps02.met
      SoilArbitrator Soil Arbitrator
      Zone Field: Area=1; Slope=0
        Irrigation
        Fertiliser
        Soil APS6Field: same as APS6.APS6NRate0.paddock.APS6Field
        Manager SowingRule
          TOS = 1
          Cultivar = Hartog
```csharp
using System;
using Models.Core;
using Models.PMF;
namespace Models
{
           
	[Serializable] 
	[System.Xml.Serialization.XmlInclude(typeof(Model))]
	public class Script : Model
	{
	
		[Link] Plant Wheat;
		[Link] Clock Clock;
		[Link] Fertiliser Fertiliser;
			
		[Description("Time of Sowing")]
		public int TOS { get; set; }

		[Description("Cultivar")]
		public String Cultivar { get; set; }
		
		[EventSubscribe("DoManagement")]
		private void OnDoManagement(object sender, EventArgs e)
		{
			if ((Clock.Today.DayOfYear == 150) && (TOS == 1) ||
			    (Clock.Today.DayOfYear == 211) && (TOS == 2))
			{
				Wheat.Sow(population: 100, cultivar: Cultivar, depth: 30, rowSpacing: 250);
				Fertiliser.Apply(Amount: 120, Type: Fertiliser.Types.UreaN);
			}
		}


	}
}
```
        SurfaceOrganicMatter: same as APS6.APS6NRate0.paddock.SurfaceOrganicMatter
        Plant Wheat: CropType=Wheat
        MicroClimate: same as APS26.APS26NRate160WaterWet.paddock.MicroClimate
        Report
          VariableNames:
            [Clock].Today
            Wheat.Zadok.Stage
            Wheat.Phenology.CurrentStageName
            Wheat.AboveGround.Wt
            Wheat.AboveGround.N
            Wheat.Grain.Wt
            Wheat.Grain.Protein
            Wheat.Grain.Size
            Wheat.Grain.Number
            Wheat.Grain.Live.Wt
            Wheat.Grain.Live.N
            Wheat.Leaf.LAI
            Wheat.Leaf.Live.Wt
            Wheat.Leaf.Live.N
            Wheat.Spike.Wt
            Wheat.Spike.N
            Wheat.Stem.Live.Wt
            Wheat.Stem.Live.N
            Wheat.Root.Depth
            [Wheat].Root.WaterUptake
            [Wheat].Leaf.Fw
            [Wheat].Leaf.Fn
            [Wheat].Total.Wt
            [Wheat].Phenology.Zadok.Stage as ZadokStage
            [Wheat].Leaf.AppearedCohortNo
            [Wheat].Leaf.ExpandedCohortNo
            [Wheat].Leaf.SenescingCohortNo
            [Wheat].Leaf.DeadCohortNo
          EventNames:
            [Clock].DoReport
  Folder YarrabahCreek
    Simulation YarrabahCreek: Area=0; Slope=0
      Clock: StartDate=2001-06-19; EndDate=2001-12-04
      Summary summaryfile
      Weather: FileName=Ycreek.met
      SoilArbitrator Soil Arbitrator
      Zone Field: Area=1; Slope=0
        Irrigation
        Fertiliser
        Operations CropManagement
          2001-06-19  [Wheat].Sow(population:70, cultivar:"Mercury", depth:30, rowSpacing:250);
          2001-06-19  [Fertiliser].Apply(Amount: 120, Type: Fertiliser.Types.UreaN);
        Soil: SoilType=APS6Soil; LocalName=APS6Site; Site=APS6Site; NearestTown=Unknown; Region=Lawes; NaturalVegetation=Unknown; Latitude=0; Longitude=0
          Water
            Thickness  BD   AirDry  LL15  DUL   SAT
            100        1    0.1     0.27  0.47  0.51
            200        1.1  0.1     0.27  0.49  0.51
            200        1.1  0.1     0.3   0.55  0.57
            200        1.1  0.1     0.32  0.55  0.55
            200        1.1  0.1     0.34  0.53  0.54
            200        1.2  0.1     0.38  0.53  0.54
            200        1.2  0.1     0.42  0.53  0.54
            200        1.2  0.1     0.42  0.5   0.51
            200        1.2  0.1     0.42  0.48  0.51
            200        1.2  0.1     0.42  0.48  0.51
            SoilCrop WheatSoil: LL=[0.27, 0.27, 0.3, 0.32, 0.34, 0.38, 0.42, 0.42, 0.42, 0.42]; KL=[0.12, 0.12, 0.08, 0.06, 0.06, 0.06, 0.06, 0.06, 0, 0]; XF=[1, 1, 1, 1, 1, 1, 1, 1, 0, 0]
          SoilWater: residueinterception=0; SummerDate=1-Nov; SummerU=9; SummerCona=5; WinterDate=1-Apr; WinterU=9; WinterCona=5; DiffusConst=40; DiffusSlope=16; Salb=0.13; CN2Bare=78; CNRed=20; CNCov=0.8; slope=0; discharge_width=0; catchment_area=0; max_pond=0
            Thickness  SWCON  KLAT
            150        0.2    0
            150        0.2    0
            300        0.2    0
            300        0.2    0
            300        0.2    0
            300        0.2    0
            300        0.2    0
          SoilNitrogen: fom_type=[default, manure, mucuna, lablab, shemp, stable]; fract_carb=[0.2, 0.3, 0.54, 0.57, 0.45, 0]; fract_cell=[0.7, 0.3, 0.37, 0.37, 0.47, 0.1]; fract_lign=[0.1, 0.4, 0.09, 0.06, 0.08, 0.9]; wfpsN2N2O_x=[22, 88]; wfpsN2N2O_y=[0.1, 1]
          SoilOrganicMatter: RootCN=60; RootWt=10; SoilCN=14.5; EnrACoeff=1; EnrBCoeff=1; OCUnits=Total
            Thickness  OC    FBiom  FInert
            100        1.83  0.03   0.45
            200        1.35  0.03   0.45
            200        1.19  0.02   0.6
            200        1.11  0.015  0.7
            200        0.97  0.01   0.85
            200        0.8   0.01   0.9
            200        0.64  0.01   0.99
            200        0.5   0.01   0.99
            200        0.38  0.01   0.99
            200        0.27  0.01   0.99
          Analysis: Thickness=[150, 150, 300, 300, 300, 300, 300]; PH=[7.5, 8, 8, 8, 8, 8, 8]; PHUnits=Water; BoronUnits=HotWater
          Sample Initial Water: Thickness=[100, 200, 200, 200, 200, 200, 200, 200, 200, 200]; NO3Units=ppm; NH4Units=ppm; SWUnits=Volumetric; OCUnits=Total; PHUnits=Water
            SW=[0.42, 0.46, 0.54, 0.55, 0.53, 0.51, 0.54, 0.5, 0.466, 0.43]
          Sample Initial Nitrogen: NO3Units=ppm; NH4Units=ppm; SWUnits=Volumetric; OCUnits=Total; PHUnits=Water
            Thickness  NO3  NH4
            100        10   0.3
            200        10   0.3
            200        10   0.3
            200        10   0.3
            200        10   0.3
            200        5    0.3
            200        5    0.3
            200        5    0.3
            200        5    0.3
            200        5    0.3
        SurfaceOrganicMatter: PoolName=wheat_stubble; type=wheat; mass=2000; standing_fraction=0; cnr=100; CriticalResidueWeight=2000; OptimumDecompTemp=20; MaxCumulativeEOS=20; CNRatioDecompCoeff=0.277; CNRatioDecompThreshold=25; TotalLeachRain=25; MinRainToLeach=10; CriticalMinimumOrganicC=0.004; DefaultCPRatio=0; DefaultStandingFraction=0; StandingExtinctCoeff=0.5; FractionFaecesAdded=0.5
          Pools:
            {PoolName=wheat_stubble, ResidueType=wheat, Mass=2000, CNRatio=100, StandingFraction=0}
          ResidueTypes: LoadFromResource=ResidueTypes
        Plant Wheat: CropType=Wheat
        MicroClimate: a_interception=0; b_interception=0; c_interception=0.3; d_interception=0; soil_albedo=0.13; air_pressure=1010; soil_emissivity=0.96; sun_angle=15; soil_heat_flux_fraction=0.4; night_interception_fraction=0.5; windspeed_default=3; refheight=2; albedo=0.15; emissivity=0.96; gsmax=0.01; r50=200
        Report
          VariableNames:
            [Clock].Today
            Wheat.Zadok.Stage
            Wheat.Phenology.CurrentStageName
            Wheat.AboveGround.Wt
            Wheat.AboveGround.N
            Wheat.Grain.Wt
            Wheat.Grain.Protein
            Wheat.Grain.Size
            Wheat.Grain.Number
            Wheat.Grain.Live.Wt
            Wheat.Grain.Live.N
            Wheat.Leaf.LAI
            Wheat.Leaf.Live.Wt
            Wheat.Leaf.Live.N
            Wheat.Spike.Wt
            Wheat.Spike.N
            Wheat.Stem.Live.Wt
            Wheat.Stem.Live.N
            Wheat.Root.Depth
            [Wheat].Root.WaterUptake
            [Wheat].Leaf.Fw
            [Wheat].Leaf.Fn
            [Wheat].Total.Wt
            [Wheat].Phenology.Zadok.Stage
            [Wheat].Leaf.AppearedCohortNo
            [Wheat].Structure.MainStemNodeNo
            ([Wheat].Leaf.Transpiration + [Soil].SoilWater.Es) as ET
            sum([Soil].SoilWater.SWmm[2:10]) as TotalSoilWater
            [Soil].SoilWater.SW
          EventNames:
            [Clock].DoReport
  Folder Wagga
    Memo
      The dataset of [Zeleke2016] includes plantings of two wheat varieties (Gregory, Livingston) under two water regimes (dry and irrigated) for 2013 and 2014 at the Wagga Wagga Agricultural Research Institute. Yields ranged from 1.63 t/ha to 6.01 t/ha.
    Experiment Wagga2013
      Factors
        Factor Cv: Specifications=[CropSchedule]
          Operations Gregory
            2013-06-24  [Wheat].Sow(population:120, cultivar:"Gregory", depth:30, rowSpacing:200);
            2013-06-24  [Fertiliser].Apply(Amount: 100, Type: Fertiliser.Types.UreaN);
          Operations Livingston
            2013-06-24  [Wheat].Sow(population:120, cultivar:"Livingston", depth:30, rowSpacing:200);
            2013-06-24  [Fertiliser].Apply(Amount: 100, Type: Fertiliser.Types.UreaN);
        Factor Water: Specifications=[IrrigationSchedule]
          Operations Wet
            2013-09-10  [Irrigation].Apply(amount:26);
            2013-09-11  [Irrigation].Apply(amount:26);
            2013-09-26  [Irrigation].Apply(amount:26);
            2013-10-01  [Irrigation].Apply(amount:26);
            2013-10-04  [Irrigation].Apply(amount:26);
            2013-10-09  [Irrigation].Apply(amount:26);
            2013-10-10  [Irrigation].Apply(amount:26);
            2013-10-14  [Irrigation].Apply(amount:26);
            2013-10-15  [Irrigation].Apply(amount:26);
            2013-10-16  [Irrigation].Apply(amount:26);
          Operations Dry
      Simulation Ketema2013: Area=0; Slope=0
        Clock: StartDate=2013-06-24; EndDate=2013-12-30
        Summary summaryfile
        Weather: FileName=Wagga1314.met
        SoilArbitrator Soil Arbitrator
        Zone paddock: Area=1; Slope=0
          Irrigation
          Fertiliser
          SurfaceOrganicMatter: PoolName=canola; type=canola; mass=1000; standing_fraction=0; cpr=0; cnr=80; CriticalResidueWeight=2000; OptimumDecompTemp=20; MaxCumulativeEOS=20; CNRatioDecompCoeff=0.277; CNRatioDecompThreshold=25; TotalLeachRain=25; MinRainToLeach=10; CriticalMinimumOrganicC=0.004; DefaultCPRatio=0; DefaultStandingFraction=0; StandingExtinctCoeff=0.5; FractionFaecesAdded=0.5
            Pools:
              {PoolName=canola, ResidueType=canola, Mass=1000, CNRatio=80, CPRatio=0, StandingFraction=0}
            ResidueTypes: LoadFromResource=ResidueTypes
          Plant Wheat: CropType=Wheat
          Operations CropSchedule
          Operations IrrigationSchedule
          MicroClimate: same as APS26.APS26NRate160WaterWet.paddock.MicroClimate
          Manager Calculations: same as APS26.APS26NRate160WaterWet.paddock.Calculations
          Report
            VariableNames:
              [Clock].Today
              Wheat.Zadok.Stage
              Wheat.Phenology.CurrentStageName
              Wheat.AboveGround.Wt
              Wheat.AboveGround.N
              Wheat.Grain.Wt
              Wheat.Grain.Protein
              Wheat.Grain.Size
              Wheat.Grain.Number
              Wheat.Grain.Live.Wt
              Wheat.Grain.Live.N
              Wheat.Leaf.LAI
              Wheat.Leaf.Live.Wt
              Wheat.Leaf.Live.N
              Wheat.Spike.Wt
              Wheat.Spike.N
              Wheat.Stem.Live.Wt
              Wheat.Stem.Live.N
              Wheat.Root.Depth
              [Wheat].Root.WaterUptake
              [Wheat].Leaf.Fw
              [Wheat].Leaf.Fn
              [Wheat].Total.Wt
              sum([Soil].SoilWater.SWmm[2:7]) as TotalSoilWater
              [Soil].SoilWater.SW
            EventNames:
              [Clock].DoReport
          Soil: ASCOrder=Kandasol; ASCSubOrder=Red; SoilType=?; Site=Generic; NearestTown=Wagga Wagga; Region=Riverina; State=New South Wales; Country=Australia; ApsoilNumber=498-GENERIC; Latitude=-35.115549; Longitude=147.369477; LocationAccuracy=Regional Soil Type; DataSource=Generic soil; Comments=Generic soil developed for CSU.
            Water
              Thickness  BD    AirDry  LL15  DUL   SAT
              100        1.48  0.055   0.11  0.29  0.35
              150        1.5   0.104   0.13  0.27  0.34
              150        1.45  0.15    0.15  0.25  0.32
              150        1.37  0.15    0.15  0.28  0.36
              150        1.43  0.15    0.15  0.29  0.35
              300        1.55  0.15    0.15  0.31  0.34
              300        1.67  0.15    0.15  0.31  0.34
              300        1.62  0.15    0.15  0.32  0.35
              SoilCrop Wheatsoil: LL=[0.11, 0.13, 0.15, 0.17, 0.19, 0.22, 0.26, 0.28]; KL=[0.06, 0.06, 0.04, 0.04, 0.04, 0.04, 0.02, 0.02]; XF=[1, 1, 1, 0.9, 0.9, 0.9, 0.9, 0.8]
            SoilWater: residueinterception=0; SummerDate=1-Nov; SummerU=6; SummerCona=3.5; WinterDate=1-Apr; WinterU=2; WinterCona=2; DiffusConst=44; DiffusSlope=16; Salb=0.13; CN2Bare=84; CNRed=20; CNCov=0.8; max_pond=0; Thickness=[100, 150, 150, 150, 150, 300, 300, 300]; SWCON=[0.5, 0.4, 0.3, 0.3, 0.2, 0.1, 0.1, 0.1]
            SoilNitrogen: fom_type=[default, manure, mucuna, lablab, shemp, stable]; fract_carb=[0.2, 0.3, 0.54, 0.57, 0.45, 0]; fract_cell=[0.7, 0.3, 0.37, 0.37, 0.47, 0.1]; fract_lign=[0.1, 0.4, 0.09, 0.06, 0.08, 0.9]; wfpsN2N2O_x=[22, 88]; wfpsN2N2O_y=[0.1, 1]
            SoilOrganicMatter: RootCN=45; RootWt=1500; SoilCN=12.5; EnrACoeff=7.4; EnrBCoeff=0.2; OCUnits=Total
              Thickness  OC   FBiom  FInert
              100        1    0.03   0.4
              150        0.5  0.02   0.6
              150        0.5  0.02   0.7
              150        0.5  0.02   0.8
              150        0.5  0.01   0.9
              300        0.5  0.01   0.9
              300        0.5  0.01   1
              300        0.5  0.01   1
            Analysis: Thickness=[100, 150, 150, 150, 150, 300, 300, 300]; PH=[6, 6, 6, 6, 6, 6, 6, 6]; PHUnits=Water; BoronUnits=HotWater
            InitialWater: PercentMethod=EvenlyDistributed; FractionFull=0.9
            Sample Initial nitrogen: Thickness=[1200]; NO3=[0.542]; NH4=[0]; SW=[0]; NO3Units=ppm; NH4Units=ppm; SWUnits=Volumetric; OCUnits=Total; PHUnits=Water
    Experiment Wagga2014
      Factors
        Factor Cv: Specifications=[CropSchedule]
          Operations Gregory
            2014-04-30  [Wheat].Sow(population:120, cultivar:"Gregory", depth:30, rowSpacing:200);
            2014-04-30  [Fertiliser].Apply(Amount: 100, Type: Fertiliser.Types.UreaN);
            2014-07-01  [Fertiliser].Apply(Amount: 50, Type: Fertiliser.Types.UreaN);
          Operations Livingston
            2014-04-30  [Wheat].Sow(population:120, cultivar:"Livingston", depth:30, rowSpacing:200);
            2014-04-30  [Fertiliser].Apply(Amount: 100, Type: Fertiliser.Types.UreaN);
            2014-07-01  [Fertiliser].Apply(Amount: 50, Type: Fertiliser.Types.UreaN);
        Factor Water: Specifications=[IrrigationSchedule]
          Operations Wet
            2014-05-16  [Irrigation].Apply(amount:26);
            2014-08-11  [Irrigation].Apply(amount:26);
            2014-08-12  [Irrigation].Apply(amount:26);
            2014-08-18  [Irrigation].Apply(amount:26);
            2014-08-25  [Irrigation].Apply(amount:26);
            2014-09-01  [Irrigation].Apply(amount:21);
            2014-09-05  [Irrigation].Apply(amount:26);
            2014-09-22  [Irrigation].Apply(amount:26);
            2014-10-10  [Irrigation].Apply(amount:26);
          Operations Dry
      Simulation Ketema2014: Area=0; Slope=0
        Clock: StartDate=2014-04-30; EndDate=2014-12-30
        Summary summaryfile
        Weather: FileName=Wagga1314.met
        SoilArbitrator Soil Arbitrator
        Zone paddock: Area=1; Slope=0
          Irrigation
          Fertiliser
          SurfaceOrganicMatter: PoolName=wheat; type=wheat; mass=1000; standing_fraction=0; cpr=0; cnr=80; CriticalResidueWeight=2000; OptimumDecompTemp=20; MaxCumulativeEOS=20; CNRatioDecompCoeff=0.277; CNRatioDecompThreshold=25; TotalLeachRain=25; MinRainToLeach=10; CriticalMinimumOrganicC=0.004; DefaultCPRatio=0; DefaultStandingFraction=0; StandingExtinctCoeff=0.5; FractionFaecesAdded=0.5
            Pools:
              {PoolName=wheat, ResidueType=wheat, Mass=1000, CNRatio=80, CPRatio=0, StandingFraction=0}
            ResidueTypes: LoadFromResource=ResidueTypes
          Plant Wheat: CropType=Wheat
          Operations CropSchedule
          Operations IrrigationSchedule
          MicroClimate: same as APS26.APS26NRate160WaterWet.paddock.MicroClimate
          Manager Calculations: same as APS26.APS26NRate160WaterWet.paddock.Calculations
          Report: same as Wagga.Wagga2013.Ketema2013.paddock.Report
          Soil: same as Wagga.Wagga2013.Ketema2013.paddock.Soil
  Experiment GattonRowSpacing
    Factors
      Factor RowSpace: Specifications=[Sowing]
        Operations 25cm
          2011-06-22  [Wheat].Sow(population:160, cultivar:"Hartog", depth:30, rowSpacing:250);
          2011-08-15  [Fertiliser].Apply(Amount: 100, Type: Fertiliser.Types.UreaN);
        Operations 50cm
          2011-06-22  [Wheat].Sow(population:80, cultivar:"Hartog", depth:30, rowSpacing:500);
          2011-08-15  [Fertiliser].Apply(Amount: 100, Type: Fertiliser.Types.UreaN);
        Operations N0
          2011-06-22  [Wheat].Sow(population:160, cultivar:"Hartog", depth:30, rowSpacing:250);
    Simulation RowSpace: Area=0; Slope=0
      Clock: StartDate=2011-05-01; EndDate=2011-11-12
      Summary summaryfile
      Weather: FileName=Gatton2011.met
      SoilArbitrator Soil Arbitrator
      Zone Field: Area=1; Slope=0
        Irrigation
        Fertiliser
        Operations Sowing
          2011-06-22  [Wheat].Sow(population:160, cultivar:"Hartog", depth:30, rowSpacing:250);
        Soil: SoilType=Black Vertosol; Site=Lawes; NearestTown=Lawes, Q 4343; Region=Lockyer; State=Queensland; Country=Australia; NaturalVegetation=Blue Gum, Moreton Bay Ash, Tea Tree; ApsoilNumber=37; Latitude=-27.537; Longitude=152.336; LocationAccuracy=+-20m; DataSource=CSIRO Sustainable Ecosystems, Toowoomba
          Comments=Soil naming structure: \State\Region\Classification-Local Name (Site/district and locator number); oc and ph estimated
          Water
            Thickness  BD    AirDry  LL15  DUL   SAT
            150        1.32  0.13    0.26  0.41  0.47
            150        1.3   0.208   0.26  0.43  0.48
            300        1.23  0.26    0.26  0.46  0.51
            300        1.27  0.26    0.26  0.44  0.49
            300        1.37  0.25    0.25  0.4   0.45
            300        1.35  0.26    0.26  0.41  0.46
            300        1.35  0.26    0.26  0.38  0.46
            SoilCrop WheatSoil: LL=[0.26, 0.26, 0.26, 0.26, 0.25, 0.29, 0.36]; KL=[0.06, 0.06, 0.06, 0.04, 0.04, 0.02, 0.02]; XF=[1, 1, 1, 1, 1, 1, 1]
          SoilWater: residueinterception=0; SummerDate=1-Nov; SummerU=6; SummerCona=3.5; WinterDate=1-Apr; WinterU=4; WinterCona=2.5; DiffusConst=40; DiffusSlope=16; Salb=0.12; CN2Bare=73; CNRed=20; CNCov=0.8; max_pond=0; Thickness=[150, 150, 300, 300, 300, 300, 300]; SWCON=[0.3, 0.3, 0.3, 0.3, 0.3, 0.3, 0.3]
          SoilNitrogen: fom_type=[default, manure, mucuna, lablab, shemp, stable]; fract_carb=[0.2, 0.3, 0.54, 0.57, 0.45, 0]; fract_cell=[0.7, 0.3, 0.37, 0.37, 0.47, 0.1]; fract_lign=[0.1, 0.4, 0.09, 0.06, 0.08, 0.9]; wfpsN2N2O_x=[22, 88]; wfpsN2N2O_y=[0.1, 1]
          SoilOrganicMatter: RootCN=40; RootWt=1000; SoilCN=12; EnrACoeff=7.4; EnrBCoeff=0.2; OCUnits=Total
            Thickness  OC        FBiom  FInert
            150        0.953846  0.04   0.4
            150        0.953846  0.02   0.6
            300        0.961538  0.02   0.8
            300        0.846154  0.02   1
            300        0.546154  0.01   1
            300        0.261538  0.01   1
            300        0.2       0.01   1
          Analysis: Thickness=[150, 150, 300, 300, 300, 300, 300]; PH=[8, 8, 8, 8, 8, 8, 8]; PHUnits=Water; BoronUnits=HotWater
          InitialWater: PercentMethod=FilledFromTop; FractionFull=1
          Sample Initial nitrogen: NO3Units=kgha; NH4Units=kgha; SWUnits=Volumetric; OCUnits=Total; PHUnits=Water
            Thickness  NO3  NH4
            200        100  1
            1800       10   1
        SurfaceOrganicMatter: same as APS6.APS6NRate0.paddock.SurfaceOrganicMatter
        Plant Wheat: CropType=Wheat
        MicroClimate: same as APS26.APS26NRate160WaterWet.paddock.MicroClimate
        Report
          VariableNames:
            [Clock].Today
            Wheat.Zadok.Stage
            Wheat.Phenology.CurrentStageName
            Wheat.AboveGround.Wt
            Wheat.AboveGround.N
            Wheat.Grain.Wt
            Wheat.Grain.Protein
            Wheat.Grain.Size
            Wheat.Grain.Number
            Wheat.Grain.Live.Wt
            Wheat.Grain.Live.N
            Wheat.Leaf.LAI
            Wheat.Leaf.Live.Wt
            Wheat.Leaf.Live.N
            Wheat.Spike.Wt
            Wheat.Spike.N
            Wheat.Stem.Live.Wt
            Wheat.Stem.Live.N
            Wheat.Root.Depth
            [Wheat].Root.WaterUptake
            [Wheat].Leaf.Fw
            [Wheat].Leaf.Fn
            [Wheat].Total.Wt
            [Wheat].Phenology.Zadok.Stage as ZadokStage
            [Wheat].Leaf.AppearedCohortNo
            [Wheat].Leaf.ExpandedCohortNo
            [Wheat].Leaf.SenescingCohortNo
            [Wheat].Structure.TotalStemPopn
          EventNames:
            [Clock].DoReport
  Folder Konya
    Memo
      The dataset of [Tari2016] includes 4 irrigation deficit treatments applied at each of 3 plant growth stages.  The experiment was conducted at Konya in the Central Anatolia region of Turkey. Yields ranged from 2.88 t/ha to 6.82 t/ha.
    Experiment Konya09
      Factors
        Factor Water: Specifications=[IrrigationSchedule]
          Operations AAA
            2010-04-09  [Irrigation].Apply(amount:150);
            2010-05-06  [Irrigation].Apply(amount:154);
            2010-05-26  [Irrigation].Apply(amount:152);
          Operations BAA
            2010-04-09  [Irrigation].Apply(amount:97);
            2010-05-06  [Irrigation].Apply(amount:154);
            2010-05-26  [Irrigation].Apply(amount:152);
          Operations CAA
            2010-04-09  [Irrigation].Apply(amount:52);
            2010-05-06  [Irrigation].Apply(amount:154);
            2010-05-26  [Irrigation].Apply(amount:152);
          Operations DAA
            2010-04-09  [Irrigation].Apply(amount:0);
            2010-05-06  [Irrigation].Apply(amount:154);
            2010-05-26  [Irrigation].Apply(amount:152);
          Operations ABA
            2010-04-09  [Irrigation].Apply(amount:150);
            2010-05-06  [Irrigation].Apply(amount:100);
            2010-05-26  [Irrigation].Apply(amount:152);
          Operations ACA
            2010-04-09  [Irrigation].Apply(amount:150);
            2010-05-06  [Irrigation].Apply(amount:54);
            2010-05-26  [Irrigation].Apply(amount:152);
          Operations ADA
            2010-04-09  [Irrigation].Apply(amount:150);
            2010-05-06  [Irrigation].Apply(amount:0);
            2010-05-26  [Irrigation].Apply(amount:152);
          Operations AAB
            2010-04-09  [Irrigation].Apply(amount:150);
            2010-05-06  [Irrigation].Apply(amount:154);
            2010-05-26  [Irrigation].Apply(amount:98);
          Operations AAC
            2010-04-09  [Irrigation].Apply(amount:150);
            2010-05-06  [Irrigation].Apply(amount:154);
            2010-05-26  [Irrigation].Apply(amount:53);
          Operations AAD
            2010-04-09  [Irrigation].Apply(amount:150);
            2010-05-06  [Irrigation].Apply(amount:154);
            2010-05-26  [Irrigation].Apply(amount:0);
          Operations ABB
            2010-04-09  [Irrigation].Apply(amount:150);
            2010-05-06  [Irrigation].Apply(amount:100);
            2010-05-26  [Irrigation].Apply(amount:99);
          Operations ACC
            2010-04-09  [Irrigation].Apply(amount:150);
            2010-05-06  [Irrigation].Apply(amount:54);
            2010-05-26  [Irrigation].Apply(amount:53);
          Operations ADD
            2010-04-09  [Irrigation].Apply(amount:150);
            2010-05-06  [Irrigation].Apply(amount:0);
            2010-05-26  [Irrigation].Apply(amount:0);
          Operations BAB
            2010-04-09  [Irrigation].Apply(amount:97);
            2010-05-06  [Irrigation].Apply(amount:154);
            2010-05-26  [Irrigation].Apply(amount:99);
          Operations CAC
            2010-04-09  [Irrigation].Apply(amount:52);
            2010-05-06  [Irrigation].Apply(amount:154);
            2010-05-26  [Irrigation].Apply(amount:53);
          Operations DAD
            2010-04-09  [Irrigation].Apply(amount:0);
            2010-05-06  [Irrigation].Apply(amount:154);
            2010-05-26  [Irrigation].Apply(amount:0);
          Operations BBA
            2010-04-09  [Irrigation].Apply(amount:97);
            2010-05-06  [Irrigation].Apply(amount:100);
            2010-05-26  [Irrigation].Apply(amount:152);
          Operations CCA
            2010-04-09  [Irrigation].Apply(amount:52);
            2010-05-06  [Irrigation].Apply(amount:54);
            2010-05-26  [Irrigation].Apply(amount:152);
          Operations DDA
            2010-04-09  [Irrigation].Apply(amount:0);
            2010-05-06  [Irrigation].Apply(amount:0);
            2010-05-26  [Irrigation].Apply(amount:152);
          Operations BBB
            2010-04-09  [Irrigation].Apply(amount:97);
            2010-05-06  [Irrigation].Apply(amount:100);
            2010-05-26  [Irrigation].Apply(amount:99);
          Operations CCC
            2010-04-09  [Irrigation].Apply(amount:52);
            2010-05-06  [Irrigation].Apply(amount:54);
            2010-05-26  [Irrigation].Apply(amount:53);
          Operations DDD
            2010-04-09  [Irrigation].Apply(amount:0);
            2010-05-06  [Irrigation].Apply(amount:0);
            2010-05-26  [Irrigation].Apply(amount:0);
      Simulation Konya09: Area=0; Slope=0
        Clock: StartDate=2009-11-12; EndDate=2010-07-30
        Summary summaryfile
        Weather: FileName=Konya.met
        SoilArbitrator Soil Arbitrator
        Zone paddock: Area=1; Slope=0
          Irrigation
          Fertiliser
          SurfaceOrganicMatter: same as Wagga.Wagga2014.Ketema2014.paddock.SurfaceOrganicMatter
          Plant Wheat: CropType=Wheat
          Operations CropSchedule
            2009-11-12  [Wheat].Sow(population:120, cultivar:"Gregory", depth:50, rowSpacing:135);
            2009-11-12  [Fertiliser].Apply(Amount: 80, Type: Fertiliser.Types.UreaN);
            2010-02-01  [Fertiliser].Apply(Amount: 80, Type: Fertiliser.Types.UreaN);
          Operations IrrigationSchedule
          MicroClimate: same as APS26.APS26NRate160WaterWet.paddock.MicroClimate
          Manager Calculations: same as APS26.APS26NRate160WaterWet.paddock.Calculations
          Report
            VariableNames:
              [Clock].Today
              Wheat.Zadok.Stage
              Wheat.Phenology.CurrentStageName
              Wheat.AboveGround.Wt
              Wheat.AboveGround.N
              Wheat.Grain.Wt
              Wheat.Grain.Protein
              Wheat.Grain.Size
              Wheat.Grain.Number
              Wheat.Grain.Live.Wt
              Wheat.Grain.Live.N
              Wheat.Grain.Live.NConc
              Wheat.Leaf.LAI
              Wheat.Leaf.Live.Wt
              Wheat.Leaf.Live.N
              Wheat.Spike.Wt
              Wheat.Spike.N
              Wheat.Stem.Live.Wt
              Wheat.Stem.Live.N
              Wheat.Root.Depth
              [Wheat].Root.WaterUptake
              [Wheat].Leaf.Fw
              [Wheat].Leaf.Fn
              [Wheat].Total.Wt
              sum([Soil].SoilWater.SWmm) as TotalSoilWater
              sum([Soil].SoilNitrogen.NO3) as TotalSoilNitrogen
              [Soil].SoilWater.SW
            EventNames:
              [Clock].DoReport
          Soil: Site=Konya; NearestTown=Konya; Region=Central Anatolia; Country=Turkey; Latitude=0; Longitude=0
            Water
              Thickness  BD    AirDry  LL15   DUL    SAT
              150        1.56  0.05    0.118  0.253  0.411
              150        1.56  0.05    0.118  0.253  0.411
              300        1.58  0.05    0.114  0.256  0.403
              300        1.63  0.05    0.105  0.257  0.39
              SoilCrop Wheatsoil: LL=[0.118, 0.118, 0.114, 0.105]; KL=[0.06, 0.06, 0.04, 0.04]; XF=[1, 1, 1, 1]
            SoilWater: residueinterception=0; SummerDate=1-Nov; SummerU=6; SummerCona=3.5; WinterDate=1-Apr; WinterU=2; WinterCona=2; DiffusConst=44; DiffusSlope=16; Salb=0.13; CN2Bare=84; CNRed=20; CNCov=0.8; max_pond=0; Thickness=[150, 150, 300, 300, 300, 300, 300, 300]; SWCON=[0.5, 0.4, 0.3, 0.3, 0.2, 0.1, 0.1, 0.1]
            SoilNitrogen: fom_type=[default, manure, mucuna, lablab, shemp, stable]; fract_carb=[0.2, 0.3, 0.54, 0.57, 0.45, 0]; fract_cell=[0.7, 0.3, 0.37, 0.37, 0.47, 0.1]; fract_lign=[0.1, 0.4, 0.09, 0.06, 0.08, 0.9]; wfpsN2N2O_x=[22, 88]; wfpsN2N2O_y=[0.1, 1]
            SoilOrganicMatter: RootCN=45; RootWt=1500; SoilCN=12.5; EnrACoeff=7.4; EnrBCoeff=0.2; OCUnits=Total
              Thickness  OC   FBiom  FInert
              150        1    0.03   0.4
              150        0.5  0.02   0.6
              300        0.5  0.02   0.7
              300        0.5  0.02   0.8
              300        0.5  0.01   0.9
              300        0.5  0.01   0.9
              300        0.5  0.01   1
              300        0.5  0.01   1
            Analysis: Thickness=[150, 150, 300, 300, 300, 300, 300, 300]; PH=[7.9, 7.9, 7.9, 8, 8, 8, 8, 8]; PHUnits=Water; BoronUnits=HotWater
            InitialWater: PercentMethod=EvenlyDistributed; FractionFull=0.9
            Sample: NO3Units=ppm; NH4Units=ppm; SWUnits=Volumetric; OCUnits=Total; PHUnits=Water
              Thickness  NO3  NH4
              300        20   0
              600        10   0
              1200       0    0
    Experiment Konya11
      Factors
        Factor Water: Specifications=[IrrigationSchedule]
          Operations AAA
            2012-04-16  [Irrigation].Apply(amount:100);
            2012-05-21  [Irrigation].Apply(amount:148);
            2012-06-08  [Irrigation].Apply(amount:161);
          Operations BAA
            2012-04-16  [Irrigation].Apply(amount:65);
            2012-05-21  [Irrigation].Apply(amount:148);
            2012-06-08  [Irrigation].Apply(amount:161);
          Operations CAA
            2012-04-16  [Irrigation].Apply(amount:35);
            2012-05-21  [Irrigation].Apply(amount:148);
            2012-06-08  [Irrigation].Apply(amount:161);
          Operations DAA
            2012-04-16  [Irrigation].Apply(amount:0);
            2012-05-21  [Irrigation].Apply(amount:148);
            2012-06-08  [Irrigation].Apply(amount:161);
          Operations ABA
            2012-04-16  [Irrigation].Apply(amount:100);
            2012-05-21  [Irrigation].Apply(amount:96);
            2012-06-08  [Irrigation].Apply(amount:161);
          Operations ACA
            2012-04-16  [Irrigation].Apply(amount:100);
            2012-05-21  [Irrigation].Apply(amount:52);
            2012-06-08  [Irrigation].Apply(amount:161);
          Operations ADA
            2012-04-16  [Irrigation].Apply(amount:100);
            2012-05-21  [Irrigation].Apply(amount:0);
            2012-06-08  [Irrigation].Apply(amount:161);
          Operations AAB
            2012-04-16  [Irrigation].Apply(amount:100);
            2012-05-21  [Irrigation].Apply(amount:148);
            2012-06-08  [Irrigation].Apply(amount:105);
          Operations AAC
            2012-04-16  [Irrigation].Apply(amount:100);
            2012-05-21  [Irrigation].Apply(amount:148);
            2012-06-08  [Irrigation].Apply(amount:56);
          Operations AAD
            2012-04-16  [Irrigation].Apply(amount:100);
            2012-05-21  [Irrigation].Apply(amount:148);
            2012-06-08  [Irrigation].Apply(amount:0);
          Operations ABB
            2012-04-16  [Irrigation].Apply(amount:100);
            2012-05-21  [Irrigation].Apply(amount:96);
            2012-06-08  [Irrigation].Apply(amount:105);
          Operations ACC
            2012-04-16  [Irrigation].Apply(amount:100);
            2012-05-21  [Irrigation].Apply(amount:52);
            2012-06-08  [Irrigation].Apply(amount:56);
          Operations ADD
            2012-04-16  [Irrigation].Apply(amount:100);
            2012-05-21  [Irrigation].Apply(amount:0);
            2012-06-08  [Irrigation].Apply(amount:0);
          Operations BAB
            2012-04-16  [Irrigation].Apply(amount:65);
            2012-05-21  [Irrigation].Apply(amount:148);
            2012-06-08  [Irrigation].Apply(amount:105);
          Operations CAC
            2012-04-16  [Irrigation].Apply(amount:35);
            2012-05-21  [Irrigation].Apply(amount:148);
            2012-06-08  [Irrigation].Apply(amount:56);
          Operations DAD
            2012-04-16  [Irrigation].Apply(amount:0);
            2012-05-21  [Irrigation].Apply(amount:148);
            2012-06-08  [Irrigation].Apply(amount:0);
          Operations BBA
            2012-04-16  [Irrigation].Apply(amount:65);
            2012-05-21  [Irrigation].Apply(amount:96);
            2012-06-08  [Irrigation].Apply(amount:161);
          Operations CCA
            2012-04-16  [Irrigation].Apply(amount:35);
            2012-05-21  [Irrigation].Apply(amount:52);
            2012-06-08  [Irrigation].Apply(amount:161);
          Operations DDA
            2012-04-16  [Irrigation].Apply(amount:0);
            2012-05-21  [Irrigation].Apply(amount:0);
            2012-06-08  [Irrigation].Apply(amount:161);
          Operations BBB
            2012-04-16  [Irrigation].Apply(amount:65);
            2012-05-21  [Irrigation].Apply(amount:96);
            2012-06-08  [Irrigation].Apply(amount:105);
          Operations CCC
            2012-04-16  [Irrigation].Apply(amount:35);
            2012-05-21  [Irrigation].Apply(amount:52);
            2012-06-08  [Irrigation].Apply(amount:56);
          Operations DDD
            2012-04-16  [Irrigation].Apply(amount:0);
            2012-05-21  [Irrigation].Apply(amount:0);
            2012-06-08  [Irrigation].Apply(amount:0);
      Simulation Konya11: Area=0; Slope=0
        Clock: StartDate=2011-11-16; EndDate=2012-07-30
        Summary summaryfile
        Weather: FileName=Konya.met
        SoilArbitrator Soil Arbitrator
        Zone paddock: Area=1; Slope=0
          Irrigation
          Fertiliser
          SurfaceOrganicMatter: same as Wagga.Wagga2013.Ketema2013.paddock.SurfaceOrganicMatter
          Plant Wheat: CropType=Wheat
          Operations CropSchedule
            2011-11-16  [Wheat].Sow(population:120, cultivar:"Gregory", depth:50, rowSpacing:135);
            2011-11-16  [Fertiliser].Apply(Amount: 80, Type: Fertiliser.Types.UreaN);
            2012-02-01  [Fertiliser].Apply(Amount: 80, Type: Fertiliser.Types.UreaN);
          Operations IrrigationSchedule
          MicroClimate: same as APS26.APS26NRate160WaterWet.paddock.MicroClimate
          Manager Calculations: same as APS26.APS26NRate160WaterWet.paddock.Calculations
          Report
            VariableNames:
              [Clock].Today
              Wheat.Zadok.Stage
              Wheat.Phenology.CurrentStageName
              Wheat.AboveGround.Wt
              Wheat.AboveGround.N
              Wheat.Grain.Wt
              Wheat.Grain.Protein
              Wheat.Grain.Size
              Wheat.Grain.Number
              Wheat.Grain.Live.Wt
              Wheat.Grain.Live.N
              Wheat.Grain.Live.NConc
              Wheat.Leaf.LAI
              Wheat.Leaf.Live.Wt
              Wheat.Leaf.Live.N
              Wheat.Spike.Wt
              Wheat.Spike.N
              Wheat.Stem.Live.Wt
              Wheat.Stem.Live.N
              Wheat.Root.Depth
              [Wheat].Root.WaterUptake
              [Wheat].Leaf.Fw
              [Wheat].Leaf.Fn
              [Wheat].Total.Wt
              sum([Soil].SoilWater.SWmm) as TotalSoilWater
              [Soil].SoilWater.SW
            EventNames:
              [Clock].DoReport
          Soil: same as Konya.Konya09.Konya09.paddock.Soil
  Folder KCTrials
    Simulation Hermitage2009: Area=0; Slope=0
      Clock: StartDate=2009-06-01; EndDate=2009-11-30
      Summary summaryfile
      Weather: FileName=Hermitage2009.met
      SoilArbitrator Soil Arbitrator
      Zone Field: Area=1; Slope=0
        Irrigation
        Fertiliser
        Soil HRSField: SoilType=APS6Soil; LocalName=APS6Site; Site=APS6Site; NearestTown=Unknown; Region=Lawes; NaturalVegetation=Unknown; Latitude=0; Longitude=0
          Water
            Thickness  BD    AirDry  LL15  DUL   SAT
            150        1.03  0.28    0.33  0.56  0.61
            150        1.06  0.24    0.29  0.55  0.6
            300        1.06  0.24    0.29  0.55  0.6
            300        1.08  0.25    0.3   0.54  0.59
            300        1.11  0.26    0.31  0.53  0.58
            300        1.14  0.28    0.33  0.52  0.57
            300        1.17  0.3     0.35  0.51  0.55
            SoilCrop WheatSoil: LL=[0.33, 0.29, 0.29, 0.3, 0.31, 0.33, 0.35]; KL=[0.07, 0.07, 0.07, 0.05, 0.05, 0.03, 0.02]; XF=[1, 1, 1, 1, 1, 1, 1]
          SoilWater: same as APS6.APS6NRate0.paddock.APS6Field.SoilWater
          SoilNitrogen: fom_type=[default, manure, mucuna, lablab, shemp, stable]; fract_carb=[0.2, 0.3, 0.54, 0.57, 0.45, 0]; fract_cell=[0.7, 0.3, 0.37, 0.37, 0.47, 0.1]; fract_lign=[0.1, 0.4, 0.09, 0.06, 0.08, 0.9]; wfpsN2N2O_x=[22, 88]; wfpsN2N2O_y=[0.1, 1]
          SoilOrganicMatter: same as APS6.APS6NRate0.paddock.APS6Field.SoilOrganicMatter
          Analysis: Thickness=[150, 150, 300, 300, 300, 300, 300]; PH=[7.5, 8, 8, 8, 8, 8, 8]; PHUnits=Water; BoronUnits=HotWater
          Sample Initial Water: Thickness=[150, 150, 300, 300, 300, 300, 300]; SW=[0.56, 0.55, 0.55, 0.54, 0.53, 0.52, 0.51]; NO3Units=ppm; NH4Units=ppm; SWUnits=Volumetric; OCUnits=Total; PHUnits=Water
          Sample Initial Nitrogen: NO3Units=kgha; NH4Units=kgha; SWUnits=Volumetric; OCUnits=Total; PHUnits=Water
            Thickness  NO3   NH4
            150        50    1.3
            150        50    1
            300        0.25  1
            300        0.2   0.8
            300        0.1   0.8
            300        0.1   0.5
            300        0.1   0.5
        Manager SowingRule
          Cultivar = Hartog
```csharp
using System;
using Models.Core;
using Models.PMF;
namespace Models
{
           
	[Serializable] 
	[System.Xml.Serialization.XmlInclude(typeof(Model))]
	public class Script : Model
	{
	
		[Link] Plant Wheat;
		[Link] Clock Clock;
			
		[Description("Cultivar")]
		public String Cultivar { get; set; }
	
		
		private void OnDoManagement(object sender, EventArgs e)
		{
			if (Clock.Today.DayOfYear == 170)
			{
				Wheat.Sow(population: 100, cultivar: Cultivar, depth: 60, rowSpacing: 200);
				
			}
		}
	}
}
```
        SurfaceOrganicMatter: same as APS6.APS6NRate0.paddock.SurfaceOrganicMatter
        Plant Wheat: CropType=Wheat
        MicroClimate: same as APS26.APS26NRate160WaterWet.paddock.MicroClimate
        Report
          VariableNames:
            [Clock].Today
            [Wheat].Phenology.DaysAfterSowing.Value
            Wheat.Phenology.CurrentPhaseName
            Wheat.Phenology.Stage
            Wheat.Phenology.Zadok.Stage
            Wheat.AboveGround.Wt
            Wheat.Leaf.LAI
            Wheat.Leaf.Live.Wt
            Wheat.Spike.Wt
            Wheat.Stem.Live.Wt
            Wheat.Structure.TotalStemPopn
            Wheat.Structure.MainStemPrimordiaNo
            Wheat.Structure.MainStemNodeNo
            Wheat.Structure.PlantTotalNodeNo
            Wheat.Grain.Number
            Wheat.Grain.Wt
            Wheat.WaterSupplyDemandRatio
            Wheat.Leaf.CoverTotal
            [Wheat].Leaf.SpecificArea
            [Wheat].Leaf.CohortParameters.SpecificLeafAreaMax.Value
            [Wheat].Leaf.CohortParameters.SpecificLeafAreaMin.Value
          EventNames:
            [Clock].DoReport
        Operations IrrigationSchedule
          2009-08-12  [Irrigation].Apply(amount:29);
          2009-08-13  [Irrigation].Apply(amount:25);
          2009-09-29  [Irrigation].Apply(amount:32);
        Operations FertiliserSchedule
          2009-06-02  [Fertiliser].Apply(Amount: 152, Type: Fertiliser.Types.Urea);
    Simulation GattonStandard2010: Area=0; Slope=0
      Clock: StartDate=2010-05-06; EndDate=2010-10-31
      Summary summaryfile
      Weather: FileName=Gatton2010.met
      SoilArbitrator Soil Arbitrator
      Zone Field: Area=1; Slope=0
        Irrigation
        Fertiliser
        Soil LawesField: SoilType=APS6Soil; LocalName=APS6Site; Site=APS6Site; NearestTown=Unknown; Region=Lawes; NaturalVegetation=Unknown; Latitude=0; Longitude=0
          Water
            Thickness  BD    AirDry  LL15  DUL   SAT
            150        1.38  0.1     0.2   0.38  0.45
            150        1.38  0.168   0.21  0.38  0.45
            300        1.28  0.2     0.2   0.44  0.49
            300        1.38  0.19    0.19  0.4   0.45
            300        1.4   0.15    0.15  0.39  0.44
            300        1.46  0.2     0.2   0.4   0.45
            300        1.47  0.2     0.2   0.43  0.48
            SoilCrop WheatSoil: LL=[0.2, 0.21, 0.2, 0.19, 0.15, 0.32, 0.34]; KL=[0.06, 0.06, 0.06, 0.04, 0.04, 0.02, 0.02]; XF=[1, 1, 1, 1, 1, 1, 1]
          SoilWater: residueinterception=0; SummerDate=1-Nov; SummerU=6; SummerCona=3.5; WinterDate=1-Apr; WinterU=6; WinterCona=3.5; DiffusConst=88; DiffusSlope=35.4; Salb=0.13; CN2Bare=91; CNRed=20; CNCov=0.8; slope=0; discharge_width=0; catchment_area=0; max_pond=0
            Thickness  SWCON  KLAT
            150        0.3    0
            150        0.3    0
            300        0.3    0
            300        0.3    0
            300        0.3    0
            300        0.3    0
            300        0.3    0
          SoilNitrogen: fom_type=[default, manure, mucuna, lablab, shemp, stable]; fract_carb=[0.2, 0.3, 0.54, 0.57, 0.45, 0]; fract_cell=[0.7, 0.3, 0.37, 0.37, 0.47, 0.1]; fract_lign=[0.1, 0.4, 0.09, 0.06, 0.08, 0.9]; wfpsN2N2O_x=[22, 88]; wfpsN2N2O_y=[0.1, 1]
          SoilOrganicMatter: same as APS6.APS6NRate0.paddock.APS6Field.SoilOrganicMatter
          Analysis: Thickness=[150, 150, 300, 300, 300, 300, 300]; PH=[7.5, 8, 8, 8, 8, 8, 8]; PHUnits=Water; BoronUnits=HotWater
          Sample Initial Water: Thickness=[150, 150, 300, 300, 300, 300, 300]; SW=[0.38, 0.38, 0.44, 0.4, 0.39, 0.4, 0.43]; NO3Units=ppm; NH4Units=ppm; SWUnits=Volumetric; OCUnits=Total; PHUnits=Water
          Sample Initial Nitrogen: NO3Units=kgha; NH4Units=kgha; SWUnits=Volumetric; OCUnits=Total; PHUnits=Water
            Thickness  NO3  NH4
            150        100  1.3
            150        50   1
            300        20   1
            300        20   0.8
            300        20   0.8
            300        20   0.5
            300        20   0.5
        SurfaceOrganicMatter: same as APS6.APS6NRate0.paddock.SurfaceOrganicMatter
        Plant Wheat: CropType=Wheat
        MicroClimate: same as APS26.APS26NRate160WaterWet.paddock.MicroClimate
        Operations IrrigationSchedule
          2010-05-28  [Irrigation].Apply(amount:25);
          2010-07-22  [Irrigation].Apply(amount:35);
          2010-10-05  [Irrigation].Apply(amount:60);
        Manager SowingRule
          Cultivar = Hartog
```csharp
using System;
using Models.Core;
using Models.PMF;
namespace Models
{
           
	[Serializable] 
	[System.Xml.Serialization.XmlInclude(typeof(Model))]
	public class Script : Model
	{
	
		[Link] Plant Wheat;
		[Link] Clock Clock;
			
		[Description("Cultivar")]
		public String Cultivar { get; set; }
		[EventSubscribe("DoManagement")]
		private void OnDoManagement(object sender, EventArgs e)
		{
			if (Clock.Today.DayOfYear == 148)
			{
				Wheat.Sow(population: 100, cultivar: Cultivar, depth: 50, rowSpacing: 250);
			}
		}


	}
}
```
        Report
          VariableNames:
            [Clock].Today
            Wheat.Phenology.CurrentPhaseName
            Wheat.Phenology.Stage
            Wheat.Phenology.Zadok.Stage
            Wheat.AboveGround.Wt
            Wheat.Leaf.LAI
            Wheat.Leaf.Live.Wt
            Wheat.Spike.Wt
            Wheat.Stem.Live.Wt
            Wheat.Structure.TotalStemPopn
            Wheat.Structure.MainStemPrimordiaNo
            Wheat.Structure.MainStemNodeNo
            Wheat.Structure.PlantTotalNodeNo
            Wheat.Grain.Number
            Wheat.Grain.Wt
            Wheat.WaterSupplyDemandRatio
            [Wheat].Leaf.SpecificArea
            [Wheat].Leaf.CohortParameters.SpecificLeafAreaMax.Value
            [Wheat].Leaf.CohortParameters.SpecificLeafAreaMin.Value
          EventNames:
            [Clock].DoReport
    Simulation GattonLate2010: Area=0; Slope=0
      Clock: StartDate=2010-07-16; EndDate=2010-12-15
      Summary summaryfile
      Weather: FileName=Gatton2010Late.met
      SoilArbitrator Soil Arbitrator
      Zone Field: Area=1; Slope=0
        Irrigation
        Fertiliser
        Soil CSIROField: SoilType=APS6Soil; LocalName=APS6Site; Site=APS6Site; NearestTown=Unknown; Region=Lawes; NaturalVegetation=Unknown; Latitude=0; Longitude=0
          SoilWater: same as KCTrials.GattonStandard2010.Field.LawesField.SoilWater
          SoilNitrogen: fom_type=[default, manure, mucuna, lablab, shemp, stable]; fract_carb=[0.2, 0.3, 0.54, 0.57, 0.45, 0]; fract_cell=[0.7, 0.3, 0.37, 0.37, 0.47, 0.1]; fract_lign=[0.1, 0.4, 0.09, 0.06, 0.08, 0.9]; wfpsN2N2O_x=[22, 88]; wfpsN2N2O_y=[0.1, 1]
          SoilOrganicMatter: same as APS6.APS6NRate0.paddock.APS6Field.SoilOrganicMatter
          Analysis: Thickness=[150, 150, 300, 300, 300, 300, 300]; PH=[7.5, 8, 8, 8, 8, 8, 8]; PHUnits=Water; BoronUnits=HotWater
          Sample Initial Water: Thickness=[150, 150, 300, 300, 300, 300, 300]; SW=[0.38, 0.38, 0.44, 0.4, 0.39, 0.4, 0.43]; NO3Units=ppm; NH4Units=ppm; SWUnits=Volumetric; OCUnits=Total; PHUnits=Water
          Sample Initial Nitrogen: NO3Units=kgha; NH4Units=kgha; SWUnits=Volumetric; OCUnits=Total; PHUnits=Water
            Thickness  NO3  NH4
            150        100  1.3
            150        50   1
            300        20   1
            300        20   0.8
            300        20   0.8
            300        20   0.5
            300        20   0.5
          Water: same as KCTrials.GattonStandard2010.Field.LawesField.Water
        SurfaceOrganicMatter: same as APS6.APS6NRate0.paddock.SurfaceOrganicMatter
        Plant Wheat: CropType=Wheat
        MicroClimate: same as APS26.APS26NRate160WaterWet.paddock.MicroClimate
        Manager SowingRule
          Cultivar = Hartog
```csharp
using System;
using Models.Core;
using Models.PMF;
namespace Models
{
           
	[Serializable] 
	[System.Xml.Serialization.XmlInclude(typeof(Model))]
	public class Script : Model
	{
	
		[Link] Plant Wheat;
		[Link] Clock Clock;
			
		[Description("Cultivar")]
		public String Cultivar { get; set; }
		[EventSubscribe("DoManagement")]
		private void OnDoManagement(object sender, EventArgs e)
		{
			if (Clock.Today.DayOfYear == 214)
			{
				Wheat.Sow(population: 100, cultivar: Cultivar, depth: 50, rowSpacing: 250);
				
			}
		}


	}
}
```
        Report: same as KCTrials.GattonStandard2010.Field.Report
    Simulation Hermitage2011: Area=0; Slope=0
      Clock: StartDate=2011-06-16; EndDate=2011-12-12
      Summary summaryfile
      Weather: FileName=Hermitage2011.met
      SoilArbitrator Soil Arbitrator
      Zone Field: Area=1; Slope=0
        Irrigation
        Fertiliser
        Soil HRSField: SoilType=APS6Soil; LocalName=APS6Site; Site=APS6Site; NearestTown=Unknown; Region=Lawes; NaturalVegetation=Unknown; Latitude=0; Longitude=0
          SoilWater: same as KCTrials.GattonStandard2010.Field.LawesField.SoilWater
          SoilNitrogen: fom_type=[default, manure, mucuna, lablab, shemp, stable]; fract_carb=[0.2, 0.3, 0.54, 0.57, 0.45, 0]; fract_cell=[0.7, 0.3, 0.37, 0.37, 0.47, 0.1]; fract_lign=[0.1, 0.4, 0.09, 0.06, 0.08, 0.9]; wfpsN2N2O_x=[22, 88]; wfpsN2N2O_y=[0.1, 1]
          SoilOrganicMatter: same as APS6.APS6NRate0.paddock.APS6Field.SoilOrganicMatter
          Analysis: Thickness=[150, 150, 300, 300, 300, 300, 300]; PH=[7.5, 8, 8, 8, 8, 8, 8]; PHUnits=Water; BoronUnits=HotWater
          Sample Initial Water: Thickness=[150, 150, 300, 300, 300, 300, 300]; SW=[0.56, 0.55, 0.55, 0.54, 0.53, 0.52, 0.51]; NO3Units=ppm; NH4Units=ppm; SWUnits=Volumetric; OCUnits=Total; PHUnits=Water
          Sample Initial Nitrogen: NO3Units=kgha; NH4Units=kgha; SWUnits=Volumetric; OCUnits=Total; PHUnits=Water
            Thickness  NO3  NH4
            150        100  1.3
            150        50   1
            300        20   1
            300        20   0.8
            300        20   0.8
            300        20   0.5
            300        20   0.5
          Water: same as KCTrials.Hermitage2009.Field.HRSField.Water
        SurfaceOrganicMatter: same as APS6.APS6NRate0.paddock.SurfaceOrganicMatter
        Plant Wheat: CropType=Wheat
        MicroClimate: same as APS26.APS26NRate160WaterWet.paddock.MicroClimate
        Manager SowingRule
          Cultivar = Hartog
```csharp
using System;
using Models.Core;
using Models.PMF;
namespace Models
{
           
	[Serializable] 
	[System.Xml.Serialization.XmlInclude(typeof(Model))]
	public class Script : Model
	{
	
		[Link] Plant Wheat;
		[Link] Clock Clock;
			
		[Description("Cultivar")]
		public String Cultivar { get; set; }
		[EventSubscribe("DoManagement")]
		private void OnDoManagement(object sender, EventArgs e)
		{
			if (Clock.Today.DayOfYear == 181)
			{
				Wheat.Sow(population: 100, cultivar: Cultivar, depth: 60, rowSpacing: 200);
			
			}
		}
	}


}
```
        Report: same as KCTrials.GattonStandard2010.Field.Report
  Experiment 15TraitMod
    Factors
      Factor Cultivar: Specifications=[Sowing]
        Operations ega_gregory
          2015-05-21  [wheat].Sow(cultivar:"ega_gregory", population:150, depth:40, rowSpacing:250);
        Operations hartog
          2015-05-21  [wheat].Sow(cultivar:"hartog", population:150, depth:40, rowSpacing:250);
      Factor Management: Specifications=[Management]
        Operations IHN
          2015-05-21  [Fertiliser].Apply(Amount: 205, Type: Fertiliser.Types.Urea);
          2015-05-22  [Irrigation].Apply(amount:24);
          2015-06-26  [Irrigation].Apply(amount:25);
          2015-07-14  [Irrigation].Apply(amount:26);
          2015-07-31  [Irrigation].Apply(amount:26);
          2015-08-14  [Irrigation].Apply(amount:25);
          2015-08-26  [Irrigation].Apply(amount:25);
          2015-09-09  [Irrigation].Apply(amount:25);
        Operations ILN
          2015-05-21  [Fertiliser].Apply(Amount: 50, Type: Fertiliser.Types.Urea);
          2015-05-22  [Irrigation].Apply(amount:24);
          2015-06-26  [Irrigation].Apply(amount:25);
          2015-07-14  [Irrigation].Apply(amount:26);
          2015-07-31  [Irrigation].Apply(amount:26);
          2015-08-14  [Irrigation].Apply(amount:25);
          2015-08-26  [Irrigation].Apply(amount:25);
          2015-09-09  [Irrigation].Apply(amount:25);
        Operations RHN
          2015-05-21  [Fertiliser].Apply(Amount: 205, Type: Fertiliser.Types.Urea);
          2015-05-22  [Irrigation].Apply(amount:24);
          2015-06-26  [Irrigation].Apply(amount:25);
        Operations RLN
          2015-05-21  [Fertiliser].Apply(Amount: 50, Type: Fertiliser.Types.Urea);
          2015-05-22  [Irrigation].Apply(amount:24);
          2015-06-26  [Irrigation].Apply(amount:25);
    Simulation: Area=0; Slope=0
      Weather: FileName=gatton15g3.met
      Clock: StartDate=2015-05-19; EndDate=2015-11-17T01:00:00
      Summary
      SoilArbitrator
      Zone Field: Area=0; Slope=0
        Irrigation
        Fertiliser
        Soil: SoilType=Black Vertosol; Site=Lawes; NearestTown=Lawes, Q 4343; Region=Lockyer; State=Queensland; Country=Australia; NaturalVegetation=Blue Gum, Moreton Bay Ash, Tea Tree; ApsoilNumber=38; Latitude=-27.537; Longitude=152.336; LocationAccuracy=+-20m; DataSource=CSIRO Sustainable Ecosystems, Toowoomba
          Comments=Soil naming structure: \State\Region\Classification-Local Name (Site/district and locator number); oc and ph estimated
          Water: same as GattonRowSpacing.RowSpace.Field.Soil.Water
          SoilWater: same as GattonRowSpacing.RowSpace.Field.Soil.SoilWater
          SoilNitrogen: fom_type=[default, manure, mucuna, lablab, shemp, stable]; fract_carb=[0.2, 0.3, 0.54, 0.57, 0.45, 0]; fract_cell=[0.7, 0.3, 0.37, 0.37, 0.47, 0.1]; fract_lign=[0.1, 0.4, 0.09, 0.06, 0.08, 0.9]; wfpsN2N2O_x=[22, 88]; wfpsN2N2O_y=[0.1, 1]
          SoilOrganicMatter: same as GattonRowSpacing.RowSpace.Field.Soil.SoilOrganicMatter
          Analysis: Thickness=[150, 150, 300, 300, 300, 300, 300]; PH=[8, 8, 8, 8, 8, 8, 8]; PHUnits=Water; BoronUnits=HotWater
          InitialWater: PercentMethod=FilledFromTop; FractionFull=1; RelativeTo=LL15
          Sample Initial nitrogen: NO3Units=kgha; NH4Units=kgha; SWUnits=Volumetric; OCUnits=Total; PHUnits=Water
            Thickness  NO3  NH4
            200        20   1
            1800       12   1
        SurfaceOrganicMatter: same as APS26.APS26NRate160WaterWet.paddock.SurfaceOrganicMatter
        Plant wheat: CropType=Wheat
        Operations Sowing
          2015-05-21  [wheat].Sow(cultivar:"ega_gregory", population:150, depth:50, rowSpacing:250);
        MicroClimate: same as APS26.APS26NRate160WaterWet.paddock.MicroClimate
        Operations Management
          2015-05-21  [wheat].Sow(cultivar:"ega_gregory", population:150, depth:50, rowSpacing:250);
        Report: EventNames=[Clock].DoReport
          VariableNames:
            [Clock].Today
            Wheat.Phenology.CurrentPhaseName
            Wheat.Phenology.Stage
            Wheat.Phenology.Zadok.Stage
            Wheat.AboveGround.Wt
            Wheat.Leaf.LAI
            Wheat.Leaf.Live.Wt
            Wheat.Spike.Wt
            Wheat.Stem.Live.Wt
            Wheat.Structure.TotalStemPopn
            Wheat.Structure.MainStemPrimordiaNo
            Wheat.Structure.MainStemNodeNo
            Wheat.Structure.PlantTotalNodeNo
            Wheat.Grain.Number
            Wheat.Grain.Wt
            Wheat.WaterSupplyDemandRatio
            Wheat.Leaf.CoverTotal
            [Wheat].Leaf.SpecificArea
  Memo Combined Results
    #Combined Results
    Simulation results for the combined datasets from the various countries are shown in the following graphs.  The model is able to adequately capture the influence of growing conditions (soil, climate) and management (population, Nitrogen, irrigation, sowing date).
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