Simulations: Area=0
  DataStore
    Input
      FileNames=[C:\ApsimX\Tests\Potato\Observed\Cultivar_node.txt, C:\ApsimX\Tests\Potato\Observed\potato_observations.txt]
  Tests
    Test:
      SimulationName                 TableName  Type       ColumnNames                      Parameters
      CultivarCultivarRussetBurbank  Report     Tolerance  Plant.Phenology.StageCode.Value  1,1
      CultivarCultivarRussetBurbank  Report     Tolerance  Plant.Leaf.LAI                   1,1
      CultivarCultivarRussetBurbank  Report     Tolerance  Plant.Leaf.CoverGreen            1,1
      CultivarCultivarRussetBurbank  Report     Tolerance  Plant.Leaf.Live.Wt               1,1
      CultivarCultivarRussetBurbank  Report     Tolerance  Plant.Stem.Live.Wt               1,1
      CultivarCultivarRussetBurbank  Report     Tolerance  Plant.Tuber.Live.Wt              1,1
      CultivarCultivarRussetBurbank  Report     Tolerance  Plant.Root.Live.Wt               1,1
      CultivarCultivarRussetBurbank  Report     Tolerance  Plant.Leaf.Live.N                1,1
      CultivarCultivarRussetBurbank  Report     Tolerance  Plant.Stem.Live.N                1,1
      CultivarCultivarRussetBurbank  Report     Tolerance  Plant.Tuber.Live.N               1,1
      CultivarCultivarRussetBurbank  Report     Tolerance  Plant.Root.Live.N                1,1
  Experiment Cultivar
    Factors
      Factor Cultivar: Paths=[Operations]
        FactorValue RussetBurbank
          Operations
            2003-10-20  Fertiliser.Apply(100, Fertiliser.Types.UreaN, 0);
            2003-11-25  Fertiliser.Apply(69, Fertiliser.Types.UreaN,0);
            2003-11-26  Irrigation.Apply(15);
            2003-12-04  Irrigation.Apply(50);
            2003-12-16  Irrigation.Apply(15);
            2003-12-22  Irrigation.Apply(50);
            2003-12-30  Irrigation.Apply(50);
            2004-01-08  Irrigation.Apply(50);
            2004-01-21  Irrigation.Apply(50);
            2004-01-31  Irrigation.Apply(50);
            2004-02-27  Irrigation.Apply(25);
    Simulation RussetBurbank: Area=0
      WeatherFile: FileName=lincoln.met; MaxT=12.2; MinT=9.4; Rain=0.6; Radn=3.3; vp=11.8; wind=2.8; CO2=350
      Clock: StartDate=2003-10-20; EndDate=2004-05-23
      Summary
      Zone Field: Area=0
        Soil Templeton: SoilType=Sedementary; LocalName=Lincoln; Latitude=0; Longitude=0
          Water
            Thickness  BD   AirDry  LL15  DUL   SAT
            100        1.2  0.08    0.16  0.33  0.5
            200        1.2  0.16    0.16  0.33  0.5
            300        1.2  0.15    0.15  0.31  0.44
            300        1.2  0.13    0.13  0.27  0.46
            300        1.2  0.15    0.15  0.3   0.44
            300        1.2  0.15    0.15  0.3   0.44
            SoilCrop Potato: LL=[0.13, 0.13, 0.1, 0.15, 0.3, 0.3]; KL=[0.1, 0.06, 0.04, 0.01, 0, 0]; XF=[1, 1, 1, 1, 0, 0]
          SoilWater: min_crit_temp=5; max_crit_temp=35; max_albedo=0.23; A_to_evap_fact=0.44; canopy_eos_coef=1.7; sw_top_crit=0.9; sumes1_max=100; sumes2_max=25; solute_flow_eff=[1]; solute_flux_eff=[1]; gravity_gradient=2E-05; specific_bd=2.65; hydrol_effective_depth=450; immobile_solutes=[nh4]; canopy_fact=[1, 1, 0, 0]; canopy_fact_height=[0, 600, 1800, 30000]; canopy_fact_default=0.5; act_evap_method=ritchie; irrigation_will_runoff=false; irrigation_layer=1; SummerCona=4.4; SummerU=9; SummerDate=1-Nov; WinterCona=4.4; WinterU=9; WinterDate=1-Apr; DiffusConst=88; DiffusSlope=35.4; Salb=0.18; slope=0; discharge_width=0; catchment_area=0; max_pond=0; CN2Bare=0; CNRed=-9E-05; CNCov=0
            Thickness  SWCON  KLAT
            100        0.55   0
            200        0.55   0
            300        0.55   0
            300        0.55   0
            300        0.55   0
            300        0.55   0
            mobile_solutes=[no3, urea, cl, br, org_n, org_c_pool1, org_c_pool2, org_c_pool3]
          SoilNitrogen: fom_type=[default, manure, mucuna, lablab, shemp, stable]; fract_carb=[0.2, 0.3, 0.54, 0.57, 0.45, 0]; fract_cell=[0.7, 0.3, 0.37, 0.37, 0.47, 0.1]; fract_lign=[0.1, 0.4, 0.09, 0.06, 0.08, 0.9]
          SoilOrganicMatter: RootCN=30; RootWt=3000; SoilCN=11.5; EnrACoeff=7.4; EnrBCoeff=0.2; OCUnits=Total
            Thickness  OC    FBiom  FInert
            100        3.5   0.025  0.3
            200        2.5   0.025  0.4
            300        1.2   0.015  0.75
            300        1.03  0.01   0.9
            300        0.47  0.01   0.96
            300        0.47  0.01   0.96
          Analysis: Thickness=[100, 200, 300, 300, 300, 300]; PH=[6.6, 6.2, 5.7, 5.5, 5.5, 5.5]; PHUnits=Water; BoronUnits=HotWater
          InitialWater Initial water: FractionFull=1; PercentMethod=FilledFromTop
          Sample: NO3Units=kgha; NH4Units=kgha; SWUnits=Volumetric; OCUnits=Total; PHUnits=Water
            Thickness  NO3   NH4
            100        40    0.1
            200        30    0.1
            300        14    0.1
            300        14    0.1
            300        1.38  0.1
            300        1.38  0.1
        Irrigation
        Fertiliser
          Definitions:
            Name   FractionNO3  FractionNH4  FractionUrea  FractionRockP  FractionBandedP  FractionLabileP  FractionCa
            UreaN  0            0            1             0              0                0                0
            NO3N   1            0            0             0              0                0                0
        SurfaceOrganicMatter: crit_residue_wt=2000; opt_temp=20; cum_eos_max=20; cnrf_coeff=0.277; cnrf_optcn=25; c_fract=0.4; leach_rain_tot=25; min_rain_to_leach=10; crit_min_surfom_orgC=0.004; default_cpr=0; default_standing_fraction=0; standing_extinct_coeff=0.5; fractionFaecesAdded=0.5; PoolName=Wheat; type=Wheat; mass=2000; standing_fraction=0; cnr=80
          ResidueTypes:
            Name         fom_type       fraction_C  po4ppm  nh4ppm  no3ppm  specific_area  cf_contrib  pot_decomp_rate  fr_c             fr_n             fr_p
            ResidueType  wheat          0.4         0       0       0       0.0005         1           0.1              [0.2, 0.7, 0.1]  [0.2, 0.7, 0.1]  [0.2, 0.7, 0.1]
            ResidueType  lucerne        0.4         0       0       0       0.0002         1           0.1              [0.2, 0.7, 0.1]  [0.2, 0.7, 0.1]  [0.2, 0.7, 0.1]
            ResidueType  barley         0.4         0       0       0       0.0005         1           0.1              [0.2, 0.7, 0.1]  [0.2, 0.7, 0.1]  [0.2, 0.7, 0.1]
            ResidueType  tithonia       0.4         0       0       0       0.0005         1           0.1              [0.2, 0.7, 0.1]  [0.2, 0.7, 0.1]  [0.2, 0.7, 0.1]
            ResidueType  bambatsi       0.4         0       0       0       0.0005         1           0.1              [0.2, 0.7, 0.1]  [0.2, 0.7, 0.1]  [0.2, 0.7, 0.1]
            ResidueType  barley         0.4         0       0       0       0.0005         1           0.1              [0.2, 0.7, 0.1]  [0.2, 0.7, 0.1]  [0.2, 0.7, 0.1]
            ResidueType  broccoli       0.4         0       0       0       0.0004         1           0.1              [0.2, 0.7, 0.1]  [0.2, 0.7, 0.1]  [0.2, 0.7, 0.1]
            ResidueType  butterflypea   0.4         0       0       0       0.0004         1           0.1              [0.2, 0.7, 0.1]  [0.2, 0.7, 0.1]  [0.2, 0.7, 0.1]
            ResidueType  camaldulensis  0.4         0       0       0       0.0002         1           0.1              [0.2, 0.7, 0.1]  [0.2, 0.7, 0.1]  [0.2, 0.7, 0.1]
            ResidueType  canola         0.4         0       0       0       0.0002         1           0.1              [0.2, 0.7, 0.1]  [0.2, 0.7, 0.1]  [0.2, 0.7, 0.1]
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          TillageTypes
        MicroClimate: air_pressure=1010; soil_emissivity=0.96; sun_angle=15; soil_heat_flux_fraction=0.4; night_interception_fraction=0.5; windspeed_default=3; refheight=2; albedo=0.26; emissivity=0.96; gsmax=0.01; r50=200; a_interception=0; b_interception=1; c_interception=0; d_interception=0; soil_albedo=0.23
          ComponentData Potato: Type=Potato; Albedo=0.26; Emissivity=0.96; R50=200; Gsmax=0.03
        Plant Potato: CropType=Potato
          Phenology
            StageBasedInterpolation StageCode: Codes=[1, 2, 3, 4, 5, 6, 7]; Proportional=true
              Stages=[Planting, Peeping, Emergence, TuberInitiation, FinalLeaf, FullSenescence, Maturity]
            AirTemperatureFunction ThermalTime
              XYPairs: X=[2, 20, 35]; Y=[0, 18, 0]
            GenericPhase Dormant: Start=Planting; End=Peeping
              AirTemperatureFunction ThermalTime
                XYPairs: X=[2, 20, 35]; Y=[0, 18, 0]
              Constant Target: Value=1
            EmergingPhase Sprouting: Start=Peeping; End=Emergence; ShootLag=72; ShootRate=1.35
              AirTemperatureFunction ThermalTime
                XYPairs: X=[2, 20, 35]; Y=[0, 18, 0]
            GenericPhase Vegetative: Start=Emergence; End=TuberInitiation
              AirTemperatureFunction ThermalTime
                XYPairs: X=[2, 20, 35]; Y=[0, 18, 0]
              Constant Target: Value=300
            LeafAppearancePhase EarlyTuber: Start=TuberInitiation; End=FinalLeaf
              AirTemperatureFunction ThermalTime
                XYPairs: X=[2, 20, 35]; Y=[0, 18, 0]
            LeafDeathPhase LateTuber: Start=FinalLeaf; End=FullSenescence
              AirTemperatureFunction ThermalTime
                XYPairs: X=[2, 20, 35]; Y=[0, 18, 0]
            GenericPhase Senesced: Start=FullSenescence; End=Maturity
              AirTemperatureFunction ThermalTime
                XYPairs: X=[2, 20, 35]; Y=[0, 18, 0]
              Constant Target: Value=200
            EndPhase Maturity: Start=Maturity; End=Unused
              AirTemperatureFunction ThermalTime
                XYPairs: X=[2, 20, 35]; Y=[0, 18, 0]
          Arbitrator: NArbitrationOption=PriorityThenRelativeAllocation; DMArbitrationOption=RelativeAllocation
          Structure: InitialiseStage=Emergence; PrimaryBudNo=2.2
            AirTemperatureFunction ThermalTime
              XYPairs: X=[2, 20, 35]; Y=[0, 18, 0]
            PhaseLookupValue MainStemPrimordiaInitiationRate: Start=Emergence; End=FinalLeaf
              DivideFunction NodeInitiationRateFunction
                VariableReference Phyllochron: VariableName=[Structure].MainStemNodeAppearanceRate.Phyllochron.Value
                Constant PrimordiaPerMainstemNode: Value=2
            PhaseLookupValue MainStemNodeAppearanceRate: Start=Emergence; End=FinalLeaf
              LinearInterpolationFunction Phyllochron: XProperty=[Structure].RelativeNodeApperance
                XYPairs: X=[0, 0.15, 0.74, 0.75]; Y=[5, 30, 30, 60]
            Constant MainStemFinalNodeNumber: Value=34
            LinearInterpolationFunction HeightModel: XProperty=[Stem].Live.Wt
              XYPairs: X=[0, 200, 1200, 4000]; Y=[20, 300, 700, 900]
            MultiplyFunction BranchingRate
              LinearInterpolationFunction: XProperty=[Structure].MainStemNodeNo
                XYPairs: X=[0, 7, 8, 13, 14, 34]; Y=[0, 0, 0.5, 0.5, 0, 0]
              LinearInterpolationFunction: XProperty=[Leaf].CoverGreen
                XYPairs: X=[0, 0.4, 0.55, 0.8, 1]; Y=[1, 1, 0.45, 0, 0]
            Constant ShadeInducedBranchMortality: Value=0
            Constant DroughtInducedBranchMortality: Value=0
          Summariser
            CompositeBiomass AboveGround: Propertys=[[Leaf].Live, [Leaf].Dead, [Stem].Live, [Stem].Dead]
            CompositeBiomass BelowGround: Propertys=[[Root].Live, [Root].Dead, [Tuber].Live, [Tuber].Dead]
            CompositeBiomass Total
              Propertys=[[Leaf].Live, [Leaf].Dead, [Stem].Live, [Stem].Dead, [Root].Live, [Root].Dead, [Tuber].Live, [Tuber].Dead]
            CompositeBiomass TotalLive: Propertys=[[Leaf].Live, [Stem].Live, [Root].Live, [Tuber].Live]
            CompositeBiomass TotalDead: Propertys=[[Leaf].Dead, [Stem].Dead, [Root].Dead, [Tuber].Dead]
          GenericAboveGroundOrgan Tuber
            LinearInterpolationFunction NitrogenDemandSwitch: XProperty=[Leaf].LAI
              XYPairs: X=[0, 0.02, 0.0201, 10]; Y=[0, 0, 1, 1]
            Constant StructuralFraction: Value=1
            PotentialSizeDemandFunction DMDemandFunction: StartStageName=TuberInitiation; EndStageName=Maturity
              LinearInterpolationFunction PotentialGrowthIncrement: XProperty=[Phenology].StageCode.Value
                XYPairs: X=[4, 4.04, 4.32, 4.52, 4.95, 6.54]; Y=[0.017, 0.017, 0.06, 0.06, 0.018, 0]
              MultiplyFunction OrganNumber
                Constant: Value=5
                VariableReference: VariableName=[Structure].MainStemPopn
              AirTemperatureFunction ThermalTime
                XYPairs: X=[2, 20, 35]; Y=[0, 18, 0]
              AccumulateFunction AccumThermalTime: StartStageName=TuberInitiation; EndStageName=Maturity
                VariableReference: VariableName=[Structure].ThermalTime.Value
            LinearInterpolationFunction WaterContent: XProperty=[Phenology].StageCode.Value
              XYPairs: X=[3, 4, 4.1, 4.7, 5.4, 6]; Y=[0, 0, 0.1, 0.16, 0.2, 0.22]
            LinearInterpolationFunction MaximumNConc: XProperty=[Phenology].StageCode.Value
              XYPairs: X=[3, 4, 5, 6]; Y=[0.023, 0.023, 0.018, 0.015]
            LinearInterpolationFunction MinimumNConc: XProperty=[Phenology].StageCode.Value
              XYPairs: X=[4, 4.1, 7]; Y=[0.02, 0.006, 0.006]
            Biomass Live
            Biomass Dead
          Root: InitialDM=5; SpecificRootLength=40000; KNO3=0.02; KNH4=0
            CompositeBiomass Live: Propertys=[[Root].LayerLive]
            CompositeBiomass Dead: Propertys=[[Root].LayerDead]
            PhaseBasedSwitch NitrogenDemandSwitch: Start=Planting; End=FinalLeaf
            AirTemperatureFunction TemperatureEffect
              XYPairs: X=[0, 26, 35]; Y=[1, 1, 1]
            PhaseLookup RootFrontVelocity
              PhaseLookupValue: Start=Peeping; End=FinalLeaf
                Constant: Value=10
            PhaseLookup PartitionFraction
              PhaseLookupValue: Start=Emergence; End=TuberInitiation
                Constant: Value=0.3
              PhaseLookupValue: Start=TuberInitiation; End=FinalLeaf
                Constant: Value=0.05
              PhaseLookupValue: Start=FinalLeaf; End=FullSenescence
                Constant: Value=0
            Constant MaximumNConc: Value=0.01
            LinearInterpolationFunction MaxDailyNUptake: XProperty=[Root].Length
              XYPairs: X=[0, 0.02]; Y=[0, 6]
            Constant MinimumNConc: Value=0.01
            LinearInterpolationFunction KLModifier: XProperty=[Leaf].LAI
              XYPairs: X=[0, 3]; Y=[1, 1]
          Leaf: CurrentExpandingLeaf=34; StartFractionExpanded=0.83819; FractionNextleafExpanded=0.926641; _ExpandedNodeNo=34.9266; MaxCover=1; KDead=0.03
            CompositeBiomass Live: Propertys=[[Leaf].CohortLive]
            CompositeBiomass Dead: Propertys=[[Leaf].CohortDead]
            InitialLeafValues LeafCohortParameters
              LinearInterpolationFunction MaxArea: XProperty=[Structure].RelativeNodeApperance
                XYPairs: X=[0, 0.15, 0.3, 0.44, 0.59, 0.73]; Y=[2000, 18000, 27000, 15000, 6000, 1500]
              LinearInterpolationFunction GrowthDuration: XProperty=[Structure].RelativeNodeApperance
                XYPairs: X=[0, 0.3, 0.4, 1]; Y=[200, 400, 400, 400]
              LinearInterpolationFunction LagDuration: XProperty=[Structure].RelativeNodeApperance
                XYPairs: X=[0, 0.15, 0.3, 0.4, 0.73, 1]; Y=[350, 350, 350, 350, 350, 20]
              LinearInterpolationFunction SenescenceDuration: XProperty=[Structure].RelativeNodeApperance
                XYPairs: X=[0, 0.15, 0.3, 0.4, 0.73, 2]; Y=[350, 350, 350, 350, 350, 100]
              Constant DetachmentLagDuration: Value=1000000
              Constant DetachmentDuration: Value=1000000
              LinearInterpolationFunction SpecificLeafAreaMax: XProperty=[Structure].RelativeNodeApperance
                XYPairs: X=[0, 1]; Y=[40000, 25000]
              Constant SpecificLeafAreaMin: Value=25000
              Constant StructuralFraction: Value=0.5
              Constant MaximumNConc: Value=0.07
              Constant MinimumNConc: Value=0.03
              Constant InitialNConc: Value=0
              Constant NReallocationFactor: Value=1
              Constant NRetranslocationFactor: Value=0.01
              LinearInterpolationFunction ExpansionStress: XProperty=[Plant].WaterSupplyDemandRatio
                XYPairs: X=[0.5, 1]; Y=[0, 1]
              Constant CriticalNConc: Value=0.05
              Constant DMRetranslocationFactor: Value=0.5
              LinearInterpolationFunction ShadeInducedSenescenceRate: XProperty=[Leaf].CohortCurrentRankCoverAbove
                XYPairs: X=[0, 0.5, 0.8, 1]; Y=[0, 0, 0, 0.03]
              Constant NonStructuralFraction: Value=0.2
            RUEModel Photosynthesis
              Constant RUE: Value=1.2
              RUECO2Function FCO2: PhotosyntheticPathway=C3
              LinearInterpolationFunction FN: XProperty=[Leaf].Fn
                XYPairs: X=[0, 1, 1.5]; Y=[1, 1, 1]
              WeightedTemperatureFunction FT: MaximumTemperatureWeighting=0.75
                XYPairs: X=[2, 12, 24, 34]; Y=[0, 1, 1, 0]
              LinearInterpolationFunction FW: XProperty=[Leaf].Fw
                XYPairs: X=[0, 0.4, 1.5]; Y=[0, 1, 1]
              LinearInterpolationFunction FVPD: XProperty=[Leaf].Photosynthesis.VPD
                XYPairs: X=[0, 10, 50]; Y=[1, 1, 1]
            AirTemperatureFunction ThermalTime
              XYPairs: X=[2, 20, 35]; Y=[0, 18, 0]
            MultiplyFunction ExtinctionCoeff
              Constant: Value=0.8
              LinearInterpolationFunction: XProperty=[Plant].WaterSupplyDemandRatio
                XYPairs: X=[0, 1]; Y=[0.5, 1]
            LinearInterpolationFunction FrostFraction: XProperty=[WeatherFile].MinT
              XYPairs: X=[-1, 0]; Y=[0, 0]
            CompositeBiomass Total: Propertys=[[Leaf].Live, [Leaf].Dead]
            ArrayBiomass CohortArrayLive: Propertys=[[Leaf].Live]; ArraySize=[Leaf].MaxNodeNo
            ArrayBiomass CohortArrayDead: Propertys=[[Leaf].Dead]; ArraySize=[Leaf].MaxNodeNo
            LeafCohort InitialLeaf1: Rank=1; Area=900
            LeafCohort InitialLeaf2: Rank=2; Area=600
            LeafCohort InitialLeaf3: Rank=3; Area=300
          GenericAboveGroundOrgan Stem
            Constant NReallocationFactor: Value=0
            Constant NRetranslocationFactor: Value=0.05
            PhaseBasedSwitch NitrogenDemandSwitch: Start=Planting; End=FinalLeaf
            Constant DMRetranslocationFactor: Value=0
            Constant StructuralFraction: Value=1
            InternodeDemandFunction DMDemandFunction
              Constant InterNodeWt: Value=0.2
            LinearInterpolationFunction MaximumNConc: XProperty=[Phenology].StageCode.Value
              XYPairs: X=[3, 4, 5.3]; Y=[0.06, 0.05, 0.025]
            Constant MinimumNConc: Value=0.006
            Biomass Live
            Biomass Dead
        Manager PotatoSowingRule
          RowSpace = 280
          RowWidth = 770
          PlantingDepth = 120
          StemNumberPerSeedTuber = 2.2
          CultivarName = RussetBurbank
          SowingDate = 2003-10-20
```csharp
        using System;
        using Models.Core;
        using Models.PMF;
        namespace Models
        {
           [Serializable] 
           [System.Xml.Serialization.XmlInclude(typeof(Model))]
            public class Script : Model
            {      
               [Link] Plant Plant;
               [Link] Clock Clock;

               [Description("Spacing (mm) between plants within rows")]
               public double RowSpace { get; set; }
               [Description("Spacing (mm) between rows")]
               public double RowWidth { get; set; }
               [Description("Depth (mm) tubers are planted")]
               public double PlantingDepth { get; set; }
               [Description("Number of stems per seed tuber")]
               public double StemNumberPerSeedTuber { get; set; }
               [Description("Cultivar")]
               public string CultivarName { get; set; }
               [Description("Sowing Date")]
               public DateTime SowingDate { get; set; }

               [EventSubscribe("StartOfDay")]
               private void OnStartOfDay(object sender, EventArgs e)
               {
				double PlantPopulation = 1/((RowWidth/1000)*(RowSpace/1000));

				if (Clock.Today.Date == SowingDate)
                    Plant.Sow(Population:PlantPopulation, Cultivar:CultivarName, Depth:PlantingDepth, BudNumber:StemNumberPerSeedTuber);
                //Plant.Sow(... Contains the following arguements:
                //Population  double  Required  Seeds sowing/m2
                //Cultivar    string  Required  "NameOfCultivar"
                //Depth       double  Optional  Depth (mm) seed sown.   Default is 100mm 
                //MaxCover    double  Optional  Proportion (0-1) of the ground row crop will cover.   Default is 1.0
                //BudNumber   double  Optional  Number of mainstems per seed sown.  Default is 1.0
                //RowSpacing  double  Optional  Spaceing (mm) between drill rows when crop is sown.  Default is 150mm
                //CropClass   string  Optional  Crop class to instantiate when crop is sown.  Default is "Plant"
			   }
            }
        }
```
        Operations: same as Cultivar.Factors.Cultivar.RussetBurbank.Operations
        Report: Events=[Clock].EndOfDay; AutoCreateCSV=true
          Variables:
            [Clock].Today
            [ExtraVariables].Script.AccumTtemerg
            [Plant].Phenology.CurrentPhaseName
            [Plant].Phenology.StageCode.Value
            [ExtraVariables].Script.AccumPlantN
            [ExtraVariables].Script.AccumMineralisation
            [ExtraVariables].Script.AccumDenit
            [ExtraVariables].Script.AccumFert
            [ExtraVariables].Script.AccumLeach
            [ExtraVariables].Script.AccumDetach
            [ExtraVariables].Script.DeltaSoilOMN
            [ExtraVariables].Script.DeltaSurfaceOMN
            [ExtraVariables].Script.DeltaSoilMineralN
            [Plant].Root.NSupplyUptake
            [Soil].SoilWater.eo
            [Soil].SoilWater.es
            [ExtraVariables].Script.SWC
            [ExtraVariables].Script.DUL
            [Soil].SoilWater.drain
            [Soil].SoilWater.runoff
            [ExtraVariables].Script.OutFlowLat
            [Soil].SoilWater.pond
            [ExtraVariables].Script.AccumEO
            [ExtraVariables].Script.AccumEP
            [ExtraVariables].Script.AccumES
            [ExtraVariables].Script.AccumDrainage
            [ExtraVariables].Script.AccumRunoff
            [ExtraVariables].Script.AccumRainfall
            [ExtraVariables].Script.AccumIrrigation
            [ExtraVariables].Script.AccumOutflowLat
            [ExtraVariables].Script.SoilWaterDeficit
            [Plant].Summariser.AboveGround.Wt
            [Plant].Summariser.BelowGround.Wt
            [Plant].Summariser.Total.Wt
            [Plant].Summariser.TotalDead.Wt
            [Plant].Summariser.TotalLive.Wt
            [Plant].Leaf.Dead.Wt
            [Plant].Leaf.Live.Wt
            [Plant].Stem.Dead.Wt
            [Plant].Stem.Live.Wt
            [Plant].Tuber.Dead.Wt
            [Plant].Tuber.Live.Wt
            [Plant].Root.Dead.Wt
            [Plant].Root.Live.Wt
            [Plant].Summariser.AboveGround.N
            [Plant].Summariser.BelowGround.N
            [Plant].Summariser.Total.N
            [Plant].Summariser.TotalLive.N
            [Plant].Summariser.TotalDead.N
            [Plant].Leaf.Dead.N
            [Plant].Leaf.Live.N
            [Plant].Stem.Dead.N
            [Plant].Stem.Live.N
            [Plant].Tuber.Dead.N
            [Plant].Tuber.Live.N
            [Plant].Root.Live.N
            [Plant].Root.Dead.N
            [Plant].Leaf.Live.NConc
            [Plant].Leaf.Dead.NConc
            [Plant].Stem.Live.NConc
            [Plant].Stem.Dead.NConc
            [Plant].Tuber.Live.NConc
            [Plant].Tuber.Dead.NConc
            [Plant].Root.Live.NConc
            [Plant].Root.Dead.NConc
            [Plant].Root.WaterSupply
            [Plant].Root.WaterUptake
            [Plant].Leaf.Transpiration
            [Plant].Leaf.WaterDemand
            [Plant].Root.Depth
            [Plant].Leaf.CoverGreen
            [Plant].Leaf.CoverTotal
            [Plant].Leaf.CoverDead
            [Plant].Leaf.LAI
            [Plant].Leaf.LAIDead
            [Plant].Structure.Height
            [Plant].Leaf.Fn
            [Plant].Leaf.Fw
            [Plant].Leaf.Photosynthesis.FT.Value
            [Plant].Leaf.Photosynthesis.FVPD.Value
            [Plant].Structure.PlantTotalNodeNo
            [Plant].Structure.TotalStemPopn
            [Plant].Leaf.PlantAppearedGreenLeafNo
            [Plant].Leaf.ExpandingCohortNo
            [Plant].Leaf.AppearedCohortNo
            [Plant].Leaf.DeadCohortNo
            [Plant].Structure.MainStemNodeNo
            [Plant].Leaf.SenescingCohortNo
            [Plant].Structure.PrimaryBudTotalNodeNo
            [Plant].Leaf.LeafCohortParameters.MinimumNConc.Value
            [Plant].Stem.MinimumNConc.Value
            [Plant].Tuber.MinimumNConc.Value
            [Plant].Root.MinimumNConc.Value
            [Plant].Leaf.LeafCohortParameters.MaximumNConc.Value
            [Plant].Stem.MaximumNConc.Value
            [Plant].Tuber.MaximumNConc.Value
            [Plant].Root.MaximumNConc.Value
            [Plant].Stem.Live.StructuralWt
            [Plant].Stem.Live.NonStructuralWt
            [Plant].Leaf.SpecificArea
            [Plant].Leaf.ExpandedCohortNo
            [Soil].SoilWater.sw_dep
            [Soil].SoilNitrogen.no3
            [ExtraVariables].Script.SoilNitrogenContent
            [Plant].Arbitrator.NDemand
            [MicroClimate].ga
            [MicroClimate].gc
            [MicroClimate].net_radn
            [MicroClimate].dryleaffraction
            [MicroClimate].peta
            [MicroClimate].petr
        Manager ExtraVariables
```csharp
using System;
using Models.Core;
using System.Collections.Generic;
using System.Text;
using Models.Soils;
using Models.PMF;
using Models;
using System.Xml.Serialization;
namespace Models
{
	[Serializable] 
	public class Script : Model
	{      
		[Link] Clock Clock;
		[Link] Soils.Soil Soil;
		[Link] Models.SurfaceOM.SurfaceOrganicMatter SOM;
		[Link] WeatherFile Met;   
		[Link] Fertiliser Fert;
		[Link] Irrigation Irrig;  
		[Link] Plant Plant;          
					
		[XmlIgnore] public bool InitialDay { get; set; }
		
		[XmlIgnore] public double AccumPlantN { get; set; }
		[XmlIgnore] public double AccumMineralisation { get; set; }
		[XmlIgnore] public double AccumDenit { get; set; }
		[XmlIgnore] public double AccumFert { get; set; }
		[XmlIgnore] public double AccumLeach { get; set; }
		[XmlIgnore] public double AccumDetach { get; set; }
		[XmlIgnore] public double DeltaSoilOMN { get; set; }
		[XmlIgnore] public double DeltaSurfaceOMN { get; set; }
		[XmlIgnore] public double DeltaSoilMineralN { get; set; }
		[XmlIgnore] public double SoilNitrogenContent { get; set; }
		
		[XmlIgnore] public double AccumEO { get; set; }
		[XmlIgnore] public double AccumEP { get; set; }
		[XmlIgnore] public double AccumES { get; set; }
		[XmlIgnore] public double AccumDrainage { get; set; }
		[XmlIgnore] public double AccumRunoff { get; set; }
		[XmlIgnore] public double AccumOutflowLat { get; set; }
		[XmlIgnore] public double AccumIrrigation { get; set; }
		[XmlIgnore] public double AccumRainfall { get; set; }
		[XmlIgnore] public double SoilWaterDeficit { get; set; }
		
		[XmlIgnore] public double AccumTtemerg { get; set; }
		
		[XmlIgnore] public double  InitialSoilOMN { get; set; }
		[XmlIgnore] public double  InitialSurfaceOMN { get; set; }
		[XmlIgnore] public double  InitialMineralN { get; set; }
		
		[XmlIgnore] public double SWC { get; set; }
		[XmlIgnore] public double DUL { get; set; }
		[XmlIgnore] public double OutFlowLat { get; set; }

		[XmlIgnore] public double FomN { get; set; }
		[XmlIgnore] public double BiomN { get; set; }
		[XmlIgnore] public double HumN { get; set; }
		[XmlIgnore] public double OrganicN { get; set; }
		[XmlIgnore] public double NO3N { get; set; }
		[XmlIgnore] public double NH4N { get; set; }
		[XmlIgnore] public double UreaN { get; set; }
		[XmlIgnore] public double MineralN { get; set; }
		[XmlIgnore] public double DltNMinRes { get; set; }
		[XmlIgnore] public double DltNMinTot { get; set; }
		
        public override void OnCommencing()
        {
			InitialDay = true;
		}	   
		
		[EventSubscribe("StartOfDay")]
		private void OnStartOfDay(object sender, EventArgs e)
		{
			//!!!!!! Nitrogen balance components !!!!!!
			//!!!!!!^^^^^^^^^^^^^^^^^^^^^^^^^^^^^!!!!!!
           	FomN = Utility.Math.Sum(Soil.SoilNitrogen.fom_n);
			HumN = Utility.Math.Sum(Soil.SoilNitrogen.hum_n);
		    BiomN = Utility.Math.Sum(Soil.SoilNitrogen.biom_n);
			OrganicN = FomN + HumN + BiomN;
			NO3N = Utility.Math.Sum(Soil.SoilNitrogen.no3);
			NH4N = Utility.Math.Sum(Soil.SoilNitrogen.nh4);
			UreaN = Utility.Math.Sum(Soil.SoilNitrogen.urea);
			MineralN = NO3N + NH4N + UreaN; 
			DltNMinRes = Utility.Math.Sum(Soil.SoilNitrogen.dlt_n_min_res);
			DltNMinTot = Utility.Math.Sum(Soil.SoilNitrogen.dlt_n_min);
            int layers = Soil.SoilWater.dlayer.Length;
			if (InitialDay == true)
			{
				InitialSurfaceOMN = SOM.surfaceom_n;
				InitialSoilOMN = OrganicN;
				InitialMineralN = MineralN;
				InitialDay = false;
			}
			AccumFert += Fert.NitrogenApplied;
			DeltaSurfaceOMN = SOM.surfaceom_n - InitialSurfaceOMN;
			AccumLeach = AccumLeach - Soil.SoilWater.LeachNH4 - Soil.SoilWater.LeachNO3 - Soil.SoilWater.LeachUrea; //Fails
            AccumMineralisation += Utility.Math.Sum(Soil.SoilNitrogen.dlt_n_min);
            AccumDenit -= Utility.Math.Sum(Soil.SoilNitrogen.dnit);
			AccumPlantN -= (double)this.Get("[Plant].Root.NUptake");
			DeltaSoilOMN = OrganicN - InitialSoilOMN;
			DeltaSoilMineralN = MineralN - InitialMineralN;
			SoilNitrogenContent = MineralN;
			
			//!!!!!! Water balance components !!!!!!
			//!!!!!!^^^^^^^^^^^^^^^^^^^^^^^^^^!!!!!!

			AccumIrrigation += Irrig.IrrigationApplied;
			AccumRainfall += Met.Rain;
			AccumEP -= (double)this.Get("[Plant].Leaf.Transpiration");
			SoilWaterDeficit =  (SWC - DUL);
			double OutFlowLat = Utility.Math.Sum(Soil.SoilWater.outflow_lat);
			AccumOutflowLat -= OutFlowLat;
			
			//!!!!!! Thermal time calculation !!!!!!
			//!!!!!! ^^^^^^^^^^^^^^^^^^^^^^^^ !!!!!!
			if (Plant.Phenology.StageCode.Value >= 3)
			AccumTtemerg += Plant.Phenology.ThermalTime.Value;
		}
		
		[EventSubscribe("EndOfDay")]
		private void OnEndOfDay(object sender, EventArgs e)
		{
			AccumEO -= Soil.SoilWater.eo;
			AccumES -= Soil.SoilWater.es; 
			AccumDrainage -= Soil.SoilWater.drain;
			AccumRunoff -= Soil.SoilWater.runoff;
			SWC = Utility.Math.Sum(Soil.SoilWater.sw_dep);
			DUL = Utility.Math.Sum(Soil.SoilWater.dul_dep);

		}
	}
}
```
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