Simulations: Area=0
  Simulation Test: Area=0
    WeatherFile: FileName=..\WeatherFiles\lincoln.met; MaxT=0; MinT=0; Rain=0; Radn=0; vp=0; CO2=350
    Clock: StartDate=2010-02-25; EndDate=2010-08-11
    Summary
    Zone Field: Area=0
      Soil Templeton: SoilType=Sedementary; LocalName=Lincoln; Latitude=0; Longitude=0
        Water
          Thickness  BD    AirDry  LL15   DUL   SAT    KS
          200        1.3   0.06    0.08   0.27  0.31   999
          200        1.3   0.124   0.124  0.25  0.358  300
          200        1.3   0.106   0.106  0.27  0.4    100
          200        1.52  0.07    0.07   0.2   0.314  90
          200        1.52  0.07    0.07   0.2   0.314  90
          200        1.52  0.165   0.165  0.3   0.358  90
          200        1.65  0.157   0.157  0.29  0.35   90
          200        1.65  0.125   0.125  0.25  0.318  90
          200        1.65  0.125   0.125  0.25  0.318  90
          200        1.65  0.125   0.125  0.25  0.318  90
          200        1.65  0.125   0.125  0.25  0.318  90
          200        1.65  0.125   0.125  0.25  0.318  90
          200        1.65  0.125   0.125  0.25  0.318  90
          200        1.65  0.125   0.125  0.25  0.318  90
          200        1.6   0.125   0.125  0.25  0.318  90
        SoilWater: min_crit_temp=5; max_crit_temp=35; max_albedo=0.23; A_to_evap_fact=0.44; canopy_eos_coef=1.7; sw_top_crit=0.9; sumes1_max=100; sumes2_max=25; solute_flow_eff=[1]; solute_flux_eff=[1]; gravity_gradient=2E-05; specific_bd=2.65; hydrol_effective_depth=450; immobile_solutes=[nh4]; canopy_fact=[1, 1, 0, 0]; canopy_fact_height=[0, 600, 1800, 30000]; canopy_fact_default=0.5; act_evap_method=ritchie; irrigation_will_runoff=false; irrigation_layer=1; SummerCona=4.4; SummerU=9; SummerDate=1-Nov; WinterCona=4.4; WinterU=9; WinterDate=1-Apr; DiffusConst=88; DiffusSlope=35; Salb=0.13; slope=0; discharge_width=0; catchment_area=0; max_pond=0; CN2Bare=73; CNRed=20; CNCov=0.8
          Thickness  SWCON  KLAT
          200        0.3    0
          200        0.6    0
          200        0.6    0
          200        0.6    0
          200        0.95   0
          200        0.95   0
          200        0.95   0
          200        0.95   0
          200        0.95   0
          200        0.95   0
          200        0.95   0
          200        0.95   0
          200        0.95   0
          200        0.95   0
          200        0.95   0
          mobile_solutes=[no3, urea, cl, br, org_n, org_c_pool1, org_c_pool2, org_c_pool3]
        SoilNitrogen: fom_type=[default, manure, mucuna, lablab, shemp, stable]; fract_carb=[0.2, 0.3, 0.54, 0.57, 0.45, 0]; fract_cell=[0.7, 0.3, 0.37, 0.37, 0.47, 0.1]; fract_lign=[0.1, 0.4, 0.09, 0.06, 0.08, 0.9]
        SoilOrganicMatter: RootCN=40; RootWt=1000; SoilCN=11; EnrACoeff=7.4; EnrBCoeff=0.2; OCUnits=Total
          Thickness  OC    FBiom  FInert
          200        2.63  0.03   0.4
          200        1.25  0.02   0.7
          200        0.32  0.01   0.8
          200        0.21  0.01   0.9
          200        0.2   0.01   1
          200        0.2   0.01   1
          200        0.2   0.01   1
          200        0.2   0.01   1
          200        0.2   0.01   1
          200        0.2   0.01   1
          200        0.2   0.01   1
          200        0.2   0.01   1
          200        0.2   0.01   1
          200        0.2   0.01   1
          200        0.2   0.01   1
        Analysis: PH=[6, 6, 6, 6, 6, 6, 6, 6, 6, 6, 6, 6, 6, 6, 6]; PHUnits=Water; BoronUnits=HotWater
          Thickness=[200, 200, 200, 200, 200, 200, 200, 200, 200, 200, 200, 200, 200, 200, 200]
        Sample: NO3Units=kgha; NH4Units=kgha; SWUnits=Volumetric; OCUnits=Total; PHUnits=Water
          Thickness  NO3     NH4  SW
          200        44.444  0.1  0.253
          200        29.63   0.1  0.175
          200        22.222  0.1  0.15
          200        11.111  0.1  0.1
          200        11.111  0.1  0.13
          200        0       0.1  0.25
          200        0       0.1  0.29
          200        0       0.1  0.25
          200        0.1     0.1  0.25
          200        0.1     0.1  0.25
          200        0.1     0.1  0.25
          200        0.1     0.1  0.25
          200        0.1     0.1  0.25
          200        0.1     0.1  0.25
          200        0.1     0.1  0.25
      Irrigation
      Fertiliser
        Definitions:
          Name   FractionNO3  FractionNH4  FractionUrea
          UreaN  0            0            1
          NO3N   1            0            0
      SurfaceOrganicMatter: crit_residue_wt=2000; opt_temp=20; cum_eos_max=20; cnrf_coeff=0.277; cnrf_optcn=25; c_fract=0.4; leach_rain_tot=25; min_rain_to_leach=10; crit_min_surfom_orgC=0.004; default_cpr=0; default_standing_fraction=0; standing_extinct_coeff=0.5; fractionFaecesAdded=0.5; PoolName=Barley; type=Barley; mass=2026; standing_fraction=1; cnr=80
        ResidueTypes:
          Name         fom_type       fraction_C  po4ppm  nh4ppm  no3ppm  specific_area  cf_contrib  pot_decomp_rate  fr_c             fr_n             fr_p
          ResidueType  wheat          0.4         0       0       0       0.0005         1           0.1              [0.2, 0.7, 0.1]  [0.2, 0.7, 0.1]  [0.2, 0.7, 0.1]
          ResidueType  lucerne        0.4         0       0       0       0.0002         1           0.1              [0.2, 0.7, 0.1]  [0.2, 0.7, 0.1]  [0.2, 0.7, 0.1]
          ResidueType  barley         0.4         0       0       0       0.0005         1           0.1              [0.2, 0.7, 0.1]  [0.2, 0.7, 0.1]  [0.2, 0.7, 0.1]
          ResidueType  tithonia       0.4         0       0       0       0.0005         1           0.1              [0.2, 0.7, 0.1]  [0.2, 0.7, 0.1]  [0.2, 0.7, 0.1]
          ResidueType  bambatsi       0.4         0       0       0       0.0005         1           0.1              [0.2, 0.7, 0.1]  [0.2, 0.7, 0.1]  [0.2, 0.7, 0.1]
          ResidueType  barley         0.4         0       0       0       0.0005         1           0.1              [0.2, 0.7, 0.1]  [0.2, 0.7, 0.1]  [0.2, 0.7, 0.1]
          ResidueType  broccoli       0.4         0       0       0       0.0004         1           0.1              [0.2, 0.7, 0.1]  [0.2, 0.7, 0.1]  [0.2, 0.7, 0.1]
          ResidueType  butterflypea   0.4         0       0       0       0.0004         1           0.1              [0.2, 0.7, 0.1]  [0.2, 0.7, 0.1]  [0.2, 0.7, 0.1]
          ResidueType  camaldulensis  0.4         0       0       0       0.0002         1           0.1              [0.2, 0.7, 0.1]  [0.2, 0.7, 0.1]  [0.2, 0.7, 0.1]
          ResidueType  canola         0.4         0       0       0       0.0002         1           0.1              [0.2, 0.7, 0.1]  [0.2, 0.7, 0.1]  [0.2, 0.7, 0.1]
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        TillageTypes
      MicroClimate: air_pressure=1010; soil_emissivity=0.96; sun_angle=15; soil_heat_flux_fraction=0.4; night_interception_fraction=0.5; windspeed_default=3; refheight=2; albedo=0.293662; emissivity=0.96; gsmax=0.01; r50=200; a_interception=0; b_interception=1; c_interception=0; d_interception=0; soil_albedo=0.3
        ComponentData Potato: Type=Potato; Albedo=0.26; Emissivity=0.96; Gsmax=0.011; R50=200
      Report: Events=[Clock].EndOfDay; AutoCreateCSV=false
        Variables:
          [Clock].Today
          [SurfaceOrganicMatter].surfaceom_cover
          [SurfaceOrganicMatter].surfaceom_wt
          [SoilWater].sw_dep
          [WeatherFile].Rain
          [SoilWater].flow_water
          [SoilWater].dlayer
          [SoilWater].es
          [Irrigation].IrrigationApplied
          [SoilWater].sw
          [SoilWater].runoff
          [SoilWater].infiltration
          [SoilWater].flux
          [SoilWater].ll15
          [SoilWater].dul
          [SoilWater].ll15_dep
          [SoilWater].dul_dep
          [SoilWater].drain
      Operations
        2010-03-05  Irrigation.Apply(26.6);
        2010-03-08  Irrigation.Apply(30.4);
        2010-03-09  Irrigation.Apply(100);
        2010-03-12  Irrigation.Apply(10);
      Manager ResiduePrecipitationInterception
        InitialDay = false
        AccumPlantN = 0
        AccumMineralisation = 78.9481
        AccumDenit = 0
        AccumFert = 0
        AccumLeach = 0
        AccumDetach = 0
        DeltaSoilOMN = -17417.2
        DeltaSurfaceOMN = -11.56
        DeltaSoilMineralN = -98.8711
        AccumEO = -755.9
        AccumEP = 0
        AccumES = 0
        AccumDrainage = 0
        AccumRunoff = 0
        AccumOutflowLat = 0
        AccumIrrigation = 100
        AccumRainfall = 246.6
        SoilWaterDeficit = -110.101
        AccumTtemerg = 1894.12
        InitialSoilOMN = 18891.7
        InitialSurfaceOMN = 12
        InitialMineralN = 101.36
        SWC = 342.899
        DUL = 453
        OutFlowLat = 0
```csharp
        using System;
        using Models.Core;
		using System.Collections.Generic;
        using System.Text;
        using Models.Soils;
        using Models;
        using System.Xml.Serialization;
        namespace Models
        {
[Serializable] 
public class Script : Model
{      
[Link] Clock Clock;
[Link] Soils.SoilWater SoilWat;
[Link] Models.SurfaceOM.SurfaceOrganicMatter SOM;        
[Link] WeatherFile Met;   
[Link] Irrigation Irrig;  
               
[XmlIgnore] public bool InitialDay { get; set; }

[XmlIgnore] public double Precip { get; set; }
[XmlIgnore] public double Maximum_interception { get; set; }
[XmlIgnore] public double Residue_water { get; set; }
[XmlIgnore] public double Interception_today { get; set; }
[XmlIgnore] public double Evaporated_interception { get; set; }
[XmlIgnore] public double SWC60 { get; set; }

[EventSubscribe("Initialised")]
private void OnInitialised(object sender, EventArgs e)
{
Precip = 0;
Maximum_interception = 0;
Residue_water = 0;
Interception_today = 0;
Evaporated_interception = 0;
SWC60 = 0;
}	   

[EventSubscribe("EndOfDay")]
private void OnEndOfDay(object sender, EventArgs e)
{
//calculate the amount of water that is going to evaporate from the residue water pool

if (Residue_water > SoilWat.eo)
   Evaporated_interception = SoilWat.eo;
else
   Evaporated_interception = Residue_water;

SWC60 = SoilWat.sw_dep[0] + SoilWat.sw_dep[1] + SoilWat.sw_dep[2];

// remove evaporation from residue water pool               

Residue_water = Residue_water - Evaporated_interception;
}

[EventSubscribe("StartOfDay")]
private void OnStartOfDay(object sender, EventArgs e)
{
//Set interception variables
Precip = Met.Rain + Irrig.IrrigationApplied; 
Maximum_interception = 0.0002 * SOM.surfaceom_wt;
          
//Determine the amount of water intercepted by residue today
if ((Precip * SOM.surfaceom_cover) >= (Maximum_interception - Residue_water))
   Interception_today = (Maximum_interception - Residue_water);
else
   Interception_today = (Precip * SOM.surfaceom_cover) ;

// Send message to soil module to take interception out of water balance
    
SoilWat.residueinterception = Interception_today;
            
//Add intercepted water into residual water pool

 Residue_water = Residue_water + Interception_today;



            

}
}
}
```
  DataStore
  Tests
    Test:
      SimulationName  TableName  Type       ColumnNames                           Parameters
      Test            Report     Tolerance  SurfaceOrganicMatter.surfaceom_cover  1,1
      Test            Report     Tolerance  SurfaceOrganicMatter.surfaceom_wt     1,1
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