Simulations
  Simulation Saturated_Flow_Only: Area=0; Slope=0
    WeatherFile: FileName=Saturated Flow Only.met
    Clock: StartDate=1940-01-01; EndDate=1940-03-02
    Summary summaryfile
    Zone paddock: Area=1; Slope=0
      Soil: SoilType=Black Vertosol; LocalName=Waco; Site=Jimbour; NearestTown=Jimbour, Q 4352; Region=South East Queensland; NaturalVegetation=Grassland, mainly Qld bluegrass; Latitude=0; Longitude=0
        Sample Soil sample: NO3Units=ppm; NH4Units=ppm; SWUnits=Volumetric; OCUnits=Total; PHUnits=Water
          Thickness  NO3  NH4  SW
          150        0    0    0.59
          150        0    0    0.58
          300        0    0    0.59
          300        0    0    0.58
          300        0    0    0.57
          300        0    0    0.55
          300        0    0    0.55
          300        0    0    0.53
          300        0    0    0.52
          300        0    0    0.51
          300        0    0    0.49
        Water
          Thickness  BD    AirDry  LL15  DUL   SAT
          150        1.02  0.15    0.29  0.54  0.59
          150        1.03  0.26    0.29  0.53  0.58
          300        1.02  0.29    0.29  0.54  0.59
          300        1.02  0.29    0.29  0.54  0.58
          300        1.06  0.3     0.3   0.52  0.57
          300        1.11  0.31    0.31  0.5   0.55
          300        1.12  0.32    0.32  0.5   0.55
          300        1.15  0.33    0.33  0.48  0.53
          300        1.18  0.34    0.34  0.47  0.52
          300        1.2   0.35    0.35  0.46  0.51
          300        1.25  0.36    0.36  0.44  0.49
        SoilWater: min_crit_temp=5; max_crit_temp=35; max_albedo=0.23; A_to_evap_fact=0.44; canopy_eos_coef=1.7; sw_top_crit=0.9; sumes1_max=100; sumes2_max=25; solute_flow_eff=[1]; solute_flux_eff=[1]; gravity_gradient=2E-05; specific_bd=2.65; hydrol_effective_depth=450; immobile_solutes=[nh4]; canopy_fact=[1, 1, 0, 0]; canopy_fact_height=[0, 600, 1800, 30000]; canopy_fact_default=0.5; act_evap_method=ritchie; irrigation_will_runoff=false; SummerDate=1-Nov; WinterDate=1-Apr; Salb=0.13; CN2Bare=1
          zero: irrigation_layer, SummerCona, SummerU, WinterCona, WinterU, DiffusConst, DiffusSlope, slope, discharge_width, catchment_area, max_pond, CNRed, CNCov
          Thickness  SWCON  KLAT
          150        0.3    0
          150        0.3    0
          300        0.3    0
          300        0.3    0
          300        0.3    0
          300        0.3    0
          300        0.3    0
          300        0.3    0
          300        0.3    0
          300        0.3    0
          300        0.3    0
          mobile_solutes=[no3, urea, cl, br, org_n, org_c_pool1, org_c_pool2, org_c_pool3]
        SoilNitrogen: fom_type=[default, manure, mucuna, lablab, shemp, stable]; fract_carb=[0.2, 0.3, 0.54, 0.57, 0.45, 0]; fract_cell=[0.7, 0.3, 0.37, 0.37, 0.47, 0.1]; fract_lign=[0.1, 0.4, 0.09, 0.06, 0.08, 0.9]; wfpsN2N2O_x=[22, 88]; wfpsN2N2O_y=[0.1, 1]
          oc=[1.03342, 0.886846, 0.888645, 0.889496, 0.769828, 0.44992, 0.269964, 0.219972, 0.159982, 0.129986, 0.119986]
        SoilOrganicMatter: RootCN=40; RootWt=200; SoilCN=12.5; EnrACoeff=7.4; EnrBCoeff=0.2; OCUnits=Total
          Thickness  OC    FBiom  FInert
          150        1.04  0.025  0.4
          150        0.89  0.02   0.6
          300        0.89  0.015  0.8
          300        0.89  0.01   0.9
          300        0.77  0.01   0.95
          300        0.45  0.01   0.95
          300        0.27  0.01   0.95
          300        0.22  0.01   0.95
          300        0.16  0.01   0.95
          300        0.13  0.01   0.95
          300        0.12  0.01   0.95
        Analysis: Thickness=[150, 150, 300, 300, 300, 300, 300, 300, 300, 300, 300]; PH=[8.4, 8.8, 9, 9.2, 9.2, 9.1, 9, 9, 8.9, 8.9, 8.9]; PHUnits=Water; BoronUnits=HotWater
      Report: EventNames=[Clock].DoReport
        VariableNames:
          [Soil].SoilWater.dlayer as dlayer
          [Soil].SoilWater.sat_dep as sat_dep
          [Soil].SoilWater.dul_dep as dul_dep
          [Soil].SoilWater.ll15_dep as ll15_dep
          [Soil].SoilWater.air_dry_dep as air_dry_dep
          [Clock].Today
          [WeatherFile].Rain as rain
          [Soil].SoilWater.sw_dep as sw_dep
          [Soil].SoilWater.flux2 as flux
          [Soil].SoilWater.drain as drain
          [Soil].SoilWater.runoff as runoff
          [Soil].SoilWater.es as es
      SurfaceOrganicMatter: PondActive=no; ReportAdditions=no; ReportRemovals=no; PoolName=wheat_stubble; type=wheat; mass=0; standing_fraction=0; cpr=0; cnr=80; CriticalResidueWeight=2000; OptimumDecompTemp=20; MaxCumulativeEOS=20; CNRatioDecompCoeff=0.277; CNRatioDecompThreshold=25; TotalLeachRain=25; MinRainToLeach=10; CriticalMinimumOrganicC=0.004; DefaultCPRatio=0; DefaultStandingFraction=0; StandingExtinctCoeff=0.5; FractionFaecesAdded=0.5
        Pools:
          {PoolName=wheat_stubble, ResidueType=wheat, Mass=0, CNRatio=80, CPRatio=0, StandingFraction=0}
        ResidueTypes ResidueTypesList: LoadFromResource=ResidueTypes
        TillageTypes TillageTypesList
      MicroClimate: air_pressure=1010; soil_emissivity=0.96; sun_angle=15; soil_heat_flux_fraction=0.4; night_interception_fraction=0.5; windspeed_default=3; refheight=2; albedo=0.15; emissivity=0.96; gsmax=0.01; r50=200; a_interception=0; b_interception=1; c_interception=0; d_interception=0; soil_albedo=0.23
  Simulation Unsaturated_Flow_Only: Area=0; Slope=0
    WeatherFile: FileName=Unsaturated Flow Only.met
    Clock: StartDate=1940-01-01; EndDate=1950-12-31
    Summary summaryfile
    Zone paddock: Area=1; Slope=0
      Soil: SoilType=Black Vertosol; LocalName=Waco; Site=Jimbour; NearestTown=Jimbour, Q 4352; Region=South East Queensland; NaturalVegetation=Grassland, mainly Qld bluegrass; Latitude=0; Longitude=0
        Sample Soil sample: NO3Units=ppm; NH4Units=ppm; SWUnits=Volumetric; OCUnits=Total; PHUnits=Water
          Thickness  NO3  NH4  SW
          150        0    0    0.54
          150        0    0    0.53
          300        0    0    0.29
          300        0    0    0.54
          300        0    0    0.3
          300        0    0    0.5
          300        0    0    0.32
          300        0    0    0.48
          300        0    0    0.34
          300        0    0    0.46
          300        0    0    0.36
        Water: same as Saturated_Flow_Only.paddock.Soil.Water
        SoilWater: min_crit_temp=5; max_crit_temp=35; max_albedo=0.23; A_to_evap_fact=0.44; canopy_eos_coef=1.7; sw_top_crit=0.9; sumes1_max=100; sumes2_max=25; solute_flow_eff=[1]; solute_flux_eff=[1]; gravity_gradient=2E-05; specific_bd=2.65; hydrol_effective_depth=450; immobile_solutes=[nh4]; canopy_fact=[1, 1, 0, 0]; canopy_fact_height=[0, 600, 1800, 30000]; canopy_fact_default=0.5; act_evap_method=ritchie; irrigation_will_runoff=false; SummerDate=1-Nov; WinterDate=1-Apr; DiffusConst=40; DiffusSlope=16; Salb=0.13; CN2Bare=1
          zero: irrigation_layer, SummerCona, SummerU, WinterCona, WinterU, slope, discharge_width, catchment_area, max_pond, CNRed, CNCov
          Thickness  SWCON  KLAT
          150        0      0
          150        0      0
          300        0      0
          300        0      0
          300        0      0
          300        0      0
          300        0      0
          300        0      0
          300        0      0
          300        0      0
          300        0      0
          mobile_solutes=[no3, urea, cl, br, org_n, org_c_pool1, org_c_pool2, org_c_pool3]
        SoilNitrogen: fom_type=[default, manure, mucuna, lablab, shemp, stable]; fract_carb=[0.2, 0.3, 0.54, 0.57, 0.45, 0]; fract_cell=[0.7, 0.3, 0.37, 0.37, 0.47, 0.1]; fract_lign=[0.1, 0.4, 0.09, 0.06, 0.08, 0.9]; wfpsN2N2O_x=[22, 88]; wfpsN2N2O_y=[0.1, 1]
          oc=[0.862004, 0.788933, 0.843286, 0.86748, 0.760857, 0.44473, 0.267061, 0.21757, 0.158351, 0.12863, 0.118865]
        SoilOrganicMatter: same as Saturated_Flow_Only.paddock.Soil.SoilOrganicMatter
        Analysis: Thickness=[150, 150, 300, 300, 300, 300, 300, 300, 300, 300, 300]; PH=[8.4, 8.8, 9, 9.2, 9.2, 9.1, 9, 9, 8.9, 8.9, 8.9]; PHUnits=Water; BoronUnits=HotWater
      Report: EventNames=[Clock].DoReport
        VariableNames:
          [Soil].SoilWater.dlayer as dlayer
          [Soil].SoilWater.sat_dep as sat_dep
          [Soil].SoilWater.dul_dep as dul_dep
          [Soil].SoilWater.ll15_dep as ll15_dep
          [Soil].SoilWater.air_dry_dep as air_dry_dep
          [Clock].Today
          [WeatherFile].Rain as rain
          [Soil].SoilWater.sw_dep as sw_dep
          [Soil].SoilWater.flow as flow
          [Soil].SoilWater.drain as drain
          [Soil].SoilWater.runoff as runoff
          [Soil].SoilWater.es as es
      SurfaceOrganicMatter: same as Saturated_Flow_Only.paddock.SurfaceOrganicMatter
      MicroClimate: same as Saturated_Flow_Only.paddock.MicroClimate
  Simulation Runoff_Only: Area=0; Slope=0
    WeatherFile: FileName=Runoff Only.met
    Clock: StartDate=1940-01-01; EndDate=1950-12-31
    Summary summaryfile
    Zone paddock: Area=1; Slope=0
      Soil: SoilType=Black Vertosol; LocalName=Waco; Site=Jimbour; NearestTown=Jimbour, Q 4352; Region=South East Queensland; NaturalVegetation=Grassland, mainly Qld bluegrass; Latitude=0; Longitude=0
        Sample Soil sample: NO3Units=ppm; NH4Units=ppm; SWUnits=Volumetric; OCUnits=Total; PHUnits=Water
          Thickness  NO3  NH4  SW
          150        0    0    0.59
          150        0    0    0.58
          300        0    0    0.29
          300        0    0    0.29
          300        0    0    0.3
          300        0    0    0.31
          300        0    0    0.32
          300        0    0    0.33
          300        0    0    0.34
          300        0    0    0.35
          300        0    0    0.36
        Water: same as Saturated_Flow_Only.paddock.Soil.Water
        SoilWater: min_crit_temp=5; max_crit_temp=35; max_albedo=0.23; A_to_evap_fact=0.44; canopy_eos_coef=1.7; sw_top_crit=0.9; sumes1_max=100; sumes2_max=25; solute_flow_eff=[1]; solute_flux_eff=[1]; gravity_gradient=2E-05; specific_bd=2.65; hydrol_effective_depth=450; immobile_solutes=[nh4]; canopy_fact=[1, 1, 0, 0]; canopy_fact_height=[0, 600, 1800, 30000]; canopy_fact_default=0.5; act_evap_method=ritchie; irrigation_will_runoff=false; SummerDate=1-Nov; WinterDate=1-Apr; Salb=0.13; CN2Bare=73
          zero: irrigation_layer, SummerCona, SummerU, WinterCona, WinterU, DiffusConst, DiffusSlope, slope, discharge_width, catchment_area, max_pond, CNRed, CNCov
          Thickness  SWCON  KLAT
          150        0      0
          150        0      0
          300        0      0
          300        0      0
          300        0      0
          300        0      0
          300        0      0
          300        0      0
          300        0      0
          300        0      0
          300        0      0
          mobile_solutes=[no3, urea, cl, br, org_n, org_c_pool1, org_c_pool2, org_c_pool3]
        SoilNitrogen: fom_type=[default, manure, mucuna, lablab, shemp, stable]; fract_carb=[0.2, 0.3, 0.54, 0.57, 0.45, 0]; fract_cell=[0.7, 0.3, 0.37, 0.37, 0.47, 0.1]; fract_lign=[0.1, 0.4, 0.09, 0.06, 0.08, 0.9]; wfpsN2N2O_x=[22, 88]; wfpsN2N2O_y=[0.1, 1]
          oc=[0.936414, 0.833186, 0.86334, 0.877604, 0.764885, 0.447288, 0.268472, 0.218792, 0.159146, 0.129328, 0.119396]
        SoilOrganicMatter: same as Saturated_Flow_Only.paddock.Soil.SoilOrganicMatter
        Analysis: Thickness=[150, 150, 300, 300, 300, 300, 300, 300, 300, 300, 300]; PH=[8.4, 8.8, 9, 9.2, 9.2, 9.1, 9, 9, 8.9, 8.9, 8.9]; PHUnits=Water; BoronUnits=HotWater
      Report: EventNames=[Clock].DoReport
        VariableNames:
          [Clock].Today
          [WeatherFile].Rain as rain
          [Soil].SoilWater.runoff as runoff
          [Soil].SoilWater.dlayer as dlayer
          [Soil].SoilWater.sat_dep as sat_dep
          [Soil].SoilWater.dul_dep as dul_dep
          [Soil].SoilWater.ll15_dep as ll15_dep
          [Soil].SoilWater.air_dry_dep as air_dry_dep
          [Soil].SoilWater.sw_dep as sw_dep
          [Soil].SoilWater.flux as flux
          [Soil].SoilWater.flow as flow
          [Soil].SoilWater.drain as drain
          [Soil].SoilWater.es as es
      SurfaceOrganicMatter: same as Saturated_Flow_Only.paddock.SurfaceOrganicMatter
      MicroClimate: same as Saturated_Flow_Only.paddock.MicroClimate
  Simulation Soil_Evaporation_Only: Area=0; Slope=0
    WeatherFile: FileName=Soil Evaporation Only.met
    Clock: StartDate=1940-01-01; EndDate=1941-01-01
    Summary summaryfile
    Zone paddock: Area=1; Slope=0
      Manager AvgTempCalculation
        avgTemp = 24.95
```csharp
using System;
using Models.Core;
using Models.PMF;
using Models.PMF.OldPlant;
namespace Models
{
	[Serializable]
	[System.Xml.Serialization.XmlInclude(typeof(Model))]
	public class Script : Model
	{
		public double avgTemp{get; set;}
		
		[Link] Clock Clock;
		[Link] WeatherFile Met;
		[EventSubscribe("DoManagement")]
		private void OnDoManagement(object sender, EventArgs e)
		{
			avgTemp = (Met.MaxT + Met.MinT)/2;
			/*	
			avgTemp = (maxt + mint)/2
			*/
		}
	}
}
```
      Soil: SoilType=Black Vertosol; LocalName=Waco; Site=Jimbour; NearestTown=Jimbour, Q 4352; Region=South East Queensland; NaturalVegetation=Grassland, mainly Qld bluegrass; Latitude=0; Longitude=0
        Sample Soil sample: same as Saturated_Flow_Only.paddock.Soil.Soil sample
        Water: same as Saturated_Flow_Only.paddock.Soil.Water
        SoilWater: min_crit_temp=5; max_crit_temp=35; max_albedo=0.23; A_to_evap_fact=0.44; canopy_eos_coef=1.7; sw_top_crit=0.9; sumes1_max=100; sumes2_max=25; solute_flow_eff=[1]; solute_flux_eff=[1]; gravity_gradient=2E-05; specific_bd=2.65; hydrol_effective_depth=450; immobile_solutes=[nh4]; canopy_fact=[1, 1, 0, 0]; canopy_fact_height=[0, 600, 1800, 30000]; canopy_fact_default=0.5; act_evap_method=ritchie; irrigation_will_runoff=false; SummerCona=3.5; SummerU=6; SummerDate=1-Nov; WinterCona=2.5; WinterU=5; WinterDate=1-Apr; Salb=0.13; CN2Bare=1
          zero: irrigation_layer, DiffusConst, DiffusSlope, slope, discharge_width, catchment_area, max_pond, CNRed, CNCov
          Thickness  SWCON  KLAT
          150        0      0
          150        0      0
          300        0      0
          300        0      0
          300        0      0
          300        0      0
          300        0      0
          300        0      0
          300        0      0
          300        0      0
          300        0      0
          mobile_solutes=[no3, urea, cl, br, org_n, org_c_pool1, org_c_pool2, org_c_pool3]
        SoilNitrogen: fom_type=[default, manure, mucuna, lablab, shemp, stable]; fract_carb=[0.2, 0.3, 0.54, 0.57, 0.45, 0]; fract_cell=[0.7, 0.3, 0.37, 0.37, 0.47, 0.1]; fract_lign=[0.1, 0.4, 0.09, 0.06, 0.08, 0.9]; wfpsN2N2O_x=[22, 88]; wfpsN2N2O_y=[0.1, 1]
          oc=[1.0321, 0.883118, 0.887037, 0.888782, 0.769524, 0.449743, 0.269859, 0.219887, 0.159921, 0.129937, 0.119941]
        SoilOrganicMatter: same as Saturated_Flow_Only.paddock.Soil.SoilOrganicMatter
        Analysis: Thickness=[150, 150, 300, 300, 300, 300, 300, 300, 300, 300, 300]; PH=[8.4, 8.8, 9, 9.2, 9.2, 9.1, 9, 9, 8.9, 8.9, 8.9]; PHUnits=Water; BoronUnits=HotWater
      Report: EventNames=[Clock].DoReport
        VariableNames:
          [Soil].SoilWater.dlayer as dlayer
          [Soil].SoilWater.sat_dep as sat_dep
          [Soil].SoilWater.dul_dep as dul_dep
          [Soil].SoilWater.sw_dep as sw_dep
          [Soil].SoilWater.ll15_dep as ll15_dep
          [Soil].SoilWater.air_dry_dep as air_dry_dep
          [Soil].SoilWater.flux as flux
          [Soil].SoilWater.drain as drain
          [Soil].SoilWater.runoff as runoff
          [WeatherFile].Rain as rain
          [Clock].Today.DayOfYear as day
          [Clock].Today
          [Soil].SoilWater.u as u
          [Soil].SoilWater.cona as cona
          [Soil].SoilWater.t as t
          [Soil].SoilWater.es as es
          [Soil].SoilWater.eo as eo
          [Soil].SoilWater.eos as eos
          [Soil].SoilWater.sw_dep(1) as sw_top
          [WeatherFile].Radn as radn
          [AvgTempCalculation].Script.avgTemp as avgTemp
      SurfaceOrganicMatter: same as Saturated_Flow_Only.paddock.SurfaceOrganicMatter
      MicroClimate: same as Saturated_Flow_Only.paddock.MicroClimate
  Simulation Ponding_Only: Area=0; Slope=0
    WeatherFile: FileName=Ponding Only.met
    Clock: StartDate=1940-01-01; EndDate=1940-03-02
    Summary summaryfile
    Zone paddock: Area=1; Slope=0
      Soil: SoilType=Black Vertosol; LocalName=Waco; Site=Jimbour; NearestTown=Jimbour, Q 4352; Region=South East Queensland; NaturalVegetation=Grassland, mainly Qld bluegrass; Latitude=0; Longitude=0
        Sample Soil sample: NO3Units=ppm; NH4Units=ppm; SWUnits=Volumetric; OCUnits=Total; PHUnits=Water
          Thickness  NO3  NH4  SW
          150        0    0    0
          150        0    0    0
          300        0    0    0
          300        0    0    0
          300        0    0    0
          300        0    0    0
          300        0    0    0
          300        0    0    0
          300        0    0    0
          300        0    0    0
          300        0    0    0
        Water: same as Saturated_Flow_Only.paddock.Soil.Water
        SoilWater: min_crit_temp=5; max_crit_temp=35; max_albedo=0.23; A_to_evap_fact=0.44; canopy_eos_coef=1.7; sw_top_crit=0.9; sumes1_max=100; sumes2_max=25; solute_flow_eff=[1]; solute_flux_eff=[1]; gravity_gradient=2E-05; specific_bd=2.65; hydrol_effective_depth=450; immobile_solutes=[nh4]; canopy_fact=[1, 1, 0, 0]; canopy_fact_height=[0, 600, 1800, 30000]; canopy_fact_default=0.5; act_evap_method=ritchie; irrigation_will_runoff=false; SummerDate=1-Nov; WinterDate=1-Apr; Salb=0.13; CN2Bare=1
          zero: irrigation_layer, SummerCona, SummerU, WinterCona, WinterU, DiffusConst, DiffusSlope, slope, discharge_width, catchment_area, max_pond, CNRed, CNCov
          Thickness  SWCON  KLAT
          150        0      0
          150        0      0
          300        0      0
          300        0      0
          300        0      0
          300        0      0
          300        0      0
          300        0      0
          300        0      0
          300        0      0
          300        0      0
          mobile_solutes=[no3, urea, cl, br, org_n, org_c_pool1, org_c_pool2, org_c_pool3]
        SoilNitrogen: fom_type=[default, manure, mucuna, lablab, shemp, stable]; fract_carb=[0.2, 0.3, 0.54, 0.57, 0.45, 0]; fract_cell=[0.7, 0.3, 0.37, 0.37, 0.47, 0.1]; fract_lign=[0.1, 0.4, 0.09, 0.06, 0.08, 0.9]; wfpsN2N2O_x=[22, 88]; wfpsN2N2O_y=[0.1, 1]
          oc=[1.03711, 0.88906, 0.889821, 0.889953, 0.769994, 0.450001, 0.270003, 0.220002, 0.16, 0.13, 0.12]
        SoilOrganicMatter: same as Saturated_Flow_Only.paddock.Soil.SoilOrganicMatter
        Analysis: Thickness=[150, 150, 300, 300, 300, 300, 300, 300, 300, 300, 300]; PH=[8.4, 8.8, 9, 9.2, 9.2, 9.1, 9, 9, 8.9, 8.9, 8.9]; PHUnits=Water; BoronUnits=HotWater
      Manager calculate total_pond
        total_pond = 0
```csharp
using System;
using Models.Core;
using Models.PMF;
using Models.PMF.OldPlant;
using Models.Soils;
namespace Models
{
	[Serializable]
	[System.Xml.Serialization.XmlInclude(typeof(Model))]
	public class Script : Model
	{		
		[Link] Clock Clock;
		[Link] Soil Soil;
				
		public double total_pond {get; set;}
				
		[EventSubscribe("DoCalculations")]
		private void OnDoCalculations(object sender, EventArgs e)
		{
			total_pond = Soil.SoilWater.pond + Soil.SoilWater.pond_evap; 
			/*
			total_pond = pond + pond_evap
			*/
		}
	}
}
```
      Report: EventNames=[Clock].DoReport
        VariableNames:
          [Soil].SoilWater.dlayer as dlayer
          [Soil].SoilWater.sat_dep as sat_dep
          [Soil].SoilWater.dul_dep as dul_dep
          [Soil].SoilWater.ll15_dep as ll15_dep
          [Soil].SoilWater.air_dry_dep as air_dry_dep
          [Clock].Today
          [WeatherFile].Rain as rain
          [Soil].SoilWater.pond_evap as pond_evap
          [Soil].SoilWater.pond as pond
          [calculate total_pond].Script.total_pond as total_pond
          [Soil].SoilWater.runoff as runoff
          [Soil].SoilWater.sw_dep(1-3) as sw_top
          [Soil].SoilWater.es as es
          [Soil].SoilWater.drain as drain
          [Soil].SoilWater.flux as flux
          [Soil].SoilWater.flow as flow
          [Soil].SoilWater.sw_dep as sw_dep
      SurfaceOrganicMatter: same as Saturated_Flow_Only.paddock.SurfaceOrganicMatter
      MicroClimate: same as Saturated_Flow_Only.paddock.MicroClimate
  DataStore
    Input: FileNames=[OLD_Outputs\Saturated Flow Only (OLD).out]
    Input old_unsaturated: FileNames=[OLD_Outputs\Unsaturated Flow Only (OLD).out]
    Input old_runoff: FileNames=[OLD_Outputs\Runoff Only (OLD).out]
    Input old_soil_evap: FileNames=[OLD_Outputs\Soil Evaporation Only (OLD).out]
    Input old_ponding: FileNames=[OLD_Outputs\Ponding Only using KS (OLD).out]
  Tests
    Test:
      SimulationName         TableName  Type       ColumnNames  Parameters
      Saturated_Flow_Only    Report     Tolerance  flux(1)      1,1
      Saturated_Flow_Only    Report     Tolerance  flux(2)      1,1
      Saturated_Flow_Only    Report     Tolerance  flux(3)      1,1
      Saturated_Flow_Only    Report     Tolerance  flux(4)      1,1
      Saturated_Flow_Only    Report     Tolerance  flux(5)      1,1
      Saturated_Flow_Only    Report     Tolerance  flux(6)      1,1
      Saturated_Flow_Only    Report     Tolerance  flux(7)      1,1
      Saturated_Flow_Only    Report     Tolerance  flux(8)      1,1
      Saturated_Flow_Only    Report     Tolerance  flux(9)      1,1
      Saturated_Flow_Only    Report     Tolerance  flux(10)     1,1
      Saturated_Flow_Only    Report     Tolerance  flux(11)     1,1
      Saturated_Flow_Only    Report     Tolerance  drain        1,1
      Unsaturated_Flow_Only  Report     Tolerance  flow(1)      1,1
      Unsaturated_Flow_Only  Report     Tolerance  flow(2)      1,1
      Unsaturated_Flow_Only  Report     Tolerance  flow(3)      1,1
      Unsaturated_Flow_Only  Report     Tolerance  flow(4)      1,1
      Unsaturated_Flow_Only  Report     Tolerance  flow(5)      1,1
      Unsaturated_Flow_Only  Report     Tolerance  flow(6)      1,1
      Unsaturated_Flow_Only  Report     Tolerance  flow(7)      1,1
      Unsaturated_Flow_Only  Report     Tolerance  flow(8)      1,1
      Unsaturated_Flow_Only  Report     Tolerance  flow(9)      1,1
      Unsaturated_Flow_Only  Report     Tolerance  flow(10)     1,1
      Unsaturated_Flow_Only  Report     Tolerance  flow(11)     1,1
      Runoff_Only            Report     Tolerance  runoff       1,1
      Soil_Evaporation_Only  Report     Tolerance  t            1,1
      Soil_Evaporation_Only  Report     Tolerance  es           1,1
      Soil_Evaporation_Only  Report     Tolerance  eos          1,1
      Soil_Evaporation_Only  Report     Tolerance  eo           1,1
      Soil_Evaporation_Only  Report     Tolerance  sw_top       1,1
      Ponding_Only           Report     Tolerance  pond_evap    1,1
      Ponding_Only           Report     Tolerance  pond         1,1
      Ponding_Only           Report     Tolerance  total_pond   1,1
