Simulations: Version=166
  DataStore
    ExcelInput RainShelter: SheetNames=[Observed]
      FileNames=[%root%\Tests\Validation\Maize\Observations\MaizeObservations.xlsx]
    Input ABlockObserved: FileNames=[%root%\Tests\Validation\SCRUM\AblockObserved.txt]
    Input ABlockSWC: FileNames=[%root%\Tests\Validation\SCRUM\AblockSWC.txt]
    PredictedObserved: PredictedTableName=PredictedLeach; ObservedTableName=ObservedLeach; FieldNameUsedForMatch=SimulationName; FieldName2UsedForMatch=Clock.Today; AllColumns=false
      Tests: POName=PredictedObserved
        AcceptedStats:
          Name       n   Slope     Intercept  SEslope    SEintercept  R2        RMSE     NSE       ME      MAE      RSR
          N          36  1         0          0          0            1         0        1         0       0        0
          NLeaching  36  0.958419  13.1282    0.0754741  7.50894      0.825869  32.4458  0.783278  10.176  16.0194  0.459023
        AcceptedStatsName=Name n Slope Intercept SEslope SEintercept R2 RMSE NSE ME MAE RSR
    PredictedObserved PredictedObserved_RSSoilWater: PredictedTableName=Report; ObservedTableName=Observed; FieldNameUsedForMatch=SimulationName; FieldName2UsedForMatch=Clock.Today; AllColumns=false
      Tests: POName=PredictedObserved_RSSoilWater
        AcceptedStats:
          Name                  n    Slope       Intercept    SEslope    SEintercept  R2         RMSE       NSE          ME            MAE        RSR
          ProfileWater          126  1.1592      -37.8029     0.0490602  15.5401      0.818257   26.9272    0.593019     12.1736       19.6857    0.635414
          Soil.SoilWater.SW(1)  126  1.25789     -0.00648064  0.035765   0.00649649   0.90889    0.0519074  0.574294     0.0356309     0.037277   0.649867
          Soil.SoilWater.SW(2)  126  1.1717      -0.03291     0.0452973  0.00964034   0.84365    0.0287878  0.714034     0.00244251    0.0226019  0.532632
          Soil.SoilWater.SW(3)  126  0.965056    0.0122203    0.0308585  0.00623278   0.887481   0.0179183  0.868892     0.00537741    0.0147627  0.360648
          Soil.SoilWater.SW(4)  126  0.709467    0.066874     0.0284471  0.0057517    0.833779   0.0178229  0.750964     0.00905499    0.0153507  0.497051
          Soil.SoilWater.SW(5)  126  0.296212    0.151906     0.0505935  0.0102712    0.216569   0.0308806  0.0734977    0.0108218     0.0261216  0.958723
          Soil.SoilWater.SW(6)  126  0.0964378   0.186707     0.0256049  0.00512132   0.102656   0.0209168  -0.00966551  0.00696481    0.0176272  1.00083
          Soil.SoilWater.SW(7)  126  -0.0536994  0.211694     0.0111469  0.00226074   0.157652   0.0264472  -0.125935    -0.000390067  0.0216854  1.05688
          Soil.SoilWater.SW(8)  126  -0.0578702  0.207785     0.0201434  0.00415981   0.0624073  0.0287743  -0.297288    -0.00903432   0.0221687  1.13446
        AcceptedStatsName=Name n Slope Intercept SEslope SEintercept R2 RMSE NSE ME MAE RSR
  Simulation SCRUMTestBase
    Weather: FileName=%root%\Tests\WeatherFiles\lincoln.met
    Clock: Start=1998-10-14; End=1999-07-01
    Summary
    SoilArbitrator Soil Arbitrator
    Zone Field: Area=1; Slope=0; AspectAngle=0; Altitude=50
      Soil: Latitude=0; Longitude=0
        Chemical: Thickness=[100, 200, 300, 300, 300, 300]; PH=[6.6, 6.2, 5.7, 5.5, 5.5, 5.5]; PHUnits=Water
        Water: Thickness=[100, 200, 300, 300, 300, 300]; InitialValues=[0.33, 0.33, 0.31, 0.15, 0.1, 0.06]; InitialPAWmm=180; RelativeTo=LL15; FilledFromTop=false
        Physical
          Thickness  BD   AirDry  LL15  DUL   SAT
          100        1.2  0.08    0.13  0.33  0.5
          200        1.2  0.13    0.13  0.33  0.5
          300        1.2  0.1     0.1   0.31  0.44
          300        1.2  0.06    0.06  0.15  0.46
          300        1.2  0.04    0.04  0.1   0.44
          300        1.2  0.02    0.02  0.06  0.44
          SoilCrop SCRUMSoil: LL=[0.13, 0.13, 0.1, 0.08, 0.11, 0.11]; KL=[0.1, 0.1, 0.1, 0.1, 0.1, 0.1]; XF=[1, 1, 1, 1, 1, 1]
          SoilCrop PotatoSoil: LL=[0.13, 0.13, 0.27, 0.27, 0.3, 0.3]; KL=[0.1, 0.06, 0.03, 0.01, 0, 0]; XF=[1, 1, 0.1, 0, 0, 0]
        WaterBalance SoilWater: SummerDate=1-Nov; SummerU=9; SummerCona=4.4; WinterDate=1-Apr; WinterU=9; WinterCona=4.4; DiffusConst=88; DiffusSlope=35.4; Salb=0.18; CN2Bare=68; CNRed=20; CNCov=0.8; DischargeWidth=0; CatchmentArea=0; PSIDul=-100
          Thickness  SWCON  KLAT
          100        0.55   0
          200        0.55   0
          300        0.55   0
          300        0.55   0
          300        0.55   0
          300        0.55   0
        Nutrient
          DirectedGraphInfo={Nodes=[{Name=Inert, OutlineColour=Black}, {Name=SurfaceResidue, OutlineColour=Black}, {Name=FOMLignin, OutlineColour=Black}, {Name=FOMCellulose, OutlineColour=Black}, {Name=FOMCarbohydrate, OutlineColour=Black}, {Name=Microbial, OutlineColour=Black}, {Name=Humic, OutlineColour=Black}, {Name=NO3, OutlineColour=Black}, {Name=NH4, OutlineColour=Black}, {Name=Urea, OutlineColour=Black}, {Name=Atmosphere, OutlineColour=Black}], Arcs=[{SourceName=SurfaceResidue, DestinationName=Microbial}, {SourceName=SurfaceResidue, DestinationName=Humic}, {SourceName=FOMLignin, DestinationName=Microbial}, {SourceName=FOMLignin, DestinationName=Humic}, {SourceName=FOMCellulose, DestinationName=Microbial}, {SourceName=FOMCellulose, DestinationName=Humic}, {SourceName=FOMCarbohydrate, DestinationName=Microbial}, {SourceName=FOMCarbohydrate, DestinationName=Humic}, {SourceName=Microbial, DestinationName=Microbial}, {SourceName=Microbial, DestinationName=Humic}, {SourceName=Humic, DestinationName=Microbial}, {SourceName=NO3, DestinationName=Atmosphere}, {SourceName=NH4, DestinationName=NO3}, {SourceName=Urea, DestinationName=NH4}]}
        Organic: FOMCNRatio=30; CarbonUnits=Total
          Thickness  Carbon  SoilCNRatio  FBiom  FInert  FOM
          100        1.82    11.5         0.025  0.3     1243.93
          200        1.47    11.5         0.025  0.4     833.832
          300        1.2     11.5         0.015  0.75    457.617
          300        1.03    11.5         0.01   0.9     251.145
          300        0.47    11.5         0.01   0.96    137.831
          300        0.47    11.5         0.01   0.96    75.6435
        LayerStructure
          Thickness=[100, 100, 100, 100, 100, 100, 100, 100, 100, 100, 100, 100, 100, 100, 100]
        CERESSoilTemperature Temperature
        Solute NO3: Thickness=[100, 200, 300, 300, 300, 300]; InitialValues=[225, 12.5, 1.38889, 1.38889, 0, 0]; InitialValuesUnits=ppm; WaterTableConcentration=0; D0=0; DepthConstant=0; MaxDepthSoluteAccessible=0; RunoffEffectivenessAtMovingSolute=0; MaxEffectiveRunoff=0
        Solute NH4: Thickness=[100, 200, 300, 300, 300, 300]; InitialValues=[0, 0, 0, 0, 0, 0]; InitialValuesUnits=ppm; WaterTableConcentration=0; D0=0; DepthConstant=0; MaxDepthSoluteAccessible=0; RunoffEffectivenessAtMovingSolute=0; MaxEffectiveRunoff=0
        Solute Urea: Thickness=[100, 200, 300, 300, 300, 300]; InitialValues=[0, 0, 0, 0, 0, 0]; InitialValuesUnits=kg/ha; WaterTableConcentration=0; D0=0; DepthConstant=0; MaxDepthSoluteAccessible=0; RunoffEffectivenessAtMovingSolute=0; MaxEffectiveRunoff=0
      SurfaceOrganicMatter surface organic matter: InitialResidueName=wheat; InitialResidueType=wheat; InitialResidueMass=2000; InitialStandingFraction=0; InitialCPR=0; InitialCNR=80; FractionFaecesAdded=1
      MicroClimate: a_interception=0; b_interception=1; c_interception=0; d_interception=0; SoilHeatFluxFraction=0.4; MinimumHeightDiffForNewLayer=0; NightInterceptionFraction=0.5; ReferenceHeight=2
      Plant SCRUM: PlantType=SCRUM; IsEnding=false; DaysAfterEnding=0
      Irrigation
      Fertiliser
        Definitions:
          Name         Description                            FractionNO3  FractionNH4  FractionUrea  FractionRockP  FractionBandedP  FractionLabileP  FractionCa
          CalciteCA    Ca as finely ground Agricultural Lime  0            0            0             0              0                0                1
          CalciteFine  finely ground Agricultural Lime        0            0            0             0              0                0                0.4
          Dolomite     finely ground dolomite                 0            0            0             0              0                0                0.22
          NO3N         N as nitrate                           1            0            0             0              0                0                0
          NH4N         N as ammonium                          0            1            0             0              0                0                0
          NH4NO3N      ammonium nitrate                       0.5          0.5          0             0              0                0                0
          DAP          di-ammonium phosphate                  0            0.18         0             0              0                0                0
          MAP          mono-ammonium phosphate                0            0.11         0             0              0                0                0
          UAN_N        N as Urea-AmmoniumNitrate              0.25         0.25         0.5           0              0                0                0
          UreaN        N as urea                              0            0            1             0              0                0                0
          UreaNO3      N as urea                              0.5          0            0.5           0              0                0                0
          Urea         Urea fertiliser                        0            0            0.46          0              0                0                0
          NH4SO4N      ammonium sulphate                      0            1            0             0              0                0                0
          RockP        Rock phosphorus                        0            0            0             0.8            0                0.2              0
          BandedP      Banded phosphorus                      0            0            0             0              1                0                0
          BroadcastP   Broadcast phosphorus                   0            0            0             0              0                1                0
      Manager SCRUMSowingRule
        CultivarName = Maize_Short
        InitialRootDepth = 10
        SowingDate = 1998-10-14
```csharp
using Models.Soils;
using System;
using Models.Core;
using Models.PMF;
namespace Models
{
    [Serializable] 
    [System.Xml.Serialization.XmlInclude(typeof(Model))]
    public class Script : Model
    {
        [Link] Plant SCRUM;
        [Link] Clock Clock;

        [Description("Cultivar")]
        public string CultivarName { get; set; }
        [Description("Initial Root Depth")]
        public double InitialRootDepth { get; set; }
        [Description("Sowing Date")]
        public DateTime SowingDate { get; set; }

               
        [EventSubscribe("DoManagement")]
        private void OnDoManagement(object sender, EventArgs e)
        {
            if (Clock.Today.Date == SowingDate)
                SCRUM.Sow(cultivar: CultivarName, population: 1, depth: InitialRootDepth, rowSpacing: 150);
                
            //PMFCrop.Sow(... Contains the following arguements:
            //Population  double  Optional  Seeds sowing/m2.  Default is zero
            //Cultivar    string  Required  "NameOfCultivar"
            //Depth       double  Optional  Depth (mm) seed sown.   Default is 100mm 
            //MaxCover    double  Optional  Proportion (0-1) of the ground row crop will cover.   Default is 1.0
            //BudNumber   double  Optional  Number of mainstems per seed sown.  Default is 1.0
            //RowSpacing  double  Optional  Spaceing (mm) between drill rows when crop is sown.  Default is 150mm
            //CropClass   string  Optional  Crop class to instantiate when crop is sown.  Default is "Plant"
        }
    }
}
```
      Manager ExtraVariables
```csharp
using Newtonsoft.Json;
using Models.PMF.Organs;
using Models.Soils.Nutrients;
using Models.Interfaces;
using System;
using Models.Core;
using System.Collections.Generic;
using System.Text;
using Models.Soils;
using Models.Soils.Nutrients;
using Models.PMF;
using Models;
using System.Xml.Serialization;
using APSIM.Shared.Utilities;
using Models.Climate;

namespace Models
{
    [Serializable] 
    public class Script : Model
    {
        [Link] private Clock Clock;
        [Link] private Weather Met;
        [Link] private Fertiliser Fert;
        [Link] private Irrigation Irrig;
        [Link] private Plant SCRUM;
        [Link] private Zone zone;
        [Link(ByName = true)]
        private ISolute Urea;
        [Link(ByName = true)]
        private ISolute NO3;
        [Link(ByName = true)]
        private ISolute NH4;
        [Link]
        private Nutrient SoilNitrogen;
        [Link] private Soils.Soil Soil;
        [Link] private Models.Surface.SurfaceOrganicMatter SOM;
        [Link(Type = LinkType.Path, Path = "[SCRUM].Root")]
        private Root root;
        [Link]
        private IPhysical soilPhysical;
        [Link]
        private ISoilWater waterBalance;
        [Link(Type=LinkType.Path, Path="[Nutrient].SurfaceResidue.Decomposition")] private CarbonFlow ResidueDecomposition;
        [Link]
        private Nutrient Nutrient;
                    
        [JsonIgnore] public bool InitialDay { get; set; }
        
        [JsonIgnore] public double AccumPlantN { get; set; }
        [JsonIgnore] public double AccumMineralisation { get; set; }
        [JsonIgnore] public double AccumDenit { get; set; }
        [JsonIgnore] public double AccumFert { get; set; }
        [JsonIgnore] public double AccumLeach { get; set; }
        [JsonIgnore] public double AccumDetach { get; set; }
        [JsonIgnore] public double DeltaSoilOMN { get; set; }
        [JsonIgnore] public double DeltaSurfaceOMN { get; set; }
        [JsonIgnore] public double DeltaSoilMineralN { get; set; }
        [JsonIgnore] public double SoilNitrogenContent { get; set; }
        
        [JsonIgnore] public double AccumEO { get; set; }
        [JsonIgnore] public double AccumEP { get; set; }
        [JsonIgnore] public double AccumES { get; set; }
        [JsonIgnore] public double AccumDrainage { get; set; }
        [JsonIgnore] public double AccumRunoff { get; set; }
        [JsonIgnore] public double AccumOutflowLat { get; set; }
        [JsonIgnore] public double AccumIrrigation { get; set; }
        [JsonIgnore] public double AccumRainfall { get; set; }
        [JsonIgnore] public double SoilWaterDeficit { get; set; }
    
        [JsonIgnore] public double  InitialSoilOMN { get; set; }
        [JsonIgnore] public double  InitialSurfaceOMN { get; set; }
        [JsonIgnore] public double  InitialMineralN { get; set; }
        
        [JsonIgnore] public double SWC { get; set; }
        [JsonIgnore] public double DUL { get; set; }
        [JsonIgnore] public double OutFlowLat { get; set; }

        [JsonIgnore] public double FomN { get; set; }
        [JsonIgnore] public double BiomN { get; set; }
        [JsonIgnore] public double HumN { get; set; }
        [JsonIgnore] public double OrganicN { get; set; }
        [JsonIgnore] public double NO3N { get; set; }
        [JsonIgnore] public double NH4N { get; set; }
        [JsonIgnore] public double UreaN { get; set; }
        [JsonIgnore] public double MineralN { get; set; }
        [JsonIgnore] public double DltNMinRes { get; set; }
        [JsonIgnore] public double DltNMinTot { get; set; }
        
        [EventSubscribe("StartOfSimulation")]
        private void OnSimulationCommencing(object sender, EventArgs e)
        {
            InitialDay = true;
        }
        
        [EventSubscribe("DoManagement")]
        private void OnDoManagement(object sender, EventArgs e)
        {
            //!!!!!! Nitrogen balance components !!!!!!
            //!!!!!!^^^^^^^^^^^^^^^^^^^^^^^^^^^^^!!!!!!
            FomN = MathUtilities.Sum(SoilNitrogen.FOM.N);
            HumN = MathUtilities.Sum(SoilNitrogen.Humic.N);
            BiomN = MathUtilities.Sum(SoilNitrogen.Microbial.N);
            OrganicN = FomN + HumN + BiomN;
            NO3N = MathUtilities.Sum(NO3.kgha);
            NH4N = MathUtilities.Sum(NH4.kgha);
            UreaN = MathUtilities.Sum(Urea.kgha);
            MineralN = NO3N + NH4N + UreaN; 
            DltNMinRes = MathUtilities.Sum(ResidueDecomposition.MineralisedN);
            DltNMinTot = MathUtilities.Sum(Nutrient.MineralisedN);
            int layers = soilPhysical.Thickness.Length;
            if (InitialDay == true)
            {
                InitialSurfaceOMN = SOM.N;
                InitialSoilOMN = OrganicN;
                InitialMineralN = MineralN;
                InitialDay = false;
            }
            DeltaSurfaceOMN = SOM.N - InitialSurfaceOMN;
            AccumLeach = AccumLeach - waterBalance.LeachNH4 - waterBalance.LeachNO3 - waterBalance.LeachUrea; //Fails
            AccumMineralisation += MathUtilities.Sum(Nutrient.MineralisedN);
            AccumDenit -= MathUtilities.Sum(SoilNitrogen.DenitrifiedN);
            AccumPlantN -= (double)zone.Get("SCRUM.Root.NUptake");
            DeltaSoilOMN = OrganicN - InitialSoilOMN;
            DeltaSoilMineralN = MineralN - InitialMineralN;
            SoilNitrogenContent = MineralN;
            
            //!!!!!! Water balance components !!!!!!
            //!!!!!!^^^^^^^^^^^^^^^^^^^^^^^^^^!!!!!!

            AccumRainfall += Met.Rain;
            //AccumEP -= (double)zone.Get("[SCRUM].Stover.Transpiration");
            AccumEP -= (double)zone.Get("SCRUM.Root.WaterUptake");
            SoilWaterDeficit =  (SWC - DUL);
            double OutFlowLat = MathUtilities.Sum(waterBalance.LateralOutflow);
            AccumOutflowLat -= OutFlowLat;
        }
        
        [EventSubscribe("DoManagementCalculations")]
        private void OnDoManagementCalculations(object sender, EventArgs e)
        {
            FomN = MathUtilities.Sum(SoilNitrogen.FOM.N);
            HumN = MathUtilities.Sum(SoilNitrogen.Humic.N);
            BiomN = MathUtilities.Sum(SoilNitrogen.Microbial.N);
            AccumFert += Fert.NitrogenApplied;
            AccumIrrigation += Irrig.IrrigationApplied;
            
            
            AccumEO -= waterBalance.Eo;
            AccumES -= waterBalance.Es; 
            AccumDrainage -= waterBalance.Drainage;
            AccumRunoff -= waterBalance.Runoff;
            SWC = MathUtilities.Sum(waterBalance.SWmm);
            DUL = MathUtilities.Sum(soilPhysical.DULmm);
        }
    }
}
```
      Manager AutomaticIrrigation
        Irrigation_Yes_No = yes
        Season_Start = 1-Oct
        Season_End = 30-Apr
        Season_Allocation = 1000
        Refull_Frac = 0.9
        Trigger_Frac = 0.7
        Return_days = 3
        Maximum_Irrigation_Amount = 40
        Top_Depth = 600
```csharp
using Newtonsoft.Json;
using Models.PMF.Phen;
using APSIM.Shared.Utilities;
using System.Xml.Serialization;
using Models.Soils;
using Models.PMF;
using Models.Core;
using System;
using Models.PMF.Organs;
using Models.Interfaces;

        
namespace Models
{
    [Serializable] 
    [System.Xml.Serialization.XmlInclude(typeof(Model))]
    public class Script : Model
    {
        [Link] private ISummary summary;
        [Link] private Irrigation Irrigation;
        [Link] private Clock Clock;
        [Link] private Soil Soil;
        [Link] private Plant SCRUM;
        [Link(Type = LinkType.Path, Path = "[SCRUM].Root")]
        private Root root;
        [Link(Type = LinkType.Path, Path = "[SCRUM].Phenology")]
        private Phenology phenology;
        [Link]
        private IPhysical soilPhysical;
        [Link]
        private ISoilWater waterBalance;
        //Communication to other modules
       
        //User inputs from properties tab
        [Description("Irrigation on (yes or no)")]
        public string Irrigation_Yes_No { get; set; }
        [Description("SeasonStart (dd-MMM)")]
        public string Season_Start { get; set; }
        [Description("SeasonEnd (dd-MMM)")]
        public string Season_End { get; set; }
        [Description("Season Allocation (mm)")]
        public double Season_Allocation { get; set; }
        [Description("% PAWC to refill soil to (0-1)")]
        public double Refull_Frac { get; set; }
        [Description("% PAWC to trigger irrigation (0-1)")]
        public double Trigger_Frac { get; set; }
        [Description("Minimum days for irrigation to return")]
        public double Return_days { get; set; }
        [Description("Maximum irrigation application (mm)")]
        public double Maximum_Irrigation_Amount { get; set; }
        [Description("Depth to calculate PAWC (mm)")]
        public double Top_Depth { get; set; }
       
        //Class members
        [JsonIgnore] private bool IrrigationIsAvailable { get; set; }
        [JsonIgnore] public bool SeasonIsOpen { get; set; }
        [JsonIgnore] private bool CropIsActive { get; set; }
        [JsonIgnore] private bool IrrigatorIsAvailable { get; set; }
        [JsonIgnore] private bool SoilIsDry { get; set; }
        [JsonIgnore] public double Top_DUL { get; set; }
        [JsonIgnore] public double Top_Refull { get; set; }
        [JsonIgnore] public double Top_Trigger { get; set; }
        [JsonIgnore] public double Top_LL { get; set; }
        [JsonIgnore] public double Top_SW { get; set; }
        [JsonIgnore] public double Accumulated_depth { get; set; }
        [JsonIgnore] public double Days_since_irrigation { get; set; }
        [JsonIgnore] public double Amount_to_apply { get; set; }
        [JsonIgnore] public double Season_Application { get; set; }
        
        //Variables for date logic testing
        [JsonIgnore] public string StartString { get; set; }
        [JsonIgnore] public string EndString { get; set; }
        [JsonIgnore] public DateTime StartDate { get; set; }
        [JsonIgnore] public DateTime EndDate { get; set; }
        [JsonIgnore] public int TodayYear { get; set; }
        [JsonIgnore] public int TodayMonth { get; set; }
        [JsonIgnore] public int StartMonth { get; set; }
        [JsonIgnore] public int EndMonth { get; set; }
        [JsonIgnore] public int TodayDay { get; set; }
        [JsonIgnore] public int StartDay { get; set; }
        [JsonIgnore] public int EndDay { get; set; }
       
    
        //Calculate static soil variables
        [EventSubscribe("StartOfSimulation")]
        private void OnStartOfSimulation(object sender, EventArgs e)
        {   
            //Calculated soil water variables
            Accumulated_depth = 0;
            for (int layer = 0; Accumulated_depth < Top_Depth; layer++)
            {
                Top_LL += soilPhysical.LL15mm[layer];
                Top_DUL += soilPhysical.DULmm[layer];
                Accumulated_depth += soilPhysical.Thickness[layer];
            }
            Top_Refull = Top_LL + (Top_DUL - Top_LL) * Refull_Frac;
        }
       
      
        //Determine daily requirement for irrigation
        [EventSubscribe("StartOfDay")]
        private void OnStartOfDay(object sender, EventArgs e)
        { 
            //Can we irrigate?
            IrrigationIsAvailable = false; 
            if (Irrigation_Yes_No == "yes")
                IrrigationIsAvailable = true; 
    
            //Are we Allowed to Irrigate?
            TodayYear = Clock.Today.Year;
            StartString = Season_Start + "-" + TodayYear.ToString();
            EndString = Season_End + "-" + TodayYear.ToString();
            StartDate = DateTime.Parse(StartString);
            EndDate = DateTime.Parse(EndString);
            TodayMonth = Clock.Today.Month;
            TodayDay = Clock.Today.Day;
            StartDay = StartDate.Day;
            StartMonth = StartDate.Month;
            EndDay = EndDate.Day;
            EndMonth = EndDate.Month;
          
            SeasonIsOpen = false;
            //if we are in the spring and after the start date then yes
            if ((Clock.Today.Month > 6) && (Clock.Today >= StartDate))
                SeasonIsOpen = true;
            //if we are in the autumn and before the end date then yes
            if ((Clock.Today.Month <= 6) && (Clock.Today <= EndDate))
                SeasonIsOpen = true;
          
            //Is there a crop in the ground that needs irrigation?
            CropIsActive = false;
            if ((phenology.Stage >= 3.0) && (phenology.Stage < 6.0))
                CropIsActive = true;
          
            //Is the irrigator available?
            IrrigatorIsAvailable = false;
            Days_since_irrigation += 1;
            if (Days_since_irrigation >= Return_days)
                IrrigatorIsAvailable = true;
          
            //Is the soil dry enough to require irrigation?
            SoilIsDry = false;
            double CurrentRootDepth = 0;
            double RootDepth = root.Depth;
            CurrentRootDepth = Math.Max(RootDepth, CurrentRootDepth);
          
            double RelativeRootDepth = Math.Min(1.0, CurrentRootDepth / Top_Depth);
            Top_Trigger = Math.Min(Top_Refull, Top_DUL - (Top_DUL - Top_LL) * RelativeRootDepth * (1 - Trigger_Frac)); 
          
            Accumulated_depth = 0;
            Top_SW = 0;
            for (int layer = 0; Accumulated_depth < Top_Depth; layer++)
            {
                Top_SW += waterBalance.SWmm[layer];
                Accumulated_depth += soilPhysical.Thickness[layer];
            }
            if (Top_SW <= Top_Trigger)
                SoilIsDry = true;
                
            //Lets bloody well irrigate then!!!!
            if ((IrrigationIsAvailable) && (SeasonIsOpen) && (CropIsActive) && (IrrigatorIsAvailable) && (SoilIsDry)) //The conditions are rife for irrigation
            {
                Amount_to_apply = Math.Min(Top_Refull - Top_SW, Maximum_Irrigation_Amount);
                Amount_to_apply = Math.Min(Amount_to_apply, Season_Allocation - Season_Application); 
                Amount_to_apply = Math.Max(Amount_to_apply, 0.0);
                Irrigation.Apply(Amount_to_apply);
                Days_since_irrigation = 0;
                Season_Application += Amount_to_apply;
                summary.WriteMessage(this, "Automatic Irrigation", MessageType.Diagnostic);
            
            }
        }
    }
}
```
      Manager AutomaticFertiliser
        Fertiliser_Yes_No = no
        Season_Start = 1-Aug
        Season_End = 30-Apr
        Season_Allocation = 1000
        TriggerN = 50
        NApplicationAmount = 25
        Return_days = 3
        Top_Depth = 300
```csharp
using Newtonsoft.Json;
using Models.PMF.Phen;
using Models.Soils.Nutrients;
using Models.Interfaces;
using APSIM.Shared.Utilities;
using Models.PMF;
using System.Xml.Serialization;
using Models.Soils;
using Models.Core;
using System;
using Models.PMF.Organs;

        
namespace Models
{
    [Serializable] 
    [System.Xml.Serialization.XmlInclude(typeof(Model))]
    public class Script : Model
    {
        [Link] private ISummary summary;
        [Link] private Fertiliser Fertiliser;
        [Link] private Clock Clock;
        [Link] private Plant SCRUM;
        [Link(ByName = true)]
        private ISolute NO3;
        [Link] private Soils.Soil Soil;
        [Link(Type = LinkType.Path, Path = "[SCRUM].Root")]
        private Root root;
        [Link(Type = LinkType.Path, Path = "[SCRUM].Phenology")]
        private Phenology phenology;
        [Link]
        private IPhysical soilPhysical;
        //Communication to other modules
       
        //User inputs from properties tab
        [Description("Fertiliser on (yes or no)")]
        public string Fertiliser_Yes_No { get; set; }
        [Description("SeasonStart (dd-MMM)")]
        public string Season_Start { get; set; }
        [Description("SeasonEnd (dd-MMM)")]
        public string Season_End { get; set; }
        [Description("Season Allocation (kg/ha)")]
        public double Season_Allocation { get; set; }
        [Description("Mineral N to maintain soil above (kg/ha)")]
        public double TriggerN { get; set; }
        [Description("Amount of N to apply (kg/ha)")]
        public double NApplicationAmount { get; set; }
        [Description("Minimum days for Fertiliser spreader to return")]
        public double Return_days { get; set; }
        [Description("Depth to calculate mineral N (mm)")]
        public double Top_Depth { get; set; }
       
        //Class members
        [JsonIgnore] private bool FertiliserIsAvailable { get; set; }
        [JsonIgnore] public bool SeasonIsOpen { get; set; }
        [JsonIgnore] private bool CropIsActive { get; set; }
        [JsonIgnore] private bool FertSpreaderIsAvailable { get; set; }
        [JsonIgnore] private bool SoilNIsLow { get; set; }
        [JsonIgnore] public double Top_SoilN { get; set; }
        [JsonIgnore] public double Accumulated_depth { get; set; }
        [JsonIgnore] public double Days_since_fertiliser { get; set; }
        [JsonIgnore] public double Season_Application { get; set; }
        
        //Variables for date logic testing
        [JsonIgnore] public string StartString { get; set; }
        [JsonIgnore] public string EndString { get; set; }
        [JsonIgnore] public DateTime StartDate { get; set; }
        [JsonIgnore] public DateTime EndDate { get; set; }
        [JsonIgnore] public int TodayYear { get; set; }
        [JsonIgnore] public int TodayMonth { get; set; }
        [JsonIgnore] public int StartMonth { get; set; }
        [JsonIgnore] public int EndMonth { get; set; }
        [JsonIgnore] public int TodayDay { get; set; }
        [JsonIgnore] public int StartDay { get; set; }
        [JsonIgnore] public int EndDay { get; set; }
              
        //Determine daily requirement for fertiliser
        [EventSubscribe("StartOfDay")]
        private void OnStartOfDay(object sender, EventArgs e)
        { 
            //Can we irrigate?
            FertiliserIsAvailable = false; 
            if (Fertiliser_Yes_No == "yes")
                FertiliserIsAvailable = true; 
    
            //Are we Allowed to Irrigate?
            TodayYear = Clock.Today.Year;
            StartString = Season_Start + "-" + TodayYear.ToString();
            EndString = Season_End + "-" + TodayYear.ToString();
            StartDate = DateTime.Parse(StartString);
            EndDate = DateTime.Parse(EndString);
            TodayMonth = Clock.Today.Month;
            TodayDay = Clock.Today.Day;
            StartDay = StartDate.Day;
            StartMonth = StartDate.Month;
            EndDay = EndDate.Day;
            EndMonth = EndDate.Month;
          
            SeasonIsOpen = false;
            //if we are in the spring and after the start date then yes
            if ((Clock.Today.Month > 6) && (Clock.Today >= StartDate))
                SeasonIsOpen = true;
            //if we are in the autumn and before the end date then yes
            if ((Clock.Today.Month <= 6) && (Clock.Today <= EndDate))
                SeasonIsOpen = true;
          
            //Is there a crop in the ground that needs irrigation?
            CropIsActive = false;
            if ((phenology.Stage >= 3.0) && (phenology.Stage < 6.0))
                CropIsActive = true;
          
            //Is the irrigator available?
            FertSpreaderIsAvailable = false;
            Days_since_fertiliser += 1;
            if (Days_since_fertiliser >= Return_days)
                FertSpreaderIsAvailable = true;
          
            //Is the soil N low enough to require fertiliser?
            SoilNIsLow = false;
            double CurrentRootDepth = 0;
            double RootDepth = root.Depth;
            CurrentRootDepth = Math.Max(RootDepth, CurrentRootDepth);
          
            Accumulated_depth = 0;
            Top_SoilN = 0;
            for (int layer = 0; Accumulated_depth < Top_Depth; layer++)
            {
                Top_SoilN += NO3.kgha[layer];
                Accumulated_depth += soilPhysical.Thickness[layer];
            }
            if (Top_SoilN <= TriggerN)
                SoilNIsLow = true;
                
            //Lets bloody well irrigate then!!!!
            if ((FertiliserIsAvailable) && (SeasonIsOpen) && (CropIsActive) && (FertSpreaderIsAvailable) && (SoilNIsLow)) //The conditions are rife for irrigation
            {
                Fertiliser.Apply(NApplicationAmount, Fertiliser.Types.UreaN, 10);
                Days_since_fertiliser = 0;
                Season_Application += NApplicationAmount;
                summary.WriteMessage(this, "Automatic Fertiliser", MessageType.Diagnostic);
            
            }
        }
    }
}
```
      Report: EventNames=[Clock].DoReport
        VariableNames:
          [Clock].Today
          [ExtraVariables].Script.AccumPlantN
          [ExtraVariables].Script.AccumMineralisation
          [ExtraVariables].Script.AccumDenit
          [ExtraVariables].Script.AccumFert
          [ExtraVariables].Script.AccumLeach
          [ExtraVariables].Script.AccumDetach
          [ExtraVariables].Script.DeltaSoilOMN
          [ExtraVariables].Script.DeltaSurfaceOMN
          [ExtraVariables].Script.DeltaSoilMineralN
          [ExtraVariables].Script.SWC
          [ExtraVariables].Script.DUL
          [ExtraVariables].Script.OutFlowLat
          [ExtraVariables].Script.AccumEO
          [ExtraVariables].Script.AccumEP
          [ExtraVariables].Script.AccumES
          [ExtraVariables].Script.AccumDrainage
          [ExtraVariables].Script.AccumRunoff
          [ExtraVariables].Script.AccumRainfall
          [ExtraVariables].Script.AccumIrrigation
          [ExtraVariables].Script.AccumOutflowLat
          [ExtraVariables].Script.SoilWaterDeficit
          [ExtraVariables].Script.SoilNitrogenContent
          [ExtraVariables].Script.FomN
          [ExtraVariables].Script.HumN
          [ExtraVariables].Script.BiomN
          [ExtraVariables].Script.DltNMinRes
          [ExtraVariables].Script.DltNMinTot
          [Soil].SoilWater.Drainage
          [Soil].SoilWater.Runoff
          [Soil].SoilWater.Eo
          [Soil].SoilWater.Es
          [Soil].SoilWater.pond
          [Soil].Water.MM
          [Soil].NO3.kgha
          [SCRUM].Stover.Live.Wt
          [SCRUM].Root.Live.Wt
          [SCRUM].Product.Live.Wt
          [SCRUM].Stover.Live.N
          [SCRUM].Root.Live.N
          [SCRUM].Product.Live.N
          [SCRUM].Stover.Live.NConc
          [SCRUM].Root.Live.NConc
          [SCRUM].Product.Live.NConc
          [SCRUM].Root.WaterUptake
          [SCRUM].Stover.Transpiration
          [SCRUM].Stover.WaterDemand
          [SCRUM].Root.Depth
          [SCRUM].Stover.CoverTotal
          [SCRUM].Stover.CoverDead
          [SCRUM].Stover.LAI
          [SCRUM].Stover.Height
          [SCRUM].Arbitrator.N.TotalPlantDemand
          [SCRUM].Arbitrator.N.TotalPlantSupply
          [SCRUM].Stover.Fw
          [SCRUM].Stover.Fn
          [SCRUM].Total.Wt
          [SCRUM].Total.N
          [SCRUM].Arbitrator.DM.TotalFixationSupply
          [SCRUM].Arbitrator.DM.TotalPlantDemand
          [SCRUM].Phenology.AccumulatedEmergedTT
          [SCRUM].Arbitrator.DM.SinkLimitation
          [SCRUM].Arbitrator.DM.NutrientLimitation
          [SCRUM].Phenology.ThermalTime
          [SCRUM].Phenology.CurrentPhase.Name
          [SCRUM].Phenology.Stage
          [AutomaticIrrigation].Script.Top_Refull
          [AutomaticIrrigation].Script.Top_Trigger
          [AutomaticIrrigation].Script.Top_SW
          [AutomaticIrrigation].Script.Top_DUL
          [Irrigation].IrrigationApplied
          [AutomaticIrrigation].Script.Amount_to_apply
          [AutomaticIrrigation].Script.StartDate
          [Clock].Today
          [AutomaticIrrigation].Script.SeasonIsOpen
          [AutomaticIrrigation].Script.EndDate
          [AutomaticIrrigation].Script.TodayYear
          [SCRUM].Arbitrator.FN
          [SCRUM].Arbitrator.N.TotalPlantSupply
    Memo Caption
      # SCRUM: the Simple Crop Resource Uptake Model

      _Hamish Brown and Rob Zyskowski, Plant and Food Research, New Zealand_

      This model has been built to simulate a range of different crops in simulations where water and nitrogen balance are of interest but a fully mechanistic plant model is not needed. It is a daily time step implementation of the crop model that is used on the Overseer nutrient balance model (Cichota_etal_2010).  It uses simple sigmoidal functions for estimating daily cover and biomass deltas to give realistic water and nitrogen demands. It does not simulate potential yield, this is specified as an input. Yield will be reduced below the specified potential yield if N or water supplies from the soil are insufficient to meet demand. The model has been paramaterised for simulating water and nitrogen balances of cropping rotations in New Zealand (where over 50 different crop types are grown and it is not feasible to produce full crop models for each of these). It may be adapted for other purposes and other crop types may be added but the user will need to keep in mind that it is empirical and the parameters might need changing for crops from different locations.
  Simulation Simple test with Biomass Cut
    Memo
      In this test an Autumn wheat crop is planted, and defoliated part way through its growth.  The series of graphs show how SCRUM accumulates biomass and nitrogen and what happens when a biomass removal event is invoked.  The also demonstrate that componenst of the Nitrogen and water balances are behaving sensibly with the inclusion of SCRUM in a simulation.
    Weather: FileName=%root%\Tests\WeatherFiles\lincoln.met
    Clock: Start=2010-10-01; End=2011-07-31
    Summary
    SoilArbitrator Soil Arbitrator
    Zone Field: Area=1; Slope=0; AspectAngle=0; Altitude=50
      Soil: Latitude=0; Longitude=0
        Chemical: Thickness=[100, 200, 300, 300, 300, 300]; PH=[6.6, 6.2, 5.7, 5.5, 5.5, 5.5]; PHUnits=Water
        Water: Thickness=[100, 200, 300, 300, 300, 300]; InitialValues=[0.33, 0.33, 0.31, 0.3, 0.3, 0.3]; InitialPAWmm=357; RelativeTo=LL15; FilledFromTop=false
        Physical
          Thickness  BD   AirDry  LL15  DUL   SAT
          100        1.2  0.08    0.13  0.33  0.5
          200        1.2  0.13    0.13  0.33  0.5
          300        1.2  0.1     0.1   0.31  0.44
          300        1.2  0.06    0.06  0.3   0.46
          300        1.2  0.04    0.04  0.3   0.44
          300        1.2  0.02    0.02  0.3   0.44
          SoilCrop SCRUMSoil: LL=[0.13, 0.13, 0.1, 0.08, 0.11, 0.11]; KL=[0.1, 0.1, 0.1, 0.1, 0.1, 0.1]; XF=[1, 1, 1, 1, 1, 1]
          SoilCrop PotatoSoil: LL=[0.13, 0.13, 0.27, 0.27, 0.3, 0.3]; KL=[0.1, 0.06, 0.03, 0.01, 0, 0]; XF=[1, 1, 0.1, 0, 0, 0]
        WaterBalance SoilWater: same as SCRUMTestBase.Field.Soil.SoilWater
        Nutrient: same as SCRUMTestBase.Field.Soil.Nutrient
        Organic: same as SCRUMTestBase.Field.Soil.Organic
        CERESSoilTemperature Temperature
        Solute NO3: same as SCRUMTestBase.Field.Soil.NO3
        Solute NH4: same as SCRUMTestBase.Field.Soil.NH4
        Solute Urea: same as SCRUMTestBase.Field.Soil.Urea
      SurfaceOrganicMatter surface organic matter: InitialResidueName=wheat; InitialResidueType=wheat; InitialResidueMass=2000; InitialStandingFraction=0; InitialCPR=0; InitialCNR=80; FractionFaecesAdded=1
      MicroClimate: a_interception=0; b_interception=1; c_interception=0; d_interception=0; SoilHeatFluxFraction=0.4; MinimumHeightDiffForNewLayer=0; NightInterceptionFraction=0.5; ReferenceHeight=2
      Plant SCRUM: PlantType=SCRUM; IsEnding=false; DaysAfterEnding=0
      Irrigation
      Fertiliser: same as SCRUMTestBase.Field.Fertiliser
      Manager SowingAndCutting
        CultivarName = Green_Peas
        InitialRootDepth = 10
        SowingDate = 10/14/2010 00:00:00
        CutDates = 12/15/2010 00:00:00, 02/15/2011 00:00:00
        phenStageSet = 3.5
        EndCropDate = 05/14/2011 00:00:00
```csharp
using Newtonsoft.Json;
using System;
using System.Collections.Generic;
using Models.Core;
using Models.PMF;
using Models.PMF.Interfaces;
using System.Xml.Serialization;
using Models.Management;
using System.Linq;
using System.Diagnostics;
using Models.PMF.Phen;

namespace Models
{
    [Serializable] 
    [System.Xml.Serialization.XmlInclude(typeof(Model))]
    public class Script : Model
    {
        [Link] Plant SCRUM;
        [Link] Clock Clock;
        [Link] BiomassRemovalFractions rbs;
		[Link(Type = LinkType.Scoped, ByName = true)] Phenology phenology;

        [Description("Cultivar")]
        public string CultivarName { get; set; }
        [Description("Initial Root Depth")]
        public double InitialRootDepth { get; set; }
        [Description("Sowing Date")]
        public DateTime SowingDate { get; set; }
        [Description("Cut Dates (comma seperated dd/mm/yyyy")]
        public DateTime[] CutDates { get; set; }
        [Description("Stage to rewind phenology to on cutting")]
        public double phenStageSet {get; set;}
        [Description("EndCrop Date")]
        public DateTime EndCropDate { get; set; }
        
        public List<DateTime> CutDatesList = null;
        public bool CropIn = false;
        
        [EventSubscribe("StartOfSimulation")]
        private void OnSimulationCommencing(object sender, EventArgs e)
        {
            CutDatesList = CutDates != null ? CutDates.ToList() : new List<DateTime>();
        }
        
        [EventSubscribe("DoManagement")]
        private void OnDoManagement(object sender, EventArgs e)
        {
            //Set up  array of remove fractions to send with Cut method.  Each member in the array corresponds to an organ in the same order they are set up in.

            if (Clock.Today.Date == SowingDate)
            {
                SCRUM.Sow(cultivar: CultivarName, population: 1, depth: InitialRootDepth, rowSpacing: 150);
                CropIn = true;
            }
            else if (Clock.Today.Date == EndCropDate)
            {
                SCRUM.EndCrop();
                CropIn = false;
            }
            
            foreach (DateTime d in CutDatesList)            
            {
            	if ((CropIn) && (d == Clock.Today))
            	{
            	    rbs.Do();
            	    phenology.SetToStage(phenStageSet);
            	}
            }
            

        }
    }
}
```
      Manager ExtraVariables
        script: same as in SCRUMTestBase.Field.ExtraVariables
      Report: EventNames=[Clock].DoReport
        VariableNames:
          [Clock].Today
          [ExtraVariables].Script.AccumPlantN
          [ExtraVariables].Script.AccumMineralisation
          [ExtraVariables].Script.AccumDenit
          [ExtraVariables].Script.AccumFert
          [ExtraVariables].Script.AccumLeach
          [ExtraVariables].Script.AccumDetach
          [ExtraVariables].Script.DeltaSoilOMN
          [ExtraVariables].Script.DeltaSurfaceOMN
          [ExtraVariables].Script.DeltaSoilMineralN
          [ExtraVariables].Script.SWC
          [ExtraVariables].Script.DUL
          [ExtraVariables].Script.OutFlowLat
          [ExtraVariables].Script.AccumEO
          [ExtraVariables].Script.AccumEP
          [ExtraVariables].Script.AccumES
          [ExtraVariables].Script.AccumDrainage
          [ExtraVariables].Script.AccumRunoff
          [ExtraVariables].Script.AccumRainfall
          [ExtraVariables].Script.AccumIrrigation
          [ExtraVariables].Script.AccumOutflowLat
          [ExtraVariables].Script.SoilWaterDeficit
          [ExtraVariables].Script.SoilNitrogenContent
          [ExtraVariables].Script.FomN
          [ExtraVariables].Script.HumN
          [ExtraVariables].Script.BiomN
          [ExtraVariables].Script.DltNMinRes
          [ExtraVariables].Script.DltNMinTot
          [Soil].SoilWater.Drainage
          [Soil].SoilWater.Runoff
          [Soil].SoilWater.Eo
          [Soil].SoilWater.Es
          [Soil].SoilWater.pond
          [Soil].Water.MM
          [Soil].NO3.kgha
          [SCRUM].Stover.Live.Wt
          [SCRUM].Root.Live.Wt
          [SCRUM].Product.Live.Wt
          [SCRUM].Stover.Live.N
          [SCRUM].Root.Live.N
          [SCRUM].Product.Live.N
          [SCRUM].Stover.Live.NConc
          [SCRUM].Root.Live.NConc
          [SCRUM].Product.Live.NConc
          [SCRUM].Root.WaterUptake
          [SCRUM].Stover.Transpiration
          [SCRUM].Stover.WaterDemand
          [SCRUM].Root.Depth
          [SCRUM].Stover.CoverTotal
          [SCRUM].Stover.CoverDead
          [SCRUM].Stover.LAI
          [SCRUM].Stover.Height
          [SCRUM].Arbitrator.N.TotalPlantDemand
          [SCRUM].Arbitrator.N.TotalPlantSupply
          [SCRUM].Stover.Fw
          [SCRUM].Stover.Fn
          [SCRUM].Total.Wt
          [SCRUM].Total.N
          [SCRUM].Arbitrator.DM.TotalFixationSupply
          [SCRUM].Arbitrator.DM.TotalPlantDemand
          [SCRUM].Arbitrator.DM.SinkLimitation
          [SCRUM].Arbitrator.DM.NutrientLimitation
          [SCRUM].Phenology.ThermalTime
          [SCRUM].Phenology.CurrentPhase.Name
          [SCRUM].Phenology.Stage
          [Irrigation].IrrigationApplied
          [Clock].Today
          [SCRUM].Arbitrator.FN
          [SurfaceOrganicMatter].wt
          sum([Soil].Nutrient.FOM.N)
          [SCRUM].Phenology.AccumulatedEmergedTT
          [SCRUM].Stover.CoverGreen
      BiomassRemovalFractions: removaltype=0
        BiomassRemovals:
          PlantName  OrganName  TypeString  LiveToRemoveString
          SCRUM      Product    Cutting     0.5
          SCRUM      Product    Grazing     0
          SCRUM      Product    Harvesting  -
          SCRUM      Product    Pruning     -
          SCRUM      Stover     Cutting     0.5
          SCRUM      Stover     Grazing     -
          SCRUM      Stover     Harvesting  -
          SCRUM      Stover     Pruning     -
          SCRUM      Root       Cutting     -
          SCRUM      Root       Grazing     -
          SCRUM      Root       Harvesting  -
          SCRUM      Root       Pruning     -
          SCRUM      Nodule     Cutting     -
          SCRUM      Nodule     Grazing     -
          SCRUM      Nodule     Harvesting  -
          SCRUM      Nodule     Pruning     -
  Experiment Crop Comparisions
    Memo Description
      This test simply simulates a range of different SCRUM crop types to show how they differ in their canopy and biomass accumulation patterns.  The 5 graphs demonstrate the differences in:
       - The speed at which cover is attained
       - The maximum cover that is achieved
       - The speed and which cover is senesced again
       - The speed and extent of biomass and N accumulation
       - The timing and extent of dry and fresh yield productin
      These graphs are intended to demonstrate how SCRUM represents approximate differences in differnt crops types with simple yet realistic temporal patterns
    Factors
      Factor Crop
        CompositeFactor SpringWheat
          Specifications:
            [SCRUMSowingRule].Script.CultivarName = Wheat_Spring
            [SCRUMSowingRule].Script.SowingDate = 1998-09-15
        CompositeFactor AutumnWheat
          Specifications:
            [SCRUMSowingRule].Script.CultivarName = Wheat_Autumn
            [SCRUMSowingRule].Script.SowingDate = 1998-05-15
        CompositeFactor Potatoes
          Specifications:
            [SCRUMSowingRule].Script.CultivarName = Potatoes_Long
            [SCRUMSowingRule].Script.SowingDate = 1998-10-15
        CompositeFactor Peas
          Specifications:
            [SCRUMSowingRule].Script.CultivarName = Green_Peas
            [SCRUMSowingRule].Script.SowingDate = 1998-10-15
        CompositeFactor Maize
          Specifications:
            [SCRUMSowingRule].Script.CultivarName = Maize_Short
            [SCRUMSowingRule].Script.SowingDate = 1998-11-15
        CompositeFactor Spinach
          Specifications:
            [SCRUMSowingRule].Script.CultivarName = Spinach
            [SCRUMSowingRule].Script.SowingDate = 1998-05-15
        CompositeFactor Kale
          Specifications:
            [SCRUMSowingRule].Script.CultivarName = Kale
            [SCRUMSowingRule].Script.SowingDate = 1998-10-15
        CompositeFactor Rape
          Specifications:
            [SCRUMSowingRule].Script.CultivarName = Rape
            [SCRUMSowingRule].Script.SowingDate = 1998-10-15
    Simulation CropCompBase
      Weather: FileName=%root%\Tests\WeatherFiles\lincoln.met
      Clock: Start=1998-05-01; End=1999-07-01
      Summary
      SoilArbitrator Soil Arbitrator
      Zone Field: Area=1; Slope=0; AspectAngle=0; Altitude=50
        Soil: Latitude=0; Longitude=0
          Chemical: Thickness=[100, 200, 300, 300, 300, 300]; PH=[6.6, 6.2, 5.7, 5.5, 5.5, 5.5]; PHUnits=Water
          Water: Thickness=[100, 200, 300, 300, 300, 300]; InitialValues=[0.33, 0.33, 0.31, 0.3, 0.3, 0.3]; InitialPAWmm=357; RelativeTo=LL15; FilledFromTop=false
          Physical
            Thickness  BD   AirDry  LL15  DUL   SAT
            100        1.2  0.08    0.13  0.33  0.5
            200        1.2  0.13    0.13  0.33  0.5
            300        1.2  0.1     0.1   0.31  0.44
            300        1.2  0.06    0.06  0.3   0.46
            300        1.2  0.04    0.04  0.3   0.44
            300        1.2  0.02    0.02  0.3   0.44
            SoilCrop SCRUMSoil: LL=[0.13, 0.13, 0.1, 0.08, 0.11, 0.11]; KL=[0.08, 0.08, 0.08, 0.08, 0.08, 0.08]; XF=[1, 1, 1, 1, 1, 1]
            SoilCrop PotatoSoil: LL=[0.13, 0.13, 0.27, 0.27, 0.3, 0.3]; KL=[0.1, 0.06, 0.03, 0.01, 0, 0]; XF=[1, 1, 0.1, 0, 0, 0]
          WaterBalance SoilWater: same as SCRUMTestBase.Field.Soil.SoilWater
          Nutrient: same as SCRUMTestBase.Field.Soil.Nutrient
          Organic: same as SCRUMTestBase.Field.Soil.Organic
          CERESSoilTemperature Temperature
          Solute NO3: same as SCRUMTestBase.Field.Soil.NO3
          Solute NH4: same as SCRUMTestBase.Field.Soil.NH4
          Solute Urea: same as SCRUMTestBase.Field.Soil.Urea
        MicroClimate: a_interception=0; b_interception=1; c_interception=0; d_interception=0; SoilHeatFluxFraction=0.4; MinimumHeightDiffForNewLayer=0; NightInterceptionFraction=0.5; ReferenceHeight=2
        Irrigation
        Fertiliser: same as SCRUMTestBase.Field.Fertiliser
        Manager SCRUMSowingRule
          CultivarName = Barley_Spring
          InitialRootDepth = 10
          SowingDate = 1998-10-14
          script: same as in SCRUMTestBase.Field.SCRUMSowingRule
        Manager ExtraVariables: same as SCRUMTestBase.Field.ExtraVariables
        SurfaceOrganicMatter surface organic matter: InitialResidueName=wheat; InitialResidueType=wheat; InitialResidueMass=2000; InitialStandingFraction=0; InitialCPR=0; InitialCNR=80; FractionFaecesAdded=1
        Report: EventNames=[Clock].DoReport
          VariableNames:
            [Clock].Today
            [ExtraVariables].Script.AccumPlantN
            [ExtraVariables].Script.AccumMineralisation
            [ExtraVariables].Script.AccumDenit
            [ExtraVariables].Script.AccumFert
            [ExtraVariables].Script.AccumLeach
            [ExtraVariables].Script.AccumDetach
            [ExtraVariables].Script.DeltaSoilOMN
            [ExtraVariables].Script.DeltaSurfaceOMN
            [ExtraVariables].Script.DeltaSoilMineralN
            [ExtraVariables].Script.SWC
            [ExtraVariables].Script.DUL
            [ExtraVariables].Script.OutFlowLat
            [ExtraVariables].Script.AccumEO
            [ExtraVariables].Script.AccumEP
            [ExtraVariables].Script.AccumES
            [ExtraVariables].Script.AccumDrainage
            [ExtraVariables].Script.AccumRunoff
            [ExtraVariables].Script.AccumRainfall
            [ExtraVariables].Script.AccumIrrigation
            [ExtraVariables].Script.AccumOutflowLat
            [ExtraVariables].Script.SoilWaterDeficit
            [ExtraVariables].Script.SoilNitrogenContent
            [ExtraVariables].Script.FomN
            [ExtraVariables].Script.HumN
            [ExtraVariables].Script.BiomN
            [ExtraVariables].Script.DltNMinRes
            [ExtraVariables].Script.DltNMinTot
            [Soil].SoilWater.Drainage
            [Soil].SoilWater.Runoff
            [Soil].SoilWater.Eo
            [Soil].SoilWater.Es
            [Soil].SoilWater.pond
            [Soil].Water.MM
            [Soil].NO3.kgha
            [SCRUM].Stover.Live.Wt
            [SCRUM].Root.Live.Wt
            [SCRUM].Product.Live.Wt
            [SCRUM].Stover.Live.N
            [SCRUM].Root.Live.N
            [SCRUM].Product.Live.N
            [SCRUM].Stover.Live.NConc
            [SCRUM].Root.Live.NConc
            [SCRUM].Product.Live.NConc
            [SCRUM].Root.WaterUptake
            [SCRUM].Stover.Transpiration
            [SCRUM].Stover.WaterDemand
            [SCRUM].Root.Depth
            [SCRUM].Stover.CoverTotal
            [SCRUM].Stover.CoverDead
            [SCRUM].Stover.CoverGreen
            [SCRUM].Stover.LAI
            [SCRUM].Stover.Height
            [SCRUM].Arbitrator.N.TotalPlantDemand
            [SCRUM].Arbitrator.N.TotalPlantSupply
            [SCRUM].Stover.Fw
            [SCRUM].Stover.Fn
            [SCRUM].Total.Wt
            [SCRUM].Total.N
            [SCRUM].Arbitrator.DM.TotalFixationSupply
            [SCRUM].Arbitrator.DM.TotalPlantDemand
            [SCRUM].Phenology.AccumulatedEmergedTT
            [SCRUM].Arbitrator.DM.SinkLimitation
            [SCRUM].Arbitrator.DM.NutrientLimitation
            [SCRUM].Phenology.ThermalTime
            [SCRUM].Phenology.CurrentPhase.Name
            [SCRUM].Phenology.Stage
        Plant SCRUM: PlantType=SCRUM; IsEnding=false; DaysAfterEnding=0
        Manager AutomaticIrrigation
          Irrigation_Yes_No = yes
          Season_Start = 1-Oct
          Season_End = 30-Apr
          Season_Allocation = 1000
          Refull_Frac = 0.9
          Trigger_Frac = 0.7
          Return_days = 3
          Maximum_Irrigation_Amount = 40
          Top_Depth = 600
          script: same as in SCRUMTestBase.Field.AutomaticIrrigation
        Manager AutomaticFertiliser
          Fertiliser_Yes_No = yes
          Season_Start = 1-Aug
          Season_End = 30-Apr
          Season_Allocation = 1000
          TriggerN = 50
          NApplicationAmount = 25
          Return_days = 3
          Top_Depth = 300
          script: same as in SCRUMTestBase.Field.AutomaticFertiliser
  Experiment Lincoln2012
    Memo
      Testing of SCRUM under New Zealand conditions was undertaken using the data Maize data of Teixeira et al (2014).  This dataset includes the impact of three N (0 to 250 kg/ha N) and two water regimes (dryland and fully irrigated) using a rain-shelter structure.  Observations include biomass and nitrogen accumulation, soil water contents. Total biomass ranged from 8000 kg/ha for dryland nil N crops to up to 28000kg/ha for fully irrigated and N fertilised crops.  Dryland crops recovered 25 percent less N from applied fertilizer than irrigated crops.  The expected yields were set to 18 t/ha (the yield achieved in the fully irrigation Med N plots) for all treatments and the simple N and water responses of SCRUM were allowed to predict treatment effects.  The three graphs below show that SCRUM gave adequate estimations of biomass and N accumulations in respone to irrigation and fertiliser treatments and adequate estimations of soil water content.  This suggests Scum is suitable for its intended purpose of providing realistic N and water uptake patterns for N and water balance studies.
    Factors
      Permutation
        Factor Nit: Specification=[Fert]
          Operations Nil
            2012-11-15  [Fertiliser].Apply(0, Fertiliser.Types.UreaN, 10);
            2012-12-20  [Fertiliser].Apply(0, Fertiliser.Types.UreaN, 10);
            2013-01-31  [Fertiliser].Apply(0, Fertiliser.Types.UreaN, 10);
          Operations Low
            2012-11-15  [Fertiliser].Apply(25, Fertiliser.Types.UreaN, 10);
            2012-12-20  [Fertiliser].Apply(50, Fertiliser.Types.UreaN, 10);
          Operations Med
            2012-11-15  [Fertiliser].Apply(50, Fertiliser.Types.UreaN, 10);
            2012-12-20  [Fertiliser].Apply(100, Fertiliser.Types.UreaN, 10);
            2013-01-31  [Fertiliser].Apply(100, Fertiliser.Types.UreaN, 10);
        Factor Irr: Specification=[Irrig]
          Operations Full
            2012-10-24  [Irrigation].Apply(16);
            2012-10-26  [Irrigation].Apply(10);
            2012-11-03  [Irrigation].Apply(13);
            2012-11-11  [Irrigation].Apply(19.5);
            2012-11-15  [Irrigation].Apply(3.1);
            2012-11-23  [Irrigation].Apply(20);
            2012-11-29  [Irrigation].Apply(20);
            2012-11-30  [Irrigation].Apply(30);
            2012-12-13  [Irrigation].Apply(19);
            2012-12-20  [Irrigation].Apply(26);
            2012-12-20  [Irrigation].Apply(4);
            2012-12-27  [Irrigation].Apply(22);
            2013-01-03  [Irrigation].Apply(39.7);
            2013-01-10  [Irrigation].Apply(42.1);
            2013-01-17  [Irrigation].Apply(46.2);
            2013-01-24  [Irrigation].Apply(44.7);
            2013-01-31  [Irrigation].Apply(49.0);
            2013-02-07  [Irrigation].Apply(37);
            2013-02-14  [Irrigation].Apply(38);
            2013-02-21  [Irrigation].Apply(38);
            2013-02-28  [Irrigation].Apply(33.4);
            2013-03-07  [Irrigation].Apply(39.7);
            2013-03-14  [Irrigation].Apply(31.3);
            2013-03-21  [Irrigation].Apply(24);
            2013-03-28  [Irrigation].Apply(34);
            2013-04-04  [Irrigation].Apply(27.5);
          Operations Nil
            2012-10-24  [Irrigation].Apply(16);
            2012-10-26  [Irrigation].Apply(10);
            2012-11-03  [Irrigation].Apply(13);
            2012-11-11  [Irrigation].Apply(19.5);
            2012-11-15  [Irrigation].Apply(3.1);
            2012-11-23  [Irrigation].Apply(25);
            2012-11-29  [Irrigation].Apply(25);
            2012-12-20  [Irrigation].Apply(4);
            2013-01-31  [Irrigation].Apply(4.3);
    Simulation Lincoln2012
      Weather: FileName=%root%\Tests\Validation\Maize\lincoln.met
      Clock: Start=2012-10-01; End=2013-04-25
      Summary summaryfile
      SoilArbitrator Soil Arbitrator
      Zone RainShelter: Area=1; Slope=0; AspectAngle=0; Altitude=50
        Soil paparoa_silt_loam: SoilType=lignin_FOM; Region=Generic soil types; State=Canterbury; Latitude=999999; Longitude=999999
          DataSource=Profile descriptions provided by Trevor Webb and data for functional horizions based on SWAMP project results
          WaterBalance SoilWater: SummerDate=1-Nov; SummerU=9; SummerCona=4.4; WinterDate=1-Apr; WinterU=6; WinterCona=3; DiffusConst=88; DiffusSlope=35; Salb=0.13; CN2Bare=73; CNRed=20; CNCov=0.8; PSIDul=-100; Thickness=[200, 200, 200, 200, 200, 200, 200, 200]; SWCON=[0.5, 0.56, 0.31, 0.7, 0.7, 0.7, 0.7, 0.7]
          Nutrient: same as SCRUMTestBase.Field.Soil.Nutrient
          Chemical: Thickness=[200, 200, 200, 300, 300, 300]; PH=[6, 6, 6, 6, 6, 6]; PHUnits=Water
          Physical
            Thickness  BD     AirDry  LL15  DUL   SAT
            200        1.311  0.06    0.06  0.3   0.37
            200        1.474  0.05    0.12  0.3   0.37
            200        1.601  0.06    0.12  0.26  0.32
            200        1.68   0.05    0.13  0.24  0.3
            200        1.68   0.06    0.12  0.24  0.3
            200        1.68   0.05    0.15  0.21  0.3
            200        1.68   0.06    0.15  0.21  0.3
            200        1.68   0.05    0.15  0.21  0.3
            SoilCrop SCRUMSoil: LL=[0.084, 0.12, 0.12, 0.15, 0.15, 0.06, 0.06, 0.06]; KL=[0.1, 0.1, 0.1, 0.1, 0.1, 0.01, 0.01, 0.01]; XF=[1, 1, 0.5, 1, 1, 1, 1, 1]
          Water: Thickness=[200, 200, 200, 300, 300, 300]; InitialValues=[0.06, 0.25, 0.2, 0.2, 0.2, 0.2]; InitialPAWmm=97; RelativeTo=LL15; FilledFromTop=false
          Organic: FOMCNRatio=16; CarbonUnits=Total
            Thickness  Carbon  SoilCNRatio  FBiom  FInert  FOM
            200        3.6     11           0.03   0.3     2329.32
            200        0.97    11           0.02   0.6     1561.39
            200        0.42    11           0.01   0.8     1046.63
            300        0.23    11           0.01   0.9     574.404
            300        0.23    11           0.01   0.9     315.24
            300        0.23    11           0.01   0.9     173.007
          CERESSoilTemperature Temperature
          Solute NO3: Thickness=[200, 200, 200, 300, 300, 300]; InitialValues=[6.17849, 3.64993, 2.44535, 1.35913, 0.968254, 0.345238]; InitialValuesUnits=ppm; WaterTableConcentration=0; D0=0; DepthConstant=0; MaxDepthSoluteAccessible=0; RunoffEffectivenessAtMovingSolute=0; MaxEffectiveRunoff=0
          Solute NH4: Thickness=[200, 200, 200, 300, 300, 300]; InitialValuesUnits=ppm; WaterTableConcentration=0; D0=0; DepthConstant=0; MaxDepthSoluteAccessible=0; RunoffEffectivenessAtMovingSolute=0; MaxEffectiveRunoff=0
            InitialValues=[0.343249, 0.990502, 0.178014, 0.194444, 0.166667, 0.107143]
          Solute Urea: Thickness=[200, 200, 200, 300, 300, 300]; InitialValues=[0, 0, 0, 0, 0, 0]; InitialValuesUnits=kg/ha; WaterTableConcentration=0; D0=0; DepthConstant=0; MaxDepthSoluteAccessible=0; RunoffEffectivenessAtMovingSolute=0; MaxEffectiveRunoff=0
        Plant SCRUM: PlantType=SCRUM; IsEnding=false; DaysAfterEnding=0
        MicroClimate: a_interception=0; b_interception=1; c_interception=0; d_interception=0; SoilHeatFluxFraction=0.4; MinimumHeightDiffForNewLayer=0; NightInterceptionFraction=0.5; ReferenceHeight=2
        Irrigation
        Fertiliser: same as SCRUMTestBase.Field.Fertiliser
        SurfaceOrganicMatter: InitialResidueName=wheat; InitialResidueType=wheat; InitialResidueMass=0; InitialStandingFraction=0; InitialCPR=0; InitialCNR=80; FractionFaecesAdded=1
        Operations Irrig
          2012-10-24  [Irrigation].Apply(16);
          2012-10-26  [Irrigation].Apply(10);
          2012-11-03  [Irrigation].Apply(13);
          2012-11-11  [Irrigation].Apply(19.5);
          2012-11-15  [Irrigation].Apply(3.1);
          2012-11-23  [Irrigation].Apply(20);
          2012-11-29  [Irrigation].Apply(20);
          2012-11-30  [Irrigation].Apply(30);
          2012-12-13  [Irrigation].Apply(19);
          2012-12-20  [Irrigation].Apply(26);
          2012-12-20  [Irrigation].Apply(4);
          2012-12-27  [Irrigation].Apply(22);
          2013-01-03  [Irrigation].Apply(39.7);
          2013-01-10  [Irrigation].Apply(42.1);
          2013-01-17  [Irrigation].Apply(46.2);
          2013-01-24  [Irrigation].Apply(44.7);
          2013-01-31  [Irrigation].Apply(44.7);
          2013-01-31  [Irrigation].Apply(4.3);
          2013-02-07  [Irrigation].Apply(37);
          2013-02-14  [Irrigation].Apply(38);
          2013-02-21  [Irrigation].Apply(38);
          2013-02-28  [Irrigation].Apply(33.4);
          2013-03-07  [Irrigation].Apply(39.7);
          2013-03-14  [Irrigation].Apply(31.3);
          2013-03-21  [Irrigation].Apply(24);
          2013-03-28  [Irrigation].Apply(34);
          2013-04-04  [Irrigation].Apply(27.5);
        Operations Fert: same as Lincoln2012.Factors.Permutation.Nit.Med
        Operations Sow
          2012-10-23  [SCRUM].Sow(population:11, cultivar:"Maize_Short", depth:10, rowSpacing:710);
        Manager ExtraVariables: same as SCRUMTestBase.Field.ExtraVariables
        Manager Harvesting
```csharp
using Models.PMF.Phen;
using System;
using Models.Core;
using System.Collections.Generic;
using System.Text;
using Models.Soils;
using Models.PMF;
using Models;
using System.Xml.Serialization;
using APSIM.Shared.Utilities;

namespace Models
{
    [Serializable] 
    public class Script : Model
    {
        [Link] private Plant SCRUM;
        [Link] private Zone zone;
        [Link(Type = LinkType.Path, Path = "[SCRUM].Phenology")]
        private Phenology phenology;
                    
        
        [EventSubscribe("StartOfSimulation")]
        private void OnSimulationCommencing(object sender, EventArgs e)
        {
        }
        
        [EventSubscribe("DoManagement")]
        private void OnDoManagement(object sender, EventArgs e)
        {
            if (phenology.CurrentPhase.Name == "ReadyForHarvesting")
            {
                SCRUM.Harvest();
                SCRUM.EndCrop();
            }
        }
        
        [EventSubscribe("DoManagementCalculations")]
        private void OnDoManagementCalculations(object sender, EventArgs e)
        {
            
        }
    }
}
```
        Manager SetSCRUMYield
          OverRidePath = SCRUM.Product.ExpectedYield.FixedValue
          OverRideInterger = 1800
          ChangeDate = 2012-10-23
```csharp
using Models.Soils;
using System;
using Models.Core;
using System.Collections.Generic;
using System.Text;
using Models.PMF;
using Models;
using System.Xml.Serialization;
using APSIM.Shared.Utilities;

namespace Models
{
    [Serializable] 
    public class Script : Model
    {
        [Link] Plant Plant;
        [Link] Clock Clock;
        [Link] Zone zone;
        
        [Description("Path for coefficient to be Overwritten")]
        public string OverRidePath { get; set; }
        [Description("Value for new coefficient Interger")]
        public int OverRideInterger { get; set; }
        [Description("Sowing Date")]
        public DateTime ChangeDate { get; set; }
        
        [EventSubscribe("DoManagement")]
        private void OnDoManagement(object sender, EventArgs e)
        {
            if (Clock.Today.Date == ChangeDate)
            {
                object ResetValue = OverRideInterger;
                zone.Set(OverRidePath, ResetValue);
            }
        }
    }
}
```
        Manager SetSCRUMCoverMax
          OverRidePath = SCRUM.Stover.Cover.Expanding.SigCoverFunction.Ymax.FixedValue
          OverRideDouble = 0.9
          ChangeDate = 2012-10-23
```csharp
using Models.Soils;
using System;
using Models.Core;
using System.Collections.Generic;
using System.Text;
using Models.PMF;
using Models;
using System.Xml.Serialization;
using APSIM.Shared.Utilities;

namespace Models
{
    [Serializable] 
    public class Script : Model
    {
        [Link] Plant Plant;
        [Link] Clock Clock;
        [Link] Zone zone;
        
        [Description("Path for coefficient to be Overwritten")]
        public string OverRidePath { get; set; }
        [Description("Value for new coefficient Interger")]
        public double OverRideDouble { get; set; }
        [Description("Sowing Date")]
        public DateTime ChangeDate { get; set; }
        
        [EventSubscribe("DoManagement")]
        private void OnDoManagement(object sender, EventArgs e)
        {
            if (Clock.Today.Date == ChangeDate)
            {
                object ResetValue = OverRideDouble;
                zone.Set(OverRidePath, ResetValue);
            }
        }
    }
}
```
        Report: EventNames=[Clock].DoReport
          VariableNames:
            [Clock].Today
            [ExtraVariables].Script.AccumPlantN
            [ExtraVariables].Script.AccumMineralisation
            [ExtraVariables].Script.AccumDenit
            [ExtraVariables].Script.AccumFert
            [ExtraVariables].Script.AccumLeach
            [ExtraVariables].Script.AccumDetach
            [ExtraVariables].Script.DeltaSoilOMN
            [ExtraVariables].Script.DeltaSurfaceOMN
            [ExtraVariables].Script.DeltaSoilMineralN
            [ExtraVariables].Script.SWC
            [ExtraVariables].Script.DUL
            [ExtraVariables].Script.OutFlowLat
            [ExtraVariables].Script.AccumEO
            [ExtraVariables].Script.AccumEP
            [ExtraVariables].Script.AccumES
            [ExtraVariables].Script.AccumDrainage
            [ExtraVariables].Script.AccumRunoff
            [ExtraVariables].Script.AccumRainfall
            [ExtraVariables].Script.AccumIrrigation
            [ExtraVariables].Script.AccumOutflowLat
            [ExtraVariables].Script.SoilWaterDeficit
            [ExtraVariables].Script.SoilNitrogenContent
            [ExtraVariables].Script.FomN
            [ExtraVariables].Script.HumN
            [ExtraVariables].Script.BiomN
            [ExtraVariables].Script.DltNMinRes
            [ExtraVariables].Script.DltNMinTot
            [Soil].Water.Volumetric
            [Soil].SoilWater.Eo
            [Soil].SoilWater.Es
            [Soil].SoilWater.Drainage
            [Soil].SoilWater.Runoff
            sum([Soil].Water.MM) as ProfileWater
            [Soil].NO3.kgha
            [SCRUM].Product.Live.Wt
            [SCRUM].Stover.Live.Wt
            [SCRUM].Root.Live.Wt
            [SCRUM].Product.Live.N
            [SCRUM].Stover.Live.N
            [SCRUM].Root.Live.N
            [SCRUM].Root.WaterUptake
            [SCRUM].Stover.Transpiration
            [SCRUM].Stover.WaterDemand
            [SCRUM].Root.Depth
            [SCRUM].Stover.CoverTotal
            [SCRUM].Stover.LAI
            [SCRUM].Stover.Height
            [SCRUM].Phenology.Stage
            [SCRUM].AboveGround.N
            [SCRUM].AboveGround.Wt
            [SCRUM].Total.N
            [SCRUM].Total.Wt
            [SCRUM].Arbitrator.N.TotalPlantDemand
            [SCRUM].Arbitrator.N.TotalPlantSupply
            [SCRUM].Arbitrator.DM.TotalFixationSupply
            [SCRUM].Arbitrator.DM.TotalPlantDemand
            [SCRUM].Arbitrator.DM.Allocated
            [SCRUM].Arbitrator.DM.SinkLimitation
            [SCRUM].Arbitrator.DM.NutrientLimitation
            [SCRUM].Stover.MaximumNConc
            [SCRUM].Stover.MinimumNConc
            [SCRUM].Stover.Live.NConc
            [SCRUM].Stover.Live.NConc
            [SCRUM].Product.Live.NConc
            [SCRUM].Stover.Fw
            [SCRUM].Arbitrator.FN
        Manager ClimateControl
          StartDate = 2012-10-23
          EndDate = 2013-04-10
```csharp
using Models.Soils;
using System.Xml.Serialization;
using Models;
using Models.PMF;
using System.Text;
using System.Collections.Generic;
using APSIM.Shared.Utilities;
using Models.Core;
using System;
using Models.Climate;

namespace Models
{
    [Serializable] 
    [System.Xml.Serialization.XmlInclude(typeof(Model))]
    public class Script : Model
    {
        [Link] Weather Met;
        [Link] Clock Clock;
    
        [Description("Start Date")]
        public DateTime StartDate { get; set; }
        
        [Description("End Date")]
        public DateTime EndDate { get; set; }
 
    
        [EventSubscribe("PreparingNewWeatherData")]
        private void OnPreparingNewWeatherData(object sender, EventArgs e)
        {
            if ((Clock.Today.Date >= StartDate) && (Clock.Today.Date <= EndDate))
                Met.Rain = 0;        
        }
    }
}
```
  Experiment ABlock
    Memo
      In this test we use SCRUM to represent differnt crops in two different rotation treatments (Potatoes -> Wheat -> Potatoes and Potatoes -> Peas -> Potatoes) with two irrigation (W1 and W2) and three N fertiliser treatments (N0, N1 and N2).  These rotations ran over three years and were conducted to provide data for testing N leaching predictions of different models.  SCRUM yields were set to the High N full irrigation treatment values for each crop and SCRUMs N and water responses were allowed to predict any differences in crop N uptake.  It is importnat to note that the soilN organic matter degridation coefficients were set to custom (non-release) values as this has been necessary to predict accurate N mineralisation values in new zealand arable soils.

      SCRUM gave reasionable predictions of Product N removals, soil water contents and accumulated leaching from each crop treatment.  This provides further support that SCRUM is adequate for the task of providing realistic N and Water uptakes for the purpose of N and water balance studies.
    Factors
      Permutation
        Factor Rot
          CompositeFactor PP_
            Specifications:
              [Sowing_Yield].Script.Crop2 = Dried_Peas
              [Sowing_Yield].Script.SowingDate2 = 2005-09-28
              [Sowing_Yield].Script.HarvestDate2 = 2006-02-24
              [TreatmentID].Script.Rotation = PP
              [InF].Script.NFert = 0
              [InF].Script.Irr1 = 55
              [InF].Script.Irr2 = 0
              [InF].Script.Irr3 = 38
              [InF].Script.Irr4 = 40
              [Sowing_Yield].Script.CropNConc = 0.05
          CompositeFactor PW_
            Specifications:
              [Sowing_Yield].Script.Crop2 = Wheat_Autumn
              [Sowing_Yield].Script.SowingDate2 = 2005-05-13
              [Sowing_Yield].Script.HarvestDate2 = 2006-02-24
              [TreatmentID].Script.Rotation = PW
              [InF].Script.NFert = 100
              [InF].Script.Irr1 = 94
              [InF].Script.Irr2 = 34
              [InF].Script.Irr3 = 61
              [InF].Script.Irr4 = 0
              [Sowing_Yield].Script.CropNConc = 0.025
        Factor W
          CompositeFactor 1_
            Specifications:
              [Irrig]
              [TreatmentID].Script.Irrigation = W1
              [InF].Script.IrrFact1 = 0
              [InF].Script.IrrFact2 = 1
              [InF].Script.IrrFact3 = 1
              [InF].Script.IrrFact4 = 0
            Operations Irrig
              2004-12-08  [Irrigation].Apply(66);
              2005-01-05  [Irrigation].Apply(59);
              2005-01-19  [Irrigation].Apply(45);
              2005-01-26  [Irrigation].Apply(48);
              2005-02-02  [Irrigation].Apply(35);
              2005-02-09  [Irrigation].Apply(38);
              2005-02-23  [Irrigation].Apply(48);
              2005-03-02  [Irrigation].Apply(29);
              2005-11-09  [Irrigation].Apply(50);
              2005-11-30  [Irrigation].Apply(21);
              2005-12-13  [Irrigation].Apply(18);
              2005-12-21  [Irrigation].Apply(26);
              2005-12-29  [Irrigation].Apply(13);
              2006-01-05  [Irrigation].Apply(39);
              2006-01-12  [Irrigation].Apply(44);
              2006-12-20  [Irrigation].Apply(22);
              2007-01-24  [Irrigation].Apply(22);
              2007-01-25  [Irrigation].Apply(10);
              2007-01-31  [Irrigation].Apply(32);
              2007-02-07  [Irrigation].Apply(23);
              2007-02-21  [Irrigation].Apply(32);
              2007-02-28  [Irrigation].Apply(31);
          CompositeFactor 2_
            Specifications:
              [Irrig]
              [TreatmentID].Script.Irrigation = W2
              [InF].Script.IrrFact1 = 1
              [InF].Script.IrrFact2 = 0
              [InF].Script.IrrFact3 = 0
              [InF].Script.IrrFact4 = 1
            Operations Irrig
              2004-12-08  [Irrigation].Apply(66);
              2004-12-22  [Irrigation].Apply(55);
              2005-01-05  [Irrigation].Apply(102);
              2005-01-19  [Irrigation].Apply(78);
              2005-01-26  [Irrigation].Apply(76);
              2005-02-02  [Irrigation].Apply(64);
              2005-02-09  [Irrigation].Apply(67);
              2005-02-23  [Irrigation].Apply(85);
              2005-03-02  [Irrigation].Apply(50);
              2005-12-14  [Irrigation].Apply(71);
              2006-01-12  [Irrigation].Apply(68);
              2007-01-25  [Irrigation].Apply(10);
              2007-02-07  [Irrigation].Apply(60);
        Factor N
          CompositeFactor 0
            Specifications:
              [Nit]
              [TreatmentID].Script.Nitrogen = N0
              [InF].Script.TreatFact = 0
            Operations Nit
          CompositeFactor 1
            Specifications:
              [Nit]
              [TreatmentID].Script.Nitrogen = N1
              [InF].Script.TreatFact = 1
            Operations Nit
              2004-10-13  [Fertiliser].Apply(100, [Fertiliser].Types.UreaN, 50);
              2004-12-20  [Fertiliser].Apply(50, [Fertiliser].Types.UreaN, 50);
              2005-01-24  [Fertiliser].Apply(50, [Fertiliser].Types.UreaN, 50);
              2005-10-26  [Fertiliser].Apply(50, [Fertiliser].Types.UreaN, 50);
              2006-10-10  [Fertiliser].Apply(100, [Fertiliser].Types.UreaN, 50);
              2006-12-29  [Fertiliser].Apply(50, [Fertiliser].Types.UreaN, 50);
              2007-01-16  [Fertiliser].Apply(50, [Fertiliser].Types.UreaN, 50);
          CompositeFactor 2
            Specifications:
              [Nit]
              [TreatmentID].Script.Nitrogen = N2
              [InF].Script.TreatFact = 2
            Operations Nit
              2004-10-13  [Fertiliser].Apply(200, [Fertiliser].Types.UreaN, 50);
              2004-12-20  [Fertiliser].Apply(100, [Fertiliser].Types.UreaN, 50);
              2005-01-24  [Fertiliser].Apply(100, [Fertiliser].Types.UreaN, 50);
              2005-10-26  [Fertiliser].Apply(100, [Fertiliser].Types.UreaN, 50);
              2006-10-10  [Fertiliser].Apply(200, [Fertiliser].Types.UreaN, 50);
              2006-12-29  [Fertiliser].Apply(100, [Fertiliser].Types.UreaN, 50);
              2007-01-16  [Fertiliser].Apply(100, [Fertiliser].Types.UreaN, 50);
    Simulation ABlock
      Weather: FileName=%root%\Tests\WeatherFiles\lincoln.met
      Clock: Start=2004-10-12; End=2007-03-31
      Summary
      SoilArbitrator Soil Arbitrator
      Manager TreatmentID
```csharp
using Models.Soils;
using System.Data;
using System.IO;
using APSIM.Shared.Utilities;
using System.Xml.Serialization;
using Models;
using Models.PMF;
using System.Text;
using System.Collections.Generic;
using Models.Core;
using System;
using Newtonsoft.Json;
      

namespace Models
{
    [Serializable] 
    public class Script : Model
    {
        [JsonIgnore] public string Rotation { get; set; }
        [JsonIgnore] public string Irrigation { get; set; }
        [JsonIgnore] public string Nitrogen { get; set; }
        
        [JsonIgnore] public string TreatmentName { get; set; }
        
        [EventSubscribe("StartOfSimulation")]
        private void OnStartOfSimulation(object sender, EventArgs e)
        {
            TreatmentName = Rotation + "_" + Irrigation + "_" + Nitrogen;
        }
    }
}
```
      Zone Field: Area=1; Slope=0; AspectAngle=0; Altitude=50
        Plant SCRUM: PlantType=SCRUM; IsEnding=false; DaysAfterEnding=0
        Soil: Region=Plains; State=Canterbury; Country=New Zealand; Latitude=0; Longitude=0
          DataSource=Generic profile descriptions provided by Trevor Webb and data for functional horizions based on SWAMP project results
          Comments=Bulk density values were measured on the fine earth fraction so values entered into apsim soil are adjusted down to account for stone content (assuming stones are inert from all soil process so their mass and volume is removed from model paramaters).  SAT, DUL, LL15 and Air dry have been adjusted down to account for stone content.  OC has not been adjusted so the model will get the correct carbon and N amounts using the adjusted BD.
          Chemical: Thickness=[100, 200, 200, 100, 300, 200, 100, 300]; PH=[6, 6, 6, 6, 6, 6, 6, 6]; PHUnits=Water
          Physical
            Thickness  BD     AirDry  LL15   DUL   SAT
            100        1      0.05    0.1    0.27  0.419
            200        1      0.05    0.1    0.27  0.395
            300        1.59   0.157   0.157  0.29  0.36
            200        1.57   0.173   0.173  0.3   0.366
            100        1.57   0.173   0.173  0.3   0.366
            200        1.6    0.165   0.165  0.3   0.358
            100        1.6    0.165   0.165  0.3   0.358
            300        1.601  0.115   0.115  0.3   0.316
            SoilCrop SCRUMSoil: LL=[0.1, 0.1, 0.157, 0.173, 0.173, 0.165, 0.165, 0.115]; KL=[0.1, 0.1, 0.1, 0.1, 0.1, 0.1, 0.1, 0.1]; XF=[1, 1, 1, 1, 1, 1, 1, 1]
          WaterBalance SoilWater: SummerDate=1-oct; SummerU=9; SummerCona=4.4; WinterDate=1-Apr; WinterU=2; WinterCona=1.5; DiffusConst=88; DiffusSlope=35; Salb=0.13; CN2Bare=73; CNRed=20; CNCov=0.8; PSIDul=-100; Thickness=[100, 200, 300, 200, 100, 200, 100, 300]; SWCON=[0.9, 0.6, 0.4, 0.4, 0.4, 0.9, 0.9, 0.9]
          Nutrient: same as SCRUMTestBase.Field.Soil.Nutrient
          Organic: FOMCNRatio=31.5; CarbonUnits=Total
            Thickness  Carbon  SoilCNRatio  FBiom  FInert  FOM
            100        2.677   11           0.025  0.45    536.934
            200        2.784   11           0.025  0.6     359.917
            300        1.454   11           0.015  0.75    197.527
            200        0.383   11           0.01   0.9     132.406
            100        0.243   11           0.01   0.96    108.405
            200        0.243   11           0.01   0.96    72.6661
            100        0.243   11           0.01   0.96    59.4939
            300        0.243   11           0.01   0.96    32.651
          Water: Thickness=[100, 200, 300, 200, 100, 200, 100, 300]; InitialValues=[0.27, 0.27, 0.29, 0.3, 0.3, 0.3, 0.3, 0.225]; InitialPAWmm=202.5; RelativeTo=LL15; FilledFromTop=true
          CERESSoilTemperature Temperature
          Solute NO3: Thickness=[100, 200, 200, 100, 300, 200, 100, 300]; InitialValuesUnits=ppm; WaterTableConcentration=0; D0=0; DepthConstant=0; MaxDepthSoluteAccessible=0; RunoffEffectivenessAtMovingSolute=0; MaxEffectiveRunoff=0
            InitialValues=[35, 15, 6.07966, 6.07966, 0.849257, 0.3125, 0.625, 0.208203]
          Solute NH4: Thickness=[100, 200, 200, 100, 300, 200, 100, 300]; InitialValuesUnits=ppm; WaterTableConcentration=0; D0=0; DepthConstant=0; MaxDepthSoluteAccessible=0; RunoffEffectivenessAtMovingSolute=0; MaxEffectiveRunoff=0
            InitialValues=[6.18, 3.09, 0.672956, 0.672956, 0.552017, 0.28125, 0.0625, 0.0208203]
          Solute Urea: Thickness=[100, 200, 200, 100, 300, 200, 100, 300]; InitialValues=[0, 0, 0, 0, 0, 0, 0, 0]; InitialValuesUnits=kg/ha; WaterTableConcentration=0; D0=0; DepthConstant=0; MaxDepthSoluteAccessible=0; RunoffEffectivenessAtMovingSolute=0; MaxEffectiveRunoff=0
        SurfaceOrganicMatter: InitialResidueName=grass; InitialResidueType=grass; InitialResidueMass=2500; InitialStandingFraction=0; InitialCPR=0; InitialCNR=15; FractionFaecesAdded=1
        MicroClimate: a_interception=0; b_interception=1; c_interception=0; d_interception=0; SoilHeatFluxFraction=0.4; MinimumHeightDiffForNewLayer=0; NightInterceptionFraction=0.5; ReferenceHeight=2
        Irrigation
        Fertiliser: same as SCRUMTestBase.Field.Fertiliser
        Folder Management
          Manager Sowing_Yield
            YieldFile = %root%\Tests\Validation\SCRUM\YieldsToSet.csv
            InitialRootDepth = 10
            Crop1 = Potatoes_Short
            SowingDate1 = 10/15/2004 00:00:00
            HarvestDate1 = 03/14/2005 00:00:00
            Yield1 = 5500
            Crop2 = Dried_Peas
            SowingDate2 = 09/28/2005 00:00:00
            HarvestDate2 = 02/24/2006 00:00:00
            Yield2 = 958
            Crop3 = Potatoes_Short
            SowingDate3 = 10/11/2006 00:00:00
            HarvestDate3 = 03/12/2007 00:00:00
            Yield3 = 2200
```csharp
using Models.Soils;
using Models.Surface;
using Models.PMF.Interfaces;
using System.Data;
using APSIM.Shared.Utilities;
using System.Xml.Serialization;
using Models;
using Models.PMF;
using System.Text;
using System.Collections.Generic;
using Models.Core;
using System;
using Newtonsoft.Json;

namespace Models
{
    [Serializable] 
    //[System.Xml.Serialization.XmlInclude(typeof(Model))]
    public class Script : Model
    {
        [Link] Plant SCRUM;
        [Link] Clock Clock;
        [Link] Zone zone;
        [Link] Simulation Simulation;
        [Link] SurfaceOrganicMatter SurfOM;
        
        [Description("File of Yields")]
        public string YieldFile { get; set; }
        
        public string FullFileName
        {
            get
            {
                return PathUtilities.GetAbsolutePath(YieldFile, Simulation.FileName);
            }
        }
        
        [JsonIgnore] private DataTable Yields { get; set; }
        
        [Description("Initial Root Depth")]
        public double InitialRootDepth { get; set; }
        
        [Description("First Crop")]
        public string Crop1 { get; set; }
        [Description("First Sowing Date")]
        public DateTime SowingDate1 { get; set; }
        [Description("First Harvest Date")]
        public DateTime HarvestDate1 { get; set; }
        [Description("First Crop Yield (g/m2 fresh wt)")]
        public int Yield1 { get; set; }
        
        [Description("Second Crop")]
        public string Crop2 { get; set; }
        [Description("Second Sowing Date")]
        public DateTime SowingDate2 { get; set; }
        [Description("Second Harvest Date")]
        public DateTime HarvestDate2 { get; set; }
        [Description("Second Crop Yield (g/m2 fresh wt)")]
        public int Yield2 { get; set; }
        public double CropNConc { get; set; }

        [Description("Third Crop")]
        public string Crop3 { get; set; }
        [Description("Third Sowing Date")]
        public DateTime SowingDate3 { get; set; }
        [Description("Third Harvest Date")]
        public DateTime HarvestDate3 { get; set; }
        [Description("Third Crop Yield (g/m2 fresh wt)")]
        public int Yield3 { get; set; }
        
        public string Treatment { get; set; }
        
        private double stoverFractionToRemove = 0;
        private double stoverFractionToResidue = 1;
        private double productFractionToRemove = 1;
        private double productFractionToResidue = 0;
        private double rootFractionToRemove = 0;
        private double rootFractionToResidue = 0.2;
        
        private IHasDamageableBiomass stover;
        private IHasDamageableBiomass product;
        private IHasDamageableBiomass root;
        
        [EventSubscribe("StartOfSimulation")]
        private void OnSimulationCommencing(object sender, EventArgs e)
        {
            stover = SCRUM.FindChild<IHasDamageableBiomass>("Stover");
            product = SCRUM.FindChild<IHasDamageableBiomass>("Product");
            root = SCRUM.FindChild<IHasDamageableBiomass>("Root");
        }
        
        [EventSubscribe("StartOfSimulation")]
        private void OnStartOfSimulation(object sender, EventArgs e)
        {
            Treatment = (string)Simulation.FindByPath("TreatmentID.Script.TreatmentName").Value;
            
            ApsimTextFile textFile = new ApsimTextFile();
            textFile.Open(FullFileName);
            Yields = textFile.ToTable();
            textFile.Close();
        }
        
        [EventSubscribe("DoManagement")]
        private void OnDoManagement(object sender, EventArgs e)
        {
            if (Clock.Today.Date == SowingDate1)
            {
                SCRUM.Sow(cultivar: Crop1, population: 1, depth: InitialRootDepth, rowSpacing: 150);
                object ResetValue = Convert.ToDouble(Yields.Rows[0][Treatment]);
                zone.Set("[SCRUM].Product.ExpectedYield.FixedValue", ResetValue);
                ResetValue = 0.025;
                zone.Set("[SCRUM].Product.MaximumNConc.FixedValue", ResetValue);
            }
            else if (Clock.Today.Date == HarvestDate1)
            {
                stover.RemoveBiomass(liveToRemove: stoverFractionToRemove, liveToResidue: stoverFractionToResidue);
                product.RemoveBiomass(liveToRemove: productFractionToRemove, liveToResidue: productFractionToResidue);
                root.RemoveBiomass(liveToRemove: rootFractionToRemove, liveToResidue: rootFractionToResidue);
                SCRUM.Harvest(removeBiomassFromOrgans: false);
                SCRUM.EndCrop();
            }
            else if (Clock.Today.Date == SowingDate2)
            {
                SCRUM.Sow(cultivar: Crop2, population: 1, depth: InitialRootDepth, rowSpacing: 150);
                object ResetValue = Convert.ToDouble(Yields.Rows[1][Treatment]);
                zone.Set("[SCRUM].Product.ExpectedYield.FixedValue", ResetValue);
                ResetValue = CropNConc;
                zone.Set("[SCRUM].Product.MaximumNConc.FixedValue", ResetValue);
            }
            else if (Clock.Today.Date == HarvestDate2)
            {
                stover.RemoveBiomass(liveToRemove: stoverFractionToRemove, liveToResidue: stoverFractionToResidue);
                product.RemoveBiomass(liveToRemove: productFractionToRemove, liveToResidue: productFractionToResidue);
                root.RemoveBiomass(liveToRemove: rootFractionToRemove, liveToResidue: rootFractionToResidue);
                SCRUM.Harvest(removeBiomassFromOrgans: false);
                SCRUM.EndCrop();
                SurfOM.Incorporate(0.8, 10);
            }
            else if (Clock.Today.Date == SowingDate3)
            {
                SurfOM.Incorporate(1, 10);
                SCRUM.Sow(cultivar: Crop3, population: 1, depth: InitialRootDepth, rowSpacing: 150);
                object ResetValue = Convert.ToDouble(Yields.Rows[2][Treatment]);
                zone.Set("[SCRUM].Product.ExpectedYield.FixedValue", ResetValue);
                ResetValue = 0.025;
                zone.Set("[SCRUM].Product.MaximumNConc.FixedValue", ResetValue);
        
            }
            else if (Clock.Today.Date == HarvestDate3)
            {
                stover.RemoveBiomass(liveToRemove: stoverFractionToRemove, liveToResidue: stoverFractionToResidue);
                product.RemoveBiomass(liveToRemove: productFractionToRemove, liveToResidue: productFractionToResidue);
                root.RemoveBiomass(liveToRemove: rootFractionToRemove, liveToResidue: rootFractionToResidue);
                SCRUM.Harvest(removeBiomassFromOrgans: false);
                SCRUM.EndCrop();
            }
            //PMFCrop.Sow(... Contains the following arguements:
            //Population  double  Optional  Seeds sowing/m2.  Default is zero
            //Cultivar    string  Required  "NameOfCultivar"
            //Depth       double  Optional  Depth (mm) seed sown.   Default is 100mm 
            //MaxCover    double  Optional  Proportion (0-1) of the ground row crop will cover.   Default is 1.0
            //BudNumber   double  Optional  Number of mainstems per seed sown.  Default is 1.0
            //RowSpacing  double  Optional  Spaceing (mm) between drill rows when crop is sown.  Default is 150mm
            //CropClass   string  Optional  Crop class to instantiate when crop is sown.  Default is "Plant"
        }
    }
}
```
          Operations Nit: same as ABlock.Factors.Permutation.N.1.Nit
          Operations Irrig
            2004-12-08  [Irrigation].Apply(66);
            2005-01-05  [Irrigation].Apply(59);
            2005-01-19  [Irrigation].Apply(45);
            2005-01-26  [Irrigation].Apply(48);
            2005-02-02  [Irrigation].Apply(35);
            2005-02-09  [Irrigation].Apply(38);
            2005-02-23  [Irrigation].Apply(48);
            2005-03-02  [Irrigation].Apply(29);
            2005-11-09  [Irrigation].Apply(50);
            2005-11-30  [Irrigation].Apply(21);
            2005-12-07  [Irrigation].Apply(38);
            2005-12-13  [Irrigation].Apply(18);
            2005-12-21  [Irrigation].Apply(26);
            2005-12-29  [Irrigation].Apply(13);
            2006-01-05  [Irrigation].Apply(39);
            2006-01-12  [Irrigation].Apply(44);
            2006-12-20  [Irrigation].Apply(22);
            2007-01-24  [Irrigation].Apply(22);
            2007-01-25  [Irrigation].Apply(10);
            2007-01-31  [Irrigation].Apply(32);
            2007-02-07  [Irrigation].Apply(23);
            2007-02-21  [Irrigation].Apply(32);
            2007-02-28  [Irrigation].Apply(31);
          Manager InF
            FertDate1 = 2005-10-26
            FertDate2 = 2005-11-25
            NFert = 0
            TreatFact = 0
            IrrDate1 = 2005-11-18
            Irr1 = 0
            IrrFact1 = 0
            IrrDate2 = 2005-11-23
            Irr2 = 0
            IrrFact2 = 0
            IrrDate3 = 2005-12-07
            Irr3 = 0
            IrrFact3 = 0
            IrrDate4 = 2005-12-29
            Irr4 = 0
            IrrFact4 = 0
```csharp
using Models.Soils;
using System;
using Models.Core;
using System.Collections.Generic;
using System.Text;
using Models.PMF;
using Models;
using System.Xml.Serialization;
using APSIM.Shared.Utilities;
using System.Data;

namespace Models
{
    [Serializable] 
    //[System.Xml.Serialization.XmlInclude(typeof(Model))]
    public class Script : Model
    {
        [Link] Plant SCRUM;
        [Link] Clock Clock;
        [Link] Zone zone;
        [Link] Simulation Simulation;
        [Link] Fertiliser Fert;
        [Link] Irrigation Irrigation;
        
        [Description("Date of Fert on Wheat")]
        public DateTime FertDate1 { get; set; }
        [Description("Date of Fert on Wheat")]
        public DateTime FertDate2 { get; set; }
        public int NFert { get; set; }
        public double TreatFact { get; set; }
    
        [Description("Date of Irrig on Wheat")]
        public DateTime IrrDate1 { get; set; }
        public int Irr1 { get; set; }
        public double IrrFact1 { get; set; }
        [Description("Date of Irrig on Wheat")]
        public DateTime IrrDate2 { get; set; }
        public int Irr2 { get; set; }
        public double IrrFact2 { get; set; }
        [Description("Date of Irrig on Wheat")]
        public DateTime IrrDate3 { get; set; }
        public int Irr3 { get; set; }
        public double IrrFact3 { get; set; }
        [Description("Date of Irrig on Wheat")]
        public DateTime IrrDate4 { get; set; }
        public int Irr4 { get; set; }
        public double IrrFact4 { get; set; }
        
        
        [EventSubscribe("DoManagement")]
        private void OnDoManagement(object sender, EventArgs e)
        {
            if (Clock.Today.Date == FertDate1)
            {
                Fert.Apply(NFert * TreatFact * 0.5, Fertiliser.Types.UreaN, 50);
            }
            if (Clock.Today.Date == FertDate2)
            {
                Fert.Apply(NFert * TreatFact, Fertiliser.Types.UreaN, 50);
            }
            if (Clock.Today.Date == IrrDate1)
            {
                Irrigation.Apply(Irr1 * IrrFact1);
            }
            if (Clock.Today.Date == IrrDate2)
            {
                Irrigation.Apply(Irr2 * IrrFact2);
            }
            if (Clock.Today.Date == IrrDate3)
            {
                Irrigation.Apply(Irr3 * IrrFact3);
            }
            if (Clock.Today.Date == IrrDate4)
            {
                Irrigation.Apply(Irr4 * IrrFact4);
            }
        }
    }
}
```
        Report: EventNames=[Clock].DoReport
          VariableNames:
            [Clock].Today
            [ExtraVariables].Script.AccumPlantN
            [ExtraVariables].Script.AccumMineralisation
            [ExtraVariables].Script.AccumDenit
            [ExtraVariables].Script.AccumFert
            [ExtraVariables].Script.AccumLeach as LeachNo3
            [ExtraVariables].Script.AccumDetach
            [ExtraVariables].Script.DeltaSoilOMN
            [ExtraVariables].Script.DeltaSurfaceOMN as SOM_N
            [ExtraVariables].Script.DeltaSoilMineralN
            [ExtraVariables].Script.DltNMinRes as Residue_N
            [ExtraVariables].Script.SWC as SWC
            [ExtraVariables].Script.DUL
            [ExtraVariables].Script.OutFlowLat
            [ExtraVariables].Script.AccumEO
            [ExtraVariables].Script.AccumEP
            [ExtraVariables].Script.AccumES
            [ExtraVariables].Script.AccumDrainage as Drainage
            [ExtraVariables].Script.AccumRunoff
            [ExtraVariables].Script.AccumRainfall
            [ExtraVariables].Script.AccumIrrigation
            [ExtraVariables].Script.AccumOutflowLat
            [ExtraVariables].Script.SoilWaterDeficit
            [ExtraVariables].Script.SoilNitrogenContent as TotalSoilN
            [ExtraVariables].Script.FomN
            [ExtraVariables].Script.HumN
            [ExtraVariables].Script.BiomN
            [ExtraVariables].Script.DltNMinRes
            [ExtraVariables].Script.DltNMinTot
            [Soil].SoilWater.Drainage
            [Soil].SoilWater.Runoff
            [Soil].SoilWater.Eo
            [Soil].SoilWater.Es
            [Soil].SoilWater.pond
            [Soil].Water.MM
            [Soil].NO3.kgha
            [SCRUM].Stover.Live.Wt
            [SCRUM].Root.Live.Wt
            [SCRUM].Product.Live.Wt
            [SCRUM].Stover.Live.N
            [SCRUM].Root.Live.N
            [SCRUM].Product.Live.N
            [SCRUM].Stover.Live.NConc
            [SCRUM].Root.Live.NConc
            [SCRUM].Product.Live.NConc
            [SCRUM].Root.WaterUptake
            [SCRUM].Stover.Transpiration
            [SCRUM].Stover.WaterDemand
            [SCRUM].Root.Depth
            [SCRUM].Stover.CoverTotal
            [SCRUM].Stover.CoverDead
            [SCRUM].Stover.LAI
            [SCRUM].Stover.Height
            [SCRUM].Arbitrator.N.TotalPlantDemand
            [SCRUM].Arbitrator.N.TotalPlantSupply
            [SCRUM].Stover.Fw
            [SCRUM].Stover.Fn
            [SCRUM].Total.Wt
            [SCRUM].Total.N
            [SCRUM].Arbitrator.DM.TotalFixationSupply
            [SCRUM].Arbitrator.DM.TotalPlantDemand
            [SCRUM].Arbitrator.DM.SinkLimitation
            [SCRUM].Arbitrator.DM.NutrientLimitation
            [SCRUM].Phenology.ThermalTime
            [SCRUM].Phenology.CurrentPhase.Name
            [SCRUM].Phenology.Stage
            [Irrigation].IrrigationApplied
            [SCRUM].Arbitrator.FN
            [NConcReps].Script.TotalLeach
            [NConcReps].Script.ObservedLeach1
            [NConcReps].Script.ObservedLeach2
            [NConcReps].Script.ObservedLeach3
            [NConcReps].Script.ObservedLeach4
            [NConcReps].Script.ObservedLeach5
            [NConcReps].Script.Leach_60
            [Soil].SoilWater.SoluteFlowEfficiency
            [Soil].SoilWater.SoluteFluxEfficiency
            [SCRUM].Total.N
            [Soil].SoilWater.FlowNO3
            [TreatmentID].Script.TreatmentName as Treat
            [Sowing_Yield].Script.Treatment
            [TreatmentID].Script.Rotation as RotTreat
            [TreatmentID].Script.Irrigation as IrrigTreat
            [TreatmentID].Script.Nitrogen as NitTreat
            [SurfaceOrganicMatter].N
            [SurfaceOrganicMatter].wt
            [SurfaceOrganicMatter].Cover
        Report PredictedLeach: EventNames=[SCRUM].Harvesting
          VariableNames:
            [Clock].Today
            [NConcReps].Script.TotalLeach as NLeaching
        Report ObservedLeach: EventNames=[SCRUM].Harvesting
          VariableNames:
            [Clock].Today
            [NConcReps].Script.NLeachMean as NLeaching
        Manager ExtraVariables: same as SCRUMTestBase.Field.ExtraVariables
        Manager NConcReps
          NConcFile = %root%\Tests\Validation\SCRUM\NO3.csv
          TotalLeach = 0
          Leach_60 = 0
          ObservedLeach1 = 0
          ObservedLeach2 = 0
          ObservedLeach3 = 0
          ObservedLeach4 = 0
          ObservedLeach5 = 0
          NConc1 = 0
          NConc2 = 0
          NConc3 = 0
          NConc4 = 0
          NConc5 = 0
          Treat_Rep1 =
          Treat_Rep2 =
          Treat_Rep3 =
          Treat_Rep4 =
          Treat_Rep5 =
          NLeachMean = 0
```csharp
using Newtonsoft.Json;
using Models.Climate;
using System;
using Models.Core;
using System.Collections.Generic;
using System.Text;
using Models.Soils;
using Models.PMF;
using Models;
using System.Xml.Serialization;
using APSIM.Shared.Utilities;
using System.Data;
using Models.Interfaces;

namespace Models
{
    [Serializable] 
    public class Script : Model
    {
        [Link] private Clock Clock;
        [Link] private Soils.Soil Soil;
        [Link] private Models.Surface.SurfaceOrganicMatter SOM;
        [Link] private Weather Met;
        [Link] private Fertiliser Fert;
        [Link] private Irrigation Irrig;
        [Link] private Plant SCRUM;
        [Link] private Zone zone;
        [Link] private Simulation Simulation;
        [Link]
        private ISoilWater waterBalance;
        
        [Description("File of Nconcs")]
        public string NConcFile { get; set; }
        
        public string FullFileName
        {
            get
            {
                return PathUtilities.GetAbsolutePath(NConcFile, Simulation.FileName);
            }
        }
        
        public double TotalLeach { get; set; }
        public double Leach_60 { get; set; }
        public double ObservedLeach1 { get; set; }
        public double ObservedLeach2 { get; set; }
        public double ObservedLeach3 { get; set; }
        public double ObservedLeach4 { get; set; }
        public double ObservedLeach5 { get; set; }
        public double NConc1 { get; set; }
        public double NConc2 { get; set; }
        public double NConc3 { get; set; }
        public double NConc4 { get; set; }
        public double NConc5 { get; set; }
    
        public string Treat_Rep1 { get; set; }
        public string Treat_Rep2 { get; set; }
        public string Treat_Rep3 { get; set; }
        public string Treat_Rep4 { get; set; }
        public string Treat_Rep5 { get; set; }
        
        public double NLeachMean { get; set; }
        
        [JsonIgnore] private DataTable NConcs { get; set; }
    
        private DateTime Date1 { get; set; }
        
        [EventSubscribe("StartOfSimulation")]
        private void OnStartOfSimulation(object sender, EventArgs e)
        {
            ApsimTextFile textFile = new ApsimTextFile();
            textFile.Open(FullFileName);
            NConcs = textFile.ToTable();
            textFile.Close();
            
            Treat_Rep1 = (string)Simulation.FindByPath("TreatmentID.Script.TreatmentName").Value + "_1";
            Treat_Rep2 = (string)Simulation.FindByPath("TreatmentID.Script.TreatmentName").Value + "_2";
            Treat_Rep3 = (string)Simulation.FindByPath("TreatmentID.Script.TreatmentName").Value + "_3";
            Treat_Rep4 = (string)Simulation.FindByPath("TreatmentID.Script.TreatmentName").Value + "_4";
            Treat_Rep5 = (string)Simulation.FindByPath("TreatmentID.Script.TreatmentName").Value + "_5";
        }
        
        [EventSubscribe("DoInitialSummary")]
        private void OnDoInitialSummary(object sender, EventArgs e)
        {
            TotalLeach = 0;
            Leach_60 = 0;
            NConc1 = 0;
            NConc2 = 0;
            NConc3 = 0;
            NConc4 = 0;
            NConc5 = 0;
            ObservedLeach1 = 0;
            ObservedLeach2 = 0;
            ObservedLeach3 = 0;
            ObservedLeach4 = 0;
            ObservedLeach5 = 0;
        }
        
        [EventSubscribe("StartOfDay")]
        private void OnStartOfDay(object sender, EventArgs e)
        {
            try
            {
                foreach (DataRow row in NConcs.Rows)
                {
                    DateTime TodayDate = Convert.ToDateTime(row["Date"]);
                    if (TodayDate.Date == Clock.Today.Date)
                    {
                        NConc1 = Convert.ToDouble(row[Treat_Rep1]);
                        NConc2 = Convert.ToDouble(row[Treat_Rep2]);
                        NConc3 = Convert.ToDouble(row[Treat_Rep3]);
                        NConc4 = Convert.ToDouble(row[Treat_Rep4]);
                        NConc5 = Convert.ToDouble(row[Treat_Rep5]);
                    }
                }
            }
            finally
            {
            }
        }
        
        [EventSubscribe("DoManagement")]
        private void OnDoManagement(object sender, EventArgs e)
        {
            DateTime Potato1Start = new DateTime(2004, 12, 9);
            DateTime Potato1End = new DateTime(2005, 3, 14);
        
            if ((Clock.Today.Date >= Potato1Start) && (Clock.Today.Date <= Potato1End))
            {
                Leach_60 = Leach_60 + (waterBalance.FlowNO3[3]);
                ObservedLeach1 = ObservedLeach1 + ((waterBalance.Flow[3] + waterBalance.Flux[3]) * NConc1) / 100;
                ObservedLeach2 = ObservedLeach2 + ((waterBalance.Flow[3] + waterBalance.Flux[3]) * NConc2) / 100;
                ObservedLeach3 = ObservedLeach3 + ((waterBalance.Flow[3] + waterBalance.Flux[3]) * NConc3) / 100;
                ObservedLeach4 = ObservedLeach4 + ((waterBalance.Flow[3] + waterBalance.Flux[3]) * NConc4) / 100;
                ObservedLeach5 = ObservedLeach5 + ((waterBalance.Flow[3] + waterBalance.Flux[3]) * NConc5) / 100;
                if (ObservedLeach5 > 0)
                    NLeachMean = (ObservedLeach1 + ObservedLeach2 + ObservedLeach3 + ObservedLeach4 + ObservedLeach5) / 5;
                else
                    NLeachMean = (ObservedLeach1 + ObservedLeach2 + ObservedLeach3) / 3;
                    
                TotalLeach = TotalLeach + (waterBalance.FlowNO3[2] + waterBalance.FlowNH4[2]);
            }
            else if (Clock.Today.Date > Potato1End)
            {    
                Leach_60 = 0;
                ObservedLeach1 = ObservedLeach1 + (waterBalance.Drainage * NConc1) / 100;
                ObservedLeach2 = ObservedLeach2 + (waterBalance.Drainage * NConc2) / 100;
                ObservedLeach3 = ObservedLeach3 + (waterBalance.Drainage * NConc3) / 100;
                ObservedLeach4 = ObservedLeach4 + (waterBalance.Drainage * NConc4) / 100;
                ObservedLeach5 = ObservedLeach5 + (waterBalance.Drainage * NConc5) / 100;
                if (ObservedLeach5 > 0)
                    NLeachMean = (ObservedLeach1 + ObservedLeach2 + ObservedLeach3 + ObservedLeach4 + ObservedLeach5) / 5;
                else
                    NLeachMean = (ObservedLeach1 + ObservedLeach2 + ObservedLeach3) / 3;
                //TotalLeach = TotalLeach + waterBalance.LeachNH4 + waterBalance.LeachNO3 + waterBalance.LeachUrea;
                TotalLeach = TotalLeach + (waterBalance.FlowNO3[7] + waterBalance.FlowNH4[7]);
            }
        }
        
        [EventSubscribe("PlantEnding")]
        private void OnPlantEnding(object sender, EventArgs e)
        {
            Leach_60 = 0;
            ObservedLeach1 = 0;
            ObservedLeach2 = 0;
            ObservedLeach3 = 0;
            ObservedLeach4 = 0;
            ObservedLeach5 = 0;
            TotalLeach = 0;
            
            
        }
    }
}
```
    Folder LeachingObsPre
      Memo
        Predictions working well for all but the high N treatment in the final wheat crop following the potato crop.  I suspect the model is under predicting Denitrification here
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