Simulations Standard toolbox: Area=0
  Tests:
    SimulationName  TableName  Type            ColumnNames  Parameters
    simulation      Report     EqualTo         column       value
    simulation      Report     LessThan        column       value
    simulation      Report     GreaterThan     column       value
    simulation      Report     AllPos          column       -
    simulation      Report     Between         column       value1,value2
    simulation      Report     Mean            column       5,value
    simulation      Report     Tolerance       column       1,5
    simulation      Report     CompareToInput  column       1,5
  Experiment={Simulation={Name=Base, Clock={Name=Clock, StartDate=1940-01-01, EndDate=1989-12-31}, Summary={Name=Summary}}}
  Folder Structural
  Folder Standard models: Area=0
    Weather: FileName=Goondiwindi.met
    Clock: StartDate=1940-01-01; EndDate=1989-12-31
    Summary
    Report: EventNames=[Clock].EndOfDay
      VariableNames:
        [Clock].Today
        [Weather].MaxT
        [Weather].MinT
        [Weather].Radn
        [Weather].Rain
    Fertiliser
      Definitions:
        Name     FractionNO3  FractionNH4  FractionUrea
        Urea     0            0            0.46
        DAP      0            0.18         0
        MAP      0            0.11         0
        UreaN    0            0            1
        NO3N     1            0            0
        NH4N     0            1            0
        NH4NO3N  0.5          0.5          0
        NH4SO4N  0            1            0
    Irrigation
    Operations
    Soil: SoilType=Black Vertosol; LocalName=Waco; Site=Jimbour; NearestTown=Jimbour, Q 4352; Region=South East Queensland; NaturalVegetation=Grassland, mainly Qld bluegrass; Latitude=0; Longitude=0
      Water
        Thickness  BD    AirDry  LL15  DUL   SAT
        150        1.02  0.15    0.29  0.54  0.59
        150        1.03  0.26    0.29  0.53  0.58
        300        1.02  0.29    0.29  0.54  0.59
        300        1.02  0.29    0.29  0.54  0.58
        300        1.06  0.3     0.3   0.52  0.57
        300        1.11  0.31    0.31  0.5   0.55
        300        1.12  0.32    0.32  0.5   0.55
        300        1.15  0.33    0.33  0.48  0.53
        300        1.18  0.34    0.34  0.47  0.52
        300        1.2   0.35    0.35  0.46  0.51
        300        1.25  0.36    0.36  0.44  0.49
        SoilCrop WheatSoil
          LL=[0.29, 0.29, 0.32, 0.38, 0.39, 0.39, 0.41, 0.48, 0.47, 0.46, 0.44]
          KL=[0.1, 0.1, 0.08, 0.06, 0.04, 0.02, 0.01, 0, 0, 0, 0]
          XF=[1, 1, 1, 1, 1, 1, 1, 0, 0, 0, 0]
        SoilCropOilPalm OilPalm: XF=[1, 1, 1, 1, 1, 1, 1, 1, 1, 0, 0, 0]
          KL=[0.06, 0.04, 0.03, 0.02, 0.02, 0.02, 0.01, 0.01, 0.01, 0, 0, 0]
      SoilWater: min_crit_temp=5; max_crit_temp=35; max_albedo=0.23; A_to_evap_fact=0.44; canopy_eos_coef=1.7; sw_top_crit=0.9; sumes1_max=100; sumes2_max=25; solute_flow_eff=[1]; solute_flux_eff=[1]; gravity_gradient=2E-05; specific_bd=2.65; hydrol_effective_depth=450; immobile_solutes=[NH4]; canopy_fact=[1, 1, 0, 0]; canopy_fact_height=[0, 600, 1800, 30000]; canopy_fact_default=0.5; act_evap_method=ritchie; irrigation_will_runoff=0; irrigation_layer=0; SummerCona=3.5; SummerU=6; SummerDate=1-Nov; WinterCona=3.5; WinterU=6; WinterDate=1-Apr; DiffusConst=40; DiffusSlope=16; Salb=0.13; max_pond=0; CN2Bare=73; CNRed=20; CNCov=0.8; Thickness=[150, 150, 300, 300, 300, 300, 300, 300, 300, 300, 300]; SWCON=[0.3, 0.3, 0.3, 0.3, 0.3, 0.3, 0.3, 0.3, 0.3, 0.3, 0.3]
        mobile_solutes=[NO3, urea, cl, br, org_n, org_c_pool1, org_c_pool2, org_c_pool3]
      SoilNitrogen
      SoilOrganicMatter: RootCN=40; RootWt=200; SoilCN=12.5; EnrACoeff=7.4; EnrBCoeff=0.2; OCUnits=Total
        Thickness  OC    FBiom  FInert
        150        1.04  0.025  0.4
        150        0.89  0.02   0.6
        300        0.89  0.015  0.8
        300        0.89  0.01   0.9
        300        0.77  0.01   0.95
        300        0.45  0.01   0.95
        300        0.27  0.01   0.95
        300        0.22  0.01   0.95
        300        0.16  0.01   0.95
        300        0.13  0.01   0.95
        300        0.12  0.01   0.95
      Analysis: PHUnits=Water; BoronUnits=HotWater
        Thickness  EC    PH
        150        0.2   8.4
        150        0.25  8.8
        300        0.31  9
        300        0.4   9.2
        300        0.59  9.2
        300        0.84  9.1
        300        0.93  9
        300        1.01  9
        300        1.06  8.9
        300        1.05  8.9
        300        1.01  8.9
      InitialWater Initial water: FractionFull=1; PercentMethod=FilledFromTop
      Sample: NO3Units=ppm; NH4Units=ppm; SWUnits=Volumetric; OCUnits=Total; PHUnits=Water
        Thickness  NO3    NH4
        150        6.503  0.599004
        150        2.101  0.100001
        300        2.101  0.100001
        300        1.701  0.100001
        300        1.701  0.100001
        300        1.701  0.100001
        300        1.701  0.100001
        300        1.701  0.100001
        300        1.701  0.100001
        300        1.701  0.100001
        300        1.701  0.100001
    SurfaceOrganicMatter: PoolName=wheat; type=wheat; mass=1000; standing_fraction=0; cnr=80
      ResidueTypes:
        {Name=wheat, fraction_C=0.08, po4ppm=10, nh4ppm=10, no3ppm=10, specific_area=0.0001, cf_contrib=1, pot_decomp_rate=0.1, fr_c=[0.3, 0.3, 0.4], fr_n=[0.3, 0.3, 0.4], fr_p=[0.3, 0.3, 0.4]}
    MicroClimate
  Folder Agroforestry
    RectangularZone: Area=1; Slope=0
      Report: EventNames=[Wheat].Harvesting
        VariableNames:
          [Clock].Today
          Wheat.Zadok.Stage
          Wheat.Phenology.CurrentStageName
          Wheat.AboveGround.Wt
          Wheat.AboveGround.N
          Wheat.Grain.Yield
          Wheat.Grain.Protein
          Wheat.Grain.Size
          Wheat.Grain.GrainNo
          Wheat.Grain.Wt
          Wheat.Grain.N
          Wheat.Total.Wt
      Fertiliser
      Soil: ASCOrder=Vertosol; ASCSubOrder=Black; SoilType=Clay; Site=Norwin; NearestTown=Norwin; Region=Darling Downs and Granite Belt; State=Queensland; Country=Australia; NaturalVegetation=Qld. Bluegrass, possible Qld. Blue gum; ApsoilNumber=900; Latitude=-27.581836; Longitude=151.320206; LocationAccuracy=+/- 20m
        DataSource=CSIRO Sustainable Ecosystems, Toowoomba; Characteriesd as part of the GRDC funded project"Doing it better, doing it smarter, managing soil water in Australian agriculture' 2011
        Comments=OC, CLL for all crops estimated-based on Bongeen Mywybilla Soil No1
        Water
          Thickness  BD       AirDry    LL15      DUL       SAT       KS
          150        1.01056  0.13025   0.2605    0.521     0.588655  20
          150        1.07146  0.198689  0.248362  0.496723  0.565677  20
          300        1.09394  0.28      0.28      0.488438  0.557193  20
          300        1.15861  0.28      0.28      0.480297  0.532787  20
          300        1.17301  0.28      0.28      0.471584  0.527354  20
          300        1.16287  0.28      0.28      0.457071  0.53118   20
          300        1.1875   0.28      0.28      0.452332  0.521888  20
          SoilCrop WheatSoil: LL=[0.261, 0.248, 0.28, 0.306, 0.36, 0.392, 0.446]; KL=[0.06, 0.06, 0.06, 0.04, 0.04, 0.02, 0.01]; XF=[1, 1, 1, 1, 1, 1, 1]
        SoilWater: residueinterception=0; SummerDate=1-Nov; SummerU=5; SummerCona=5; WinterDate=1-Apr; WinterU=5; WinterCona=5; DiffusConst=40; DiffusSlope=16; Salb=0.12; CN2Bare=73; CNRed=20; CNCov=0.8; max_pond=0; Thickness=[150, 150, 300, 300, 300, 300, 300]; SWCON=[0.3, 0.3, 0.3, 0.3, 0.3, 0.3, 0.3]
        SoilNitrogen: fom_type=[default, manure, mucuna, lablab, shemp, stable]; fract_carb=[0.2, 0.3, 0.54, 0.57, 0.45, 0]; fract_cell=[0.7, 0.3, 0.37, 0.37, 0.47, 0.1]; fract_lign=[0.1, 0.4, 0.09, 0.06, 0.08, 0.9]; wfpsN2N2O_x=[22, 88]; wfpsN2N2O_y=[0.1, 1]
        SoilOrganicMatter: RootCN=40; RootWt=1000; SoilCN=12; EnrACoeff=7.4; EnrBCoeff=0.2; OCUnits=Total
          Thickness  OC    FBiom  FInert
          150        1.2   0.04   0.4
          150        0.96  0.02   0.6
          300        0.6   0.02   0.8
          300        0.3   0.02   1
          300        0.18  0.01   1
          300        0.12  0.01   1
          300        0.12  0.01   1
        Analysis: Thickness=[150, 150, 300, 300, 300, 300, 300]; PH=[8, 8, 8, 8, 8, 8, 8]; PHUnits=Water; BoronUnits=HotWater
        InitialWater: PercentMethod=EvenlyDistributed; FractionFull=1
        Sample InitialN: NO3Units=ppm; NH4Units=ppm; SWUnits=Volumetric; OCUnits=Total; PHUnits=Water
          Thickness  NO3  NH4
          150        1    0.1
          150        1    0.1
          300        1    0.1
          300        1    0.1
          300        1    0.1
          300        1    0.1
          300        1    0.1
      SurfaceOrganicMatter: PoolName=wheat_stubble; type=wheat; mass=500; standing_fraction=0; cnr=100; CriticalResidueWeight=2000; OptimumDecompTemp=20; MaxCumulativeEOS=20; CNRatioDecompCoeff=0.277; CNRatioDecompThreshold=25; TotalLeachRain=25; MinRainToLeach=10; CriticalMinimumOrganicC=0.004; DefaultCPRatio=0; DefaultStandingFraction=0; StandingExtinctCoeff=0.5; FractionFaecesAdded=0.5
        Pools:
          {PoolName=wheat_stubble, ResidueType=wheat, Mass=500, CNRatio=100, StandingFraction=0}
        ResidueTypes: LoadFromResource=ResidueTypes
      Plant15 Wheat: AutoHarvest=true; CropType=Wheat
      MicroClimate: air_pressure=1010; soil_emissivity=0.96; sun_angle=15; soil_heat_flux_fraction=0.4; night_interception_fraction=0.5; windspeed_default=3; refheight=2; albedo=0.15; emissivity=0.96; gsmax=0.01; r50=200; a_interception=0; b_interception=1; c_interception=0; d_interception=0; soil_albedo=0.3
      Manager SowingFertiliser
        Amount = 160
        CropName = wheat
```csharp
          using System;
using Models.Core;
using Models.PMF;
namespace Models
{
	[Serializable]
	public class Script : Model
	{
		[Link] Clock Clock;
		[Link] Fertiliser Fertiliser;
		[Link] Summary Summary;
		
		
		[Description("Amount of fertiliser to be applied (kg/ha)")]
		public double Amount { get; set;}
		
		[Description("Crop to be fertilised")]
		public string CropName { get; set;}
		
		
		

		[EventSubscribe("Sowing")]
		private void OnSowing(object sender, EventArgs e)
		{
			Model crop = sender as Model;
			if (crop.Name.ToLower()==CropName.ToLower())
				Fertiliser.Apply(Amount: Amount, Type: Fertiliser.Types.NO3N);
		}
		
	}
}
```
      Manager SowingRule
        StartDate = 1-may
        EndDate = 10-jul
        MinESW = 100
        MinRain = 25
        RainDays = 7
        CultivarName = Hartog
        SowingDepth = 30
        RowSpacing = 250
        Population = 120
```csharp
          using System;
using Models.Core;
using Models.PMF.OldPlant;
using Models.Soils;
using Models.Utilities;
using APSIM.Shared.Utilities;

namespace Models
{
	[Serializable]
	public class Script : Model
	{
		[Link] Clock Clock;
		[Link] Fertiliser Fertiliser;
		[Link] Summary Summary;
		[Link] Plant15 Wheat;
		[Link] Soil Soil; 
		Accumulator accumulatedRain;
		
		[Description("Start of sowing window (d-mmm)")]
		public string StartDate { get; set;}
		[Description("End of sowing window (d-mmm)")]
		public string EndDate { get; set;}
		[Description("Minimum extractable soil water for sowing (mm)")]
		public double MinESW { get; set;}
		[Description("Accumulated rainfall required for sowing (mm)")]
		public double MinRain { get; set;}
		[Description("Duration of rainfall accumulation (d)")]
		public int RainDays { get; set;}
		[Description("Cultivar to be sown")]
		public string CultivarName { get; set;}
		[Description("Sowing depth (mm)")]
		public double SowingDepth { get; set;}		
		[Description("Row spacing (mm)")]
		public double RowSpacing { get; set;}	
		[Description("Plant population (/m2)")]
		public double Population { get; set;}	
		
		
		[EventSubscribe("Commencing")]
        private void OnSimulationCommencing(object sender, EventArgs e)
        {
        	accumulatedRain = new Accumulator(this, "[Weather].Rain", RainDays);
        }
		

		[EventSubscribe("DoManagement")]
		private void OnDoManagement(object sender, EventArgs e)
		{
			accumulatedRain.Update();
			
			if (DateUtilities.WithinDates(StartDate,Clock.Today,EndDate) &&
			    Wheat.plant_status=="out" &&
			    Soil.SoilWater.ESW > MinESW &&
			    accumulatedRain.Sum > MinRain)
			{
			   Wheat.Sow(population:Population, cultivar:CultivarName, depth:SowingDepth, rowSpacing:RowSpacing);	
			}
		
		}
		
	}
}
```
    CircularZone: Area=1; Slope=0
      Report: EventNames=[Wheat].Harvesting
        VariableNames:
          [Clock].Today
          Wheat.Zadok.Stage
          Wheat.Phenology.CurrentStageName
          Wheat.AboveGround.Wt
          Wheat.AboveGround.N
          Wheat.Grain.Yield
          Wheat.Grain.Protein
          Wheat.Grain.Size
          Wheat.Grain.GrainNo
          Wheat.Grain.Wt
          Wheat.Grain.N
          Wheat.Total.Wt
      Fertiliser
      Soil: same as Agroforestry.RectangularZone.Soil
      SurfaceOrganicMatter: same as Agroforestry.RectangularZone.SurfaceOrganicMatter
      Plant15 Wheat: AutoHarvest=true; CropType=Wheat
      MicroClimate: same as Agroforestry.RectangularZone.MicroClimate
      Manager SowingFertiliser: same as Agroforestry.RectangularZone.SowingFertiliser
      Manager SowingRule: same as Agroforestry.RectangularZone.SowingRule
  Folder Crops
    Plant15 Wheat: AutoHarvest=true; CropType=Wheat
    OilPalm
    Plant Potato: CropType=Potato
    Slurp: CropType=Slurp; localLAIGreen=5; localLAItot=5; localLightExtinction=0.6; localCanopyHeight=500; localCanopyDepth=500; localMaximumStomatalConductance=0.011; localFrgr=1; localDemandWater=10; localDemandNitrogen=5; localKNO3=0.1; localKNH4=0; localRootDepth=500; localSurfaceRootLengthDensity=0.05
    AgPasture: alt_N_uptake=no; SwardName=AgPasture; NumSpecies=1; WaterUptakeSource=calc; SpeciesName=[Ryegrass]; SpeciesNType=[grass]; SpeciesCType=[C3]; InitialDMShoot=[2000]; InitialDMRoot=[500]; MinimumGreenWt=[300]; InitialRootDepth=[750]; ExpoLinearDepthParam=0.1; ExpoLinearCurveParam=3
    Folder Wheat cultivars
      Folder Yield Prophet cultivars
        Cultivar Early
          Alias=[agtscythe, arrino, bonnie_rock, bowerbird, crusader, dart, drysdale, emurock, hunter, hybrid_mercury, hyperno, imposeclplus, kalka, kirchauff, kukri, livingston, mace, ouyen, perengori, ruby, tamaroi, wyalkatchem, young]
          Command:
            [Phenology].Vernalisation.VernSens = 2.3
            [Phenology].Vernalisation.PhotopSens = 3.2
        Cultivar EarlyMid
          Alias=[annuello, barunga, carnamah, catalina, clf_stiletto, cobra, corack, correll, diamondbird, estoc, frame, gladius, goroke, grenadeclplus, guardian, halbred, hartog, impala, justica, kord, merlin, mitre, pugsley, shield, spitfire, stiletto, sunguard, sunstate, ventura, yallaroi, yawa, yitpi]
          Command:
            [Phenology].Vernalisation.VernSens = 1.5
            [Phenology].Vernalisation.PhotopSens = 3.0
        Cultivar VeryEarly
          Alias=[h45, h46, saintly, silverstar, tamarinrock, waagan, westonia, wollaroi, zippy]
          Command:
            [Phenology].Vernalisation.VernSens = 1.5
            [Phenology].Vernalisation.PhotopSens = 1.5
        Cultivar Mid
          Alias=[arrivato, babbler, barham, baxter, buckley, camm, carinya, clf-jnz, derrimut, dollarbird, elmoreclplus, justicaclplus, saphire, wallup]
          Command:
            [Phenology].Vernalisation.VernSens = 1.5
            [Phenology].Vernalisation.PhotopSens = 3.5
        Cultivar MidPlus: Alias=[bellaroi, lang, caparoi, suntop]
          Command:
            [Phenology].Vernalisation.VernSens = 2.0
            [Phenology].Vernalisation.PhotopSens = 3.5
        Cultivar MidLate
          Alias=[braewood, calingiri, chara, endure, envoy, gauntlet, gazelle, giles, magenta, phantom, sentinel, sunlin, sunvale, wylie]
          Command:
            [Phenology].Vernalisation.VernSens = 2.8
            [Phenology].Vernalisation.PhotopSens = 3.0
        Cultivar Late: Alias=[beaufont, bolac, forrest, kelallac, preston, strzelecki]
          Command:
            [Phenology].Vernalisation.VernSens = 2.5
            [Phenology].Vernalisation.PhotopSens = 4.0
        Cultivar WinterWheat: Alias=[lorikeet, wylah, rosella, whistler, wedgetail]
          Command:
            [Phenology].Vernalisation.VernSens = 3.9
            [Phenology].Vernalisation.PhotopSens = 3.9
            [Phenology].FloralInitiationToFlowering.Target.Value = 380
        Cultivar Axe: Alias=axe
          Command:
            [Phenology].Vernalisation.VernSens = 2.0
            [Phenology].Vernalisation.PhotopSens = 3.0
        Cultivar Scout: Alias=[scout, l]
          Command:
            [Phenology].Vernalisation.VernSens = 1.8
            [Phenology].Vernalisation.PhotopSens = 3.5
            [Phenology].StartGrainFillToEndGrainFill.Target.Value = 550
        Cultivar Lincoln: Alias=lincoln
          Command:
            [Phenology].Vernalisation.VernSens = 1.8
            [Phenology].Vernalisation.PhotopSens = 3.5
        Cultivar GregoryLancer: Alias=[gregory, lancer]
          Command:
            [Phenology].Vernalisation.VernSens = 2.7
            [Phenology].Vernalisation.PhotopSens = 3.2
        Cultivar Eaglehawk: Alias=eaglehawk
          Command:
            [Phenology].Vernalisation.VernSens = 2.5
            [Phenology].Vernalisation.PhotopSens = 2.5
            [Phenology].EndOfJuvenileToFloralInitiation.Target.Value = 500
            [Phenology].FloralInitiationToFlowering.Target.Value = 655
            [Phenology].FloweringToStartGrainFill.Target.Value = 250
            [Phenology].StartGrainFillToEndGrainFill.Target.Value = 500
        Cultivar Marombi: Alias=[marombi, -]
          Command:
            [Phenology].Vernalisation.VernSens = 3.9
            [Phenology].Vernalisation.PhotopSens = 4.0
            [Phenology].FloralInitiationToFlowering.Target.Value = 455
    Folder OilPalm cultivars
      Cultivar Dami
        Command:
          [FrondMaxArea].XYPairs.X = 0,2,4.5,8.5,14
          [FrondMaxArea].XYPairs.Y = 0.1,1,7,12,14
      Cultivar SuperFamily
        Command:
          [FrondMaxArea].XYPairs.X = 0,2,4.5,8.5,14
          [FrondMaxArea].XYPairs.Y = 0.1,0.9,0.63,10.8,12.6
  Folder Data store and analysis models: TimeSeriesStats={TableName=PredictedObserved}
    Input
    Probability: Exceedence=true
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